# OpenSim document version 40000
Model cyclistFullBodyMuscleActuated:
  gravity: 0 -9.8066 0
  length_units: meters
  force_units: N
  credits:
    Rajagopal et al., Lai et al., Allaire et al., Saul et al., McFarland et al.
  Ground: meshes=
  BodySet:
    Body pelvis: mass=11.777 [kg] mass_center=(-0.0707 0 0) inertia=(0.1028 0.0871 0.0579 0 0 0)
        meshes=(r_pelvis.vtp l_pelvis.vtp)
      WrapCylinder Gmax1_at_pelvis_r: xyz_body_rotation=(-0.6 0.45 0) translation=(-0.077 -0.099 0.061) quadrant=-x
          radius=0.04 length=0.15
      WrapCylinder Gmax2_at_pelvis_r: xyz_body_rotation=(-0.75 0.39 0) translation=(-0.08 -0.083 0.068) quadrant=all
          radius=0.04 length=0.1
      WrapCylinder Gmax3_at_pelvis_r: xyz_body_rotation=(-0.1 0 0) translation=(-0.083 -0.088 0.068) quadrant=all
          radius=0.04 length=0.1
      WrapCylinder Gmax1_at_pelvis_l: xyz_body_rotation=(0.6 -0.45 0) translation=(-0.077 -0.099 -0.061) quadrant=-x
          radius=0.04 length=0.15
      WrapCylinder Gmax2_at_pelvis_l: xyz_body_rotation=(0.75 -0.39 0) translation=(-0.08 -0.083 -0.068) quadrant=all
          radius=0.04 length=0.1
      WrapCylinder Gmax3_at_pelvis_l: xyz_body_rotation=(0.1 0 0) translation=(-0.083 -0.088 -0.068) quadrant=all
          radius=0.04 length=0.1
      WrapCylinder PS_at_brim_r: xyz_body_rotation=(-0.25 -0.27 0.1) translation=(-0.074 -0.06 0.0656) quadrant=-y
          radius=0.05 length=0.1
      WrapCylinder PS_at_brim_l: xyz_body_rotation=(0.25 0.27 0.1) translation=(-0.074 -0.06 -0.0656) quadrant=-y
          radius=0.05 length=0.1
      WrapCylinder IL_at_brim_r: xyz_body_rotation=(-0.32 -0.24 0.9) translation=(-0.071 -0.065 0.0756) quadrant=-y
          radius=0.0549 length=0.1
      WrapCylinder IL_at_brim_l: xyz_body_rotation=(0.32 0.24 0.9) translation=(-0.071 -0.065 -0.0756) quadrant=-y
          radius=0.0549 length=0.1
    Body sacrum: mass=0.001 mass_center=(0 0 0) inertia=(0.0001 0.0001 0.0001 0 0 0) meshes=sacrum.vtp
    Body femur_r: mass=9.3014 mass_center=(0 -0.17 0) inertia=(0.1339 0.0351 0.1412 0 0 0) meshes=r_femur.vtp
      WrapCylinder GasLat_at_condyles_r: translation=(0.005 -0.41 0) quadrant=all radius=0.026 length=0.1
      WrapCylinder GasMed_at_condyles_r: translation=(0.005 -0.41 0) quadrant=all radius=0.025 length=0.1
      WrapCylinder KnExt_at_fem_r: xyz_body_rotation=(-0.0623366 0.0507601 0)
          translation=(0.00358828 -0.402732 0.00209111) quadrant=all radius=0.025 length=0.1
      WrapCylinder KnExtVL_at_fem_r: xyz_body_rotation=(-0.0623366 0.0507601 0)
          translation=(0.00188828 -0.402732 0.00209111) quadrant=all radius=0.025 length=0.1
      WrapCylinder AB_at_femshaft_r: xyz_body_rotation=(1.66157 0.186644 0) translation=(0.0146434 -0.112595 0.023365)
          quadrant=all radius=0.0165 length=0.07
      WrapCylinder AL_at_femshaft_r: xyz_body_rotation=(1.77711 0.136489 0) translation=(0.0307327 -0.231909 0.0151137)
          quadrant=all radius=0.0201 length=0.1
      WrapCylinder AMprox_at_femshaft_r: xyz_body_rotation=(1.61126 0.18656 0)
          translation=(0.00518299 -0.0728948 0.025403) quadrant=all radius=0.0211 length=0.07
      WrapCylinder AMmid_at_femshaft_r: xyz_body_rotation=(1.61139 0.13656 0)
          translation=(0.0230125 -0.160711 0.0205842) quadrant=all radius=0.0214 length=0.12
      WrapCylinder AMdist_at_femshaft_r: xyz_body_rotation=(1.71188 0.186636 0)
          translation=(0.0316065 -0.260736 0.0093646) quadrant=all radius=0.0218 length=0.2
      WrapCylinder AMisch_at_condyles_r: xyz_body_rotation=(1.71115 -0.463363 0)
          translation=(-0.0226511 -0.376831 -0.00315437) quadrant=all radius=0.04 length=0.24
      WrapCylinder PECT_at_femshaft_r: xyz_body_rotation=(1.81295 0.276344 0)
          translation=(0.00608573 -0.0845029 0.0304405) quadrant=all radius=0.015 length=0.05
    Body tibia_r: mass=3.7075 mass_center=(0 -0.1867 0) inertia=(0.0504 0.0051 0.0511 0 0 0)
        meshes=(r_tibia.vtp r_fibula.vtp)
      WrapCylinder GasLat_at_shank_r: xyz_body_rotation=(2.96723 -0.279725 -1.47812)
          translation=(-0.0074 -0.074 -0.0033) quadrant=-y radius=0.055 length=0.1
      WrapCylinder GasMed_at_shank_r: xyz_body_rotation=(2.96723 0.0279725 -1.47812)
          translation=(-0.0074 -0.074 -0.0033) quadrant=-y radius=0.059 length=0.1
      WrapCylinder GR_at_condyles_r: xyz_body_rotation=(0 -0.4 0) translation=(-0.003 -0.02 0) quadrant=all
          radius=0.036 length=0.1
      WrapCylinder SM_at_condyles_r: xyz_body_rotation=(0 -0.1 0) translation=(-0.001 -0.02 0) quadrant=all
          radius=0.0345 length=0.1
      WrapCylinder ST_at_condyles_r: xyz_body_rotation=(0 -0.2 0) translation=(-0.002 -0.0205 0) quadrant=all
          radius=0.0425 length=0.1
      WrapCylinder BF140_at_gastroc_r: translation=(-0.039 -0.06 0) quadrant=y radius=0.029 length=0.15
    Body patella_r: mass=0.0862 mass_center=(0.0018 0.0264 0) inertia=(2.87e-6 1.311e-5 1.311e-5 0 0 0)
        meshes=r_patella.vtp
    Body talus_r: mass=0.1 mass_center=(0 0 0) inertia=(0.001 0.001 0.001 0 0 0) meshes=r_talus.vtp
    Body calcn_r: mass=1.25 mass_center=(0.1 0.03 0) inertia=(0.0014 0.0039 0.0041 0 0 0) meshes=r_foot.vtp
    Body toes_r: mass=0.2166 mass_center=(0.0346 0.006 -0.0175) inertia=(0.0001 0.0002 0.001 0 0 0) meshes=r_bofoot.vtp
    Body femur_l: mass=9.3014 mass_center=(0 -0.17 0) inertia=(0.1339 0.0351 0.1412 0 0 0) meshes=l_femur.vtp
      WrapCylinder GasLat_at_condyles_l: translation=(0.005 -0.41 0) quadrant=all radius=0.026 length=0.1
      WrapCylinder GasMed_at_condyles_l: translation=(0.005 -0.41 0) quadrant=all radius=0.025 length=0.1
      WrapCylinder KnExt_at_fem_l: xyz_body_rotation=(0.0623366 -0.0507601 0)
          translation=(0.00358828 -0.402732 -0.00209111) quadrant=all radius=0.025 length=0.1
      WrapCylinder KnExtVL_at_fem_l: xyz_body_rotation=(0.0623366 -0.0507601 0)
          translation=(0.00188828 -0.402732 -0.00209111) quadrant=all radius=0.025 length=0.1
      WrapCylinder AB_at_femshaft_l: xyz_body_rotation=(-1.66157 -0.186644 0)
          translation=(0.0146434 -0.112595 -0.023365) quadrant=all radius=0.0165 length=0.07
      WrapCylinder AL_at_femshaft_l: xyz_body_rotation=(-1.77711 -0.136489 0)
          translation=(0.0307327 -0.231909 -0.0151137) quadrant=all radius=0.0201 length=0.1
      WrapCylinder AMprox_at_femshaft_l: xyz_body_rotation=(-1.61126 -0.18656 0)
          translation=(0.00518299 -0.0728948 -0.025403) quadrant=all radius=0.0211 length=0.07
      WrapCylinder AMmid_at_femshaft_l: xyz_body_rotation=(-1.61139 -0.13656 0)
          translation=(0.0230125 -0.160711 -0.0205842) quadrant=all radius=0.0214 length=0.12
      WrapCylinder AMdist_at_femshaft_l: xyz_body_rotation=(-1.71188 -0.186636 0)
          translation=(0.0316065 -0.260736 -0.0093646) quadrant=all radius=0.0218 length=0.2
      WrapCylinder AMisch_at_condyles_l: xyz_body_rotation=(-1.71115 0.463363 0)
          translation=(-0.0226511 -0.376831 0.00315437) quadrant=all radius=0.04 length=0.24
      WrapCylinder PECT_at_femshaft_l: xyz_body_rotation=(-1.81295 -0.276344 0)
          translation=(0.00608573 -0.0845029 -0.0304405) quadrant=all radius=0.015 length=0.05
    Body tibia_l: mass=3.7075 mass_center=(0 -0.1867 0) inertia=(0.0504 0.0051 0.0511 0 0 0)
        meshes=(l_tibia.vtp l_fibula.vtp)
      WrapCylinder GasLat_at_shank_l: xyz_body_rotation=(-2.96723 0.279725 -1.47812)
          translation=(-0.0074 -0.074 0.0033) quadrant=-y radius=0.055 length=0.1
      WrapCylinder GasMed_at_shank_l: xyz_body_rotation=(-2.96723 -0.0279725 -1.47812)
          translation=(-0.0074 -0.074 0.0033) quadrant=-y radius=0.059 length=0.1
      WrapCylinder GR_at_condyles_l: xyz_body_rotation=(0 0.4 0) translation=(-0.003 -0.02 0) quadrant=all radius=0.036
          length=0.1
      WrapCylinder SM_at_condyles_l: xyz_body_rotation=(0 0.1 0) translation=(-0.001 -0.02 0) quadrant=all
          radius=0.0345 length=0.1
      WrapCylinder ST_at_condyles_l: xyz_body_rotation=(0 0.2 0) translation=(-0.002 -0.0205 0) quadrant=all
          radius=0.0425 length=0.1
      WrapCylinder BF140_at_gastroc_l: translation=(-0.039 -0.06 0) quadrant=all radius=0.029 length=0.15
    Body patella_l: mass=0.0862 mass_center=(0.0018 0.0264 0) inertia=(2.87e-6 1.311e-5 1.311e-5 0 0 0)
        meshes=l_pat.vtp
    Body talus_l: mass=0.1 mass_center=(0 0 0) inertia=(0.001 0.001 0.001 0 0 0) meshes=l_talus.vtp
    Body calcn_l: mass=1.25 mass_center=(0.1 0.03 0) inertia=(0.0014 0.0039 0.0041 0 0 0) meshes=l_foot.vtp
    Body toes_l: mass=0.2166 mass_center=(0.0346 0.006 0.0175) inertia=(0.0001 0.0002 0.001 0 0 0) meshes=l_bofoot.vtp
    Body Abdomen: mass=0.0001 mass_center=(0 0 0) inertia=(0.0001 0.0001 0.0001 0 0 0)
      WrapEllipsoid Abdomen: translation=(0 0 0) quadrant=x dimensions=(0.01 0.08 0.05)
    Body lumbar5: mass=2.1966 mass_center=(0.0137071 0.0250511 0) inertia=(0.0001 0.0001 0.0001 0 0 0)
        meshes=lumbar5.vtp
    Body lumbar4: mass=2.0845 mass_center=(0.0172503 0.0193022 0) inertia=(0.0001 0.0001 0.0001 0 0 0)
        meshes=lumbar4.vtp
    Body lumbar3: mass=2.0278 mass_center=(0.0272081 0.0140683 0) inertia=(0.0001 0.0001 0.0001 0 0 0)
        meshes=lumbar3.vtp
    Body lumbar2: mass=1.9758 mass_center=(0.0344986 0.00713231 0) inertia=(0.0001 0.0001 0.0001 0 0 0)
        meshes=lumbar2.vtp
    Body lumbar1: mass=2.0128 mass_center=(0.0411684 0.00111451 0) inertia=(0.0001 0.0001 0.0001 0 0 0)
        meshes=lumbar1.vtp
    Body thoracic12: mass=1.9864 mass_center=(0.0521765 -0.00207232 0) inertia=(0.0001 0.0001 0.0001 0 0 0)
        meshes=thoracic12_s.vtp
    Body thoracic11: mass=1.6049 mass_center=(0.0564797 -0.00142132 0) inertia=(0.0001 0.0001 0.0001 0 0 0)
        meshes=thoracic11_s.vtp
    Body thoracic10: mass=1.549 mass_center=(0.0604203 0.00275905 0) inertia=(0.0001 0.0001 0.0001 0 0 0)
        meshes=thoracic10_s.vtp
    Body thoracic9: mass=1.3016 mass_center=(0.0643355 0.00466918 0) inertia=(0.0001 0.0001 0.0001 0 0 0)
        meshes=thoracic9_s.vtp
    Body thoracic8: mass=1.2259 mass_center=(0.059938 0.0102116 0) inertia=(0.0001 0.0001 0.0001 0 0 0)
        meshes=thoracic8_s.vtp
    Body thoracic7: mass=1.266 mass_center=(0.0556167 0.0168529 0) inertia=(0.0001 0.0001 0.0001 0 0 0)
        meshes=thoracic7_s.vtp
    Body thoracic6: mass=1.1356 mass_center=(0.0511811 0.021861 0) inertia=(0.0001 0.0001 0.0001 0 0 0)
        meshes=thoracic6_s.vtp
    Body thoracic5: mass=1.168 mass_center=(0.0443324 0.0258505 0) inertia=(0.0001 0.0001 0.0001 0 0 0)
        meshes=thoracic5_s.vtp
    Body thoracic4: mass=1.0469 mass_center=(0.0363922 0.0269448 0) inertia=(0.0001 0.0001 0.0001 0 0 0)
        meshes=thoracic4_s.vtp
    Body thoracic3: mass=1.1314 mass_center=(0.0244422 0.0230274 0) inertia=(0.0001 0.0001 0.0001 0 0 0)
        meshes=thoracic3_s.vtp
    Body thoracic2: mass=0.9492 mass_center=(0.0187755 0.0205432 0) inertia=(0.0001 0.0001 0.0001 0 0 0)
        meshes=thoracic2_s.vtp
    Body thoracic1: mass=0.89347 mass_center=(0.00444495 0.0146739 0) inertia=(0.0001 0.0001 0.0001 0 0 0)
        meshes=thoracic1_s.vtp
    Body head_neck: mass=5.4132 mass_center=(0 0.12203 0) inertia=(0.0001 0.0001 0.0001 0 0 0)
        meshes=(cerv6.vtp cerv5.vtp cerv4.vtp cerv3.vtp cerv2.vtp cerv1.vtp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)
    Body rib12_R: mass=0.0001 mass_center=(0 0 0) inertia=(0.0001 0.0001 0.0001 0 0 0) meshes=Rib12R.vtp
    Body rib11_R: mass=0.0001 mass_center=(0 0 0) inertia=(0.0001 0.0001 0.0001 0 0 0) meshes=Rib11R.vtp
    Body rib10_R: mass=0.0001 mass_center=(0 0 0) inertia=(0.0001 0.0001 0.0001 0 0 0) meshes=Rib10R.vtp
    Body rib9_R: mass=0.0001 mass_center=(0 0 0) inertia=(0.0001 0.0001 0.0001 0 0 0) meshes=Rib9R.vtp
    Body rib8_R: mass=0.0001 mass_center=(0 0 0) inertia=(0.0001 0.0001 0.0001 0 0 0) meshes=Rib8R.vtp
    Body rib7_R: mass=0.0001 mass_center=(0 0 0) inertia=(0.0001 0.0001 0.0001 0 0 0) meshes=Rib7R.vtp
    Body rib6_R: mass=0.0001 mass_center=(0 0 0) inertia=(0.0001 0.0001 0.0001 0 0 0) meshes=Rib6R.vtp
    Body rib5_R: mass=0.0001 mass_center=(0 0 0) inertia=(0.0001 0.0001 0.0001 0 0 0) meshes=Rib5R.vtp
    Body rib4_R: mass=0.0001 mass_center=(0 0 0) inertia=(0.0001 0.0001 0.0001 0 0 0) meshes=Rib4R.vtp
    Body rib3_R: mass=0.0001 mass_center=(0 0 0) inertia=(0.0001 0.0001 0.0001 0 0 0) meshes=Rib3R.vtp
    Body rib2_R: mass=0.0001 mass_center=(0 0 0) inertia=(0.0001 0.0001 0.0001 0 0 0) meshes=Rib2R.vtp
    Body rib1_R: mass=0.0001 mass_center=(0 0 0) inertia=(0.0001 0.0001 0.0001 0 0 0) meshes=Rib1R.vtp
    Body rib12_L: mass=0.0001 mass_center=(0 0 0) inertia=(0.0001 0.0001 0.0001 0 0 0) meshes=Rib12L.vtp
    Body rib11_L: mass=0.0001 mass_center=(0 0 0) inertia=(0.0001 0.0001 0.0001 0 0 0) meshes=Rib11L.vtp
    Body rib10_L: mass=0.0001 mass_center=(0 0 0) inertia=(0.0001 0.0001 0.0001 0 0 0) meshes=Rib10L.vtp
    Body rib9_L: mass=0.0001 mass_center=(0 0 0) inertia=(0.0001 0.0001 0.0001 0 0 0) meshes=Rib9L.vtp
    Body rib8_L: mass=0.0001 mass_center=(0 0 0) inertia=(0.0001 0.0001 0.0001 0 0 0) meshes=Rib8L.vtp
    Body rib7_L: mass=0.0001 mass_center=(0 0 0) inertia=(0.0001 0.0001 0.0001 0 0 0) meshes=Rib7L.vtp
    Body rib6_L: mass=0.0001 mass_center=(0 0 0) inertia=(0.0001 0.0001 0.0001 0 0 0) meshes=Rib6L.vtp
    Body rib5_L: mass=0.0001 mass_center=(0 0 0) inertia=(0.0001 0.0001 0.0001 0 0 0) meshes=Rib5L.vtp
    Body rib4_L: mass=0.0001 mass_center=(0 0 0) inertia=(0.0001 0.0001 0.0001 0 0 0) meshes=Rib4L.vtp
    Body rib3_L: mass=0.0001 mass_center=(0 0 0) inertia=(0.0001 0.0001 0.0001 0 0 0) meshes=Rib3L.vtp
    Body rib2_L: mass=0.0001 mass_center=(0 0 0) inertia=(0.0001 0.0001 0.0001 0 0 0) meshes=Rib2L.vtp
    Body rib1_L: mass=0.0001 mass_center=(0 0 0) inertia=(0.0001 0.0001 0.0001 0 0 0) meshes=Rib1L.vtp
    Body sternum: mass=0.0001 mass_center=(0 0 0) inertia=(0.0001 0.0001 0.0001 0 0 0) meshes=Sternum.vtp
    Body Abd_L_L1: mass=0.01 mass_center=(0 0 0) inertia=(0.01 0.01 0.01 0 0 0)
      WrapCylinder Cylinder8: xyz_body_rotation=(-1.5708 0 0) translation=(0.04 0.01 -0.065) quadrant=y radius=0.065
          length=0.02
    Body Abd_L_L2: mass=0.01 mass_center=(0 0 0) inertia=(0.01 0.01 0.01 0 0 0)
      WrapCylinder Cylinder9: xyz_body_rotation=(-1.5708 0 0) translation=(0.03 0.007 -0.065) quadrant=y radius=0.061
          length=0.02
    Body Abd_L_L3: mass=0.01 mass_center=(0 0 0) inertia=(0.01 0.01 0.01 0 0 0)
      WrapCylinder Cylinder10: xyz_body_rotation=(-1.5708 0 0) translation=(0.03 0.014 -0.06) quadrant=y radius=0.056
          length=0.02
    Body Abd_L_L4: mass=0.01 mass_center=(0 0 0) inertia=(0.01 0.01 0.01 0 0 0)
      WrapCylinder Cylinder11: xyz_body_rotation=(-1.5708 0 0) translation=(0.03 0.022 -0.06) quadrant=y radius=0.055
          length=0.02
    Body Abd_L_L5: mass=0.01 mass_center=(0 0 0) inertia=(0.01 0.01 0.01 0 0 0)
      WrapCylinder Cylinder12: xyz_body_rotation=(-1.5708 0 0) translation=(0.04 0.024 -0.065) quadrant=y radius=0.055
          length=0.02
    Body Abd_R_L1: mass=0.01 mass_center=(0 0 0) inertia=(0.01 0.01 0.01 0 0 0)
      WrapCylinder Cylinder3: xyz_body_rotation=(1.5708 0 0) translation=(0.04 0.01 0.065) quadrant=y radius=0.065
          length=0.02
    Body Abd_R_L2: mass=0.01 mass_center=(0 0 0) inertia=(0.01 0.01 0.01 0 0 0)
      WrapCylinder Cylinder4: xyz_body_rotation=(1.5708 0 0) translation=(0.03 0.007 0.065) quadrant=y radius=0.061
          length=0.02
    Body Abd_R_L3: mass=0.01 mass_center=(0 0 0) inertia=(0.01 0.01 0.01 0 0 0)
      WrapCylinder Cylinder5: xyz_body_rotation=(1.5708 0 0) translation=(0.03 0.014 0.06) quadrant=y radius=0.056
          length=0.02
    Body Abd_R_L4: mass=0.01 mass_center=(0 0 0) inertia=(0.01 0.01 0.01 0 0 0)
      WrapCylinder Cylinder6: xyz_body_rotation=(1.5708 0 0) translation=(0.03 0.022 0.06) quadrant=y radius=0.055
          length=0.02
    Body Abd_R_L5: mass=0.01 mass_center=(0 0 0) inertia=(0.01 0.01 0.01 0 0 0)
      WrapCylinder Cylinder7: xyz_body_rotation=(1.5708 0 0) translation=(0.04 0.024 0.065) quadrant=y radius=0.055
          length=0.02
    Body clavicle_R: mass=0.0001 mass_center=(0 0 0) inertia=(0.0001 0.0001 0.0001 0 0 0) meshes=clavicle.vtp
    Body scapula_R: mass=0.0001 mass_center=(0 0 0) inertia=(0.0001 0.0001 0.0001 0 0 0) meshes=scapula.vtp
      WrapCylinder TRIlongglen_r: xyz_body_rotation=(1.37532 -0.294612 2.43596) translation=(-0.0359 -0.0309 -0.0132)
          quadrant=x radius=0.003 length=0.03
    Body humerus_r: mass=2.0325 mass_center=(0 -0.164502 0) inertia=(0.011946 0.004121 0.013409 0 0 0)
        meshes=humerus_rv.vtp
      WrapEllipsoid Elbow_BIC_BRD_r: xyz_body_rotation=(-0.128631 0.137532 0.0307178)
          translation=(0.0019 -0.289 -0.014) quadrant=x dimensions=(0.015 0.015 0.1)
      WrapEllipsoid TRIlonghh_r: xyz_body_rotation=(3.00162 -0.853466 2.57419) translation=(-0.0078 -0.0041 -0.0014)
          quadrant=z dimensions=(0.035 0.02 0.02)
      WrapCylinder TRI_r: xyz_body_rotation=(-0.14015 -0.00628319 0.154985) translation=(0.0028 -0.2919 -0.0119)
          quadrant=all radius=0.016 length=0.1
      WrapEllipsoid ANC_r: xyz_body_rotation=(0.00750492 -0.196699 1.04929) translation=(0.0134 -0.2861 -0.0008)
          quadrant=-x dimensions=(0.02 0.02 0.02)
      WrapEllipsoid BIClong_r: xyz_body_rotation=(-2.00434 -1.00164 0.975465) translation=(0.0033 0.005 0.0003)
          quadrant=-y dimensions=(0.025 0.02 0.02)
    Body ulna_r: mass=0.6075 mass_center=(0 -0.120525 0) inertia=(0.002962 0.000618 0.003213 0 0 0) meshes=ulna_rv.vtp
    Body radius_r: mass=0.6075 mass_center=(0 -0.120525 0) inertia=(0.002962 0.000618 0.003213 0 0 0)
        meshes=radius_rv.vtp
      WrapCylinder SUP_r: xyz_body_rotation=(1.44775 0.304036 -2.44102) translation=(0.0045 -0.0437 0.0059) quadrant=-x
          radius=0.008 length=0.04
    Body hand_r: mass=0.4575 mass_center=(0 -0.068095 0) inertia=(0.000892 0.000547 0.00134 0 0 0)
        meshes=(pisiform_rvs.vtp lunate_rvs.vtp scaphoid_rvs.vtp triquetrum_rvs.vtp hamate_rvs.vtp capitate_rvs.vtp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)
    Body clavicle_L: mass=0.0001 mass_center=(0 0 0) inertia=(0.0001 0.0001 0.0001 0 0 0) meshes=clavicle_l.vtp
    Body scapula_L: mass=0.0001 mass_center=(0 0 0) inertia=(0.0001 0.0001 0.0001 0 0 0) meshes=scapula_l.vtp
      WrapCylinder TRIlongglen_l: xyz_body_rotation=(1.37532 -0.294612 2.43596) translation=(-0.0359 -0.0309 -0.0132)
          quadrant=x radius=0.003 length=0.03
    Body humerus_l: mass=2.0325 mass_center=(0 -0.164502 0) inertia=(0.011946 0.004121 0.013409 0 0 0)
        meshes=humerus_lv.vtp
      WrapEllipsoid Elbow_BIC_BRD_l: xyz_body_rotation=(-0.128631 0.137532 0.0307178)
          translation=(0.0019 -0.289 -0.014) quadrant=x dimensions=(0.015 0.015 0.1)
      WrapEllipsoid TRIlonghh_l: xyz_body_rotation=(3.00162 -0.853466 2.57419) translation=(-0.0078 -0.0041 -0.0014)
          quadrant=z dimensions=(0.035 0.02 0.02)
      WrapCylinder TRI_l: xyz_body_rotation=(-0.14015 -0.00628319 0.154985) translation=(0.0028 -0.2919 -0.0119)
          quadrant=all radius=0.016 length=0.1
      WrapEllipsoid ANC_l: xyz_body_rotation=(0.00750492 -0.196699 1.04929) translation=(0.0134 -0.2861 -0.0008)
          quadrant=-x dimensions=(0.02 0.02 0.02)
      WrapEllipsoid BIClong_l: xyz_body_rotation=(-2.00434 -1.00164 0.975465) translation=(0.0033 0.005 0.0003)
          quadrant=-y dimensions=(0.025 0.02 0.02)
    Body ulna_l: mass=0.6075 mass_center=(0 -0.120525 0) inertia=(0.002962 0.000618 0.003213 0 0 0) meshes=ulna_lv.vtp
    Body radius_l: mass=0.6075 mass_center=(0 -0.120525 0) inertia=(0.002962 0.000618 0.003213 0 0 0)
        meshes=radius_lv.vtp
      WrapCylinder SUP_l: xyz_body_rotation=(1.44775 0.304036 -2.44102) translation=(0.0045 -0.0437 0.0059) quadrant=-x
          radius=0.008 length=0.04
    Body hand_l: mass=0.4575 mass_center=(0 -0.068095 0) inertia=(0.000892 0.000547 0.00134 0 0 0)
        meshes=(pisiform_lvs.vtp lunate_lvs.vtp scaphoid_lvs.vtp triquetrum_lvs.vtp hamate_lvs.vtp capitate_lvs.vtp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)
  JointSet:
    CustomJoint ground_pelvis: socket_parent_frame=ground_offset socket_child_frame=pelvis_offset
      Coordinate pelvis_tilt: default_value=0 range=(-1.570796 1.570796) clamped=true
      Coordinate pelvis_list: default_value=0 range=(-1.570796 1.570796) clamped=true
      Coordinate pelvis_rotation: default_value=0 range=(-1.570796 1.570796) clamped=true
      Coordinate pelvis_tx: default_value=0 range=(-5 5) clamped=true
      Coordinate pelvis_ty: default_value=0.93 range=(-1 2) clamped=true
      Coordinate pelvis_tz: default_value=0 range=(-3 3) clamped=true
      PhysicalOffsetFrame ground_offset: socket_parent=/ground translation=(0 0 0) [meters]
      PhysicalOffsetFrame pelvis_offset: socket_parent=/bodyset/pelvis translation=(0 0 0)
      SpatialTransform:
        TransformAxis rotation1: coordinates=pelvis_tilt axis=(0 0 1) LinearFunction(coefficients=1 0)
        TransformAxis rotation2: coordinates=pelvis_list axis=(1 0 0) LinearFunction(coefficients=1 0)
        TransformAxis rotation3: coordinates=pelvis_rotation axis=(0 1 0) LinearFunction(coefficients=1 0)
        TransformAxis translation1: coordinates=pelvis_tx axis=(1 0 0) LinearFunction(coefficients=1 0)
        TransformAxis translation2: coordinates=pelvis_ty axis=(0 1 0) LinearFunction(coefficients=1 0)
        TransformAxis translation3: coordinates=pelvis_tz axis=(0 0 1) LinearFunction(coefficients=1 0)
    WeldJoint sacral: socket_parent_frame=pelvis_offset socket_child_frame=sacrum_offset
      PhysicalOffsetFrame pelvis_offset: socket_parent=/bodyset/pelvis translation=(-0.02 0 0)
      PhysicalOffsetFrame sacrum_offset: socket_parent=/bodyset/sacrum translation=(0 0 0)
    CustomJoint hip_r: socket_parent_frame=pelvis_offset socket_child_frame=femur_r_offset
      Coordinate hip_flexion_r: default_value=2.332052e-9 range=(-0.5235988 2.094395) clamped=true
      Coordinate hip_adduction_r: default_value=-1.199293e-9 range=(-0.8726646 0.5235988) clamped=true
      Coordinate hip_rotation_r: default_value=0 range=(-0.6981317 0.6981317) clamped=true
      PhysicalOffsetFrame pelvis_offset: socket_parent=/bodyset/pelvis translation=(-0.056276 -0.07849 0.07726)
      PhysicalOffsetFrame femur_r_offset: socket_parent=/bodyset/femur_r translation=(0 0 0)
      SpatialTransform: axes_held_at_zero=(translation1 translation2 translation3)
        TransformAxis rotation1: coordinates=hip_flexion_r axis=(0 0 1) LinearFunction(coefficients=1 0)
        TransformAxis rotation2: coordinates=hip_adduction_r axis=(1 0 0) LinearFunction(coefficients=1 0)
        TransformAxis rotation3: coordinates=hip_rotation_r axis=(0 1 0) LinearFunction(coefficients=1 0)
    CustomJoint walker_knee_r: socket_parent_frame=femur_r_offset socket_child_frame=tibia_r_offset
      Coordinate knee_angle_r: default_value=4.877666e-5 range=(0 2.443461) clamped=true
      PhysicalOffsetFrame femur_r_offset: socket_parent=/bodyset/femur_r translation=(-0.0045 -0.4096 -0.00175)
          orientation=(-1.64157 1.44618 1.5708) [radians]
      PhysicalOffsetFrame tibia_r_offset: socket_parent=/bodyset/tibia_r
          translation=(-0.00808954 -0.0035348 -0.00148474) orientation=(-1.64157 1.44618 1.5708)
      SpatialTransform:
        TransformAxis rotation1: coordinates=knee_angle_r axis=(1 0 0) LinearFunction(coefficients=1 0)
        TransformAxis rotation2: coordinates=knee_angle_r axis=(0 0 1)
          SimmSpline: x=(0 0.174533 0.349066 0.523599 0.698132 0.872665 1.0472 1.22173 1.39626 1.5708 1.74533 1.91986 2.0944)
              y=(0 0.0126809 0.0226969 0.0296054 0.0332049 0.0335354 0.0308779 0.0257548 0.0189295 0.011407 0.00443314 -0.00050475 -0.0016782)
        TransformAxis rotation3: coordinates=knee_angle_r axis=(0 1 0)
          SimmSpline: x=(0 0.174533 0.349066 0.523599 0.698132 0.872665 1.0472 1.22173 1.39626 1.5708 1.74533 1.91986 2.0944)
              y=(0 0.059461 0.109399 0.150618 0.18392 0.210107 0.229983 0.24435 0.254012 0.25977 0.262428 0.262788 0.261654)
        TransformAxis translation1: coordinates=knee_angle_r axis=(1 0 0)
          SimmSpline: x=(0 0.174533 0.349066 0.523599 0.698132 0.872665 1.0472 1.22173 1.39626 1.5708 1.74533 1.91986 2.0944)
              y=(0 5.3e-5 0.000188 0.000378 0.000597 0.000825 0.001045 0.001247 0.00142 0.001558 0.001661 0.001728 0.00176)
        TransformAxis translation2: coordinates=knee_angle_r axis=(0 1 0)
          SimmSpline: x=(0 0.174533 0.349066 0.523599 0.698132 0.872665 1.0472 1.22173 1.39626 1.5708 1.74533 1.91986 2.0944)
              y=(0 0.000301 0.000143 -0.000401 -0.001233 -0.002243 -0.003316 -0.004346 -0.005239 -0.005924 -0.006361 -0.006539 -0.00648)
        TransformAxis translation3: coordinates=knee_angle_r axis=(0 0 1)
          SimmSpline: x=(0 0.174533 0.349066 0.523599 0.698132 0.872665 1.0472 1.22173 1.39626 1.5708 1.74533 1.91986 2.0944)
              y=(0 0.001055 0.002061 0.00289 0.003447 0.003676 0.003559 0.00311 0.002373 0.001418 0.000329 -0.000805 -0.001898)
    CustomJoint patellofemoral_r: socket_parent_frame=femur_r_offset socket_child_frame=patella_r_offset
      Coordinate knee_angle_r_beta: default_value=4.877666e-5 range=(-99999.9 99999.9) clamped=false
      PhysicalOffsetFrame femur_r_offset: socket_parent=/bodyset/femur_r translation=(-0.00809 -0.40796 -0.00275)
      PhysicalOffsetFrame patella_r_offset: socket_parent=/bodyset/patella_r translation=(0 0 0)
      SpatialTransform: axes_held_at_zero=(rotation2 rotation3)
        TransformAxis rotation1: coordinates=knee_angle_r_beta axis=(0 0 1)
          SimmSpline: x=(0 0.174533 0.349066 0.523599 0.698132 0.872665 1.0472 1.22173 1.39626 1.5708 1.74533 1.91986 2.0944)
              y=(0.00113686 -0.00629212 -0.105582 -0.253683 -0.414245 -0.579047 -0.747244 -0.91799 -1.09044 -1.26379 -1.43763 -1.61186 -1.78634)
        TransformAxis translation1: coordinates=knee_angle_r_beta axis=(1 0 0)
          SimmSpline: x=(0 0.174533 0.349066 0.523599 0.698132 0.872665 1.0472 1.22173 1.39626 1.5708 1.74533 1.91986 2.0944)
              y=(0.0524 0.0488 0.0437 0.0371 0.0296 0.0216 0.0136 0.0057 -0.0019 -0.0088 -0.0148 -0.0196 -0.0227)
        TransformAxis translation2: coordinates=knee_angle_r_beta axis=(0 1 0)
          SimmSpline: x=(0 0.174533 0.349066 0.523599 0.698132 0.872665 1.0472 1.22173 1.39626 1.5708 1.74533 1.91986 2.0944)
              y=(-0.0108 -0.019 -0.0263 -0.0322 -0.0367 -0.0395 -0.0408 -0.0404 -0.0384 -0.0349 -0.0301 -0.0245 -0.0187)
        TransformAxis translation3: axis=(0 0 1) Constant(value=0.00275)
    PinJoint ankle_r: socket_parent_frame=tibia_r_offset socket_child_frame=talus_r_offset
      Coordinate ankle_angle_r: default_value=-1.182866e-9 range=(-0.6981317 0.5235988) clamped=true
      PhysicalOffsetFrame tibia_r_offset: socket_parent=/bodyset/tibia_r translation=(-0.01 -0.4 0)
          orientation=(0.175895 -0.105208 0.0186622)
      PhysicalOffsetFrame talus_r_offset: socket_parent=/bodyset/talus_r translation=(0 0 0)
          orientation=(0.175895 -0.105208 0.0186622)
    PinJoint subtalar_r: socket_parent_frame=talus_r_offset socket_child_frame=calcn_r_offset
      Coordinate subtalar_angle_r: default_value=0 range=(-0.6108652 0.6108652) clamped=true
      PhysicalOffsetFrame talus_r_offset: socket_parent=/bodyset/talus_r translation=(-0.04877 -0.04195 0.00792)
          orientation=(-1.76819 0.906223 1.8196)
      PhysicalOffsetFrame calcn_r_offset: socket_parent=/bodyset/calcn_r translation=(0 0 0)
          orientation=(-1.76819 0.906223 1.8196)
    PinJoint mtp_r: socket_parent_frame=calcn_r_offset socket_child_frame=toes_r_offset
      Coordinate mtp_angle_r: default_value=0 range=(-0.5235988 0.5235988) clamped=true locked=true
      PhysicalOffsetFrame calcn_r_offset: socket_parent=/bodyset/calcn_r translation=(0.1788 -0.002 0.00108)
          orientation=(-3.14159 0.619901 0)
      PhysicalOffsetFrame toes_r_offset: socket_parent=/bodyset/toes_r translation=(0 0 0)
          orientation=(-3.14159 0.619901 0)
    CustomJoint hip_l: socket_parent_frame=pelvis_offset socket_child_frame=femur_l_offset
      Coordinate hip_flexion_l: default_value=2.332052e-9 range=(-0.5235988 2.094395) clamped=true
      Coordinate hip_adduction_l: default_value=-1.199293e-9 range=(-0.8726646 0.5235988) clamped=true
      Coordinate hip_rotation_l: default_value=0 range=(-0.6981317 0.6981317) clamped=true
      PhysicalOffsetFrame pelvis_offset: socket_parent=/bodyset/pelvis translation=(-0.056276 -0.07849 -0.07726)
      PhysicalOffsetFrame femur_l_offset: socket_parent=/bodyset/femur_l translation=(0 0 0)
      SpatialTransform: axes_held_at_zero=(translation1 translation2 translation3)
        TransformAxis rotation1: coordinates=hip_flexion_l axis=(0 0 1) LinearFunction(coefficients=1 0)
        TransformAxis rotation2: coordinates=hip_adduction_l axis=(1 0 0) LinearFunction(coefficients=-1 0)
        TransformAxis rotation3: coordinates=hip_rotation_l axis=(0 1 0) LinearFunction(coefficients=-1 0)
    CustomJoint walker_knee_l: socket_parent_frame=femur_l_offset socket_child_frame=tibia_l_offset
      Coordinate knee_angle_l: default_value=4.877992e-5 range=(0 2.443461) clamped=true
      PhysicalOffsetFrame femur_l_offset: socket_parent=/bodyset/femur_l translation=(-0.0045 -0.4096 0.00175)
          orientation=(1.64157 -1.44618 1.5708)
      PhysicalOffsetFrame tibia_l_offset: socket_parent=/bodyset/tibia_l
          translation=(-0.00808954 -0.0035348 0.00148474) orientation=(1.64157 -1.44618 1.5708)
      SpatialTransform:
        TransformAxis rotation1: coordinates=knee_angle_l axis=(-1 0 0) LinearFunction(coefficients=1 0)
        TransformAxis rotation2: coordinates=knee_angle_l axis=(0 0 1)
          SimmSpline: x=(0 0.174533 0.349066 0.523599 0.698132 0.872665 1.0472 1.22173 1.39626 1.5708 1.74533 1.91986 2.0944)
              y=(0 0.0126809 0.0226969 0.0296054 0.0332049 0.0335354 0.0308779 0.0257548 0.0189295 0.011407 0.00443314 -0.00050475 -0.0016782)
        TransformAxis rotation3: coordinates=knee_angle_l axis=(0 1 0)
          SimmSpline: x=(0 0.174533 0.349066 0.523599 0.698132 0.872665 1.0472 1.22173 1.39626 1.5708 1.74533 1.91986 2.0944)
              y=(0 -0.059461 -0.109399 -0.150618 -0.18392 -0.210107 -0.229983 -0.24435 -0.254012 -0.25977 -0.262428 -0.262788 -0.261654)
        TransformAxis translation1: coordinates=knee_angle_l axis=(1 0 0)
          SimmSpline: x=(0 0.174533 0.349066 0.523599 0.698132 0.872665 1.0472 1.22173 1.39626 1.5708 1.74533 1.91986 2.0944)
              y=(0 5.3e-5 0.000188 0.000378 0.000597 0.000825 0.001045 0.001247 0.00142 0.001558 0.001661 0.001728 0.00176)
        TransformAxis translation2: coordinates=knee_angle_l axis=(0 1 0)
          SimmSpline: x=(0 0.174533 0.349066 0.523599 0.698132 0.872665 1.0472 1.22173 1.39626 1.5708 1.74533 1.91986 2.0944)
              y=(0 0.000301 0.000143 -0.000401 -0.001233 -0.002243 -0.003316 -0.004346 -0.005239 -0.005924 -0.006361 -0.006539 -0.00648)
        TransformAxis translation3: coordinates=knee_angle_l axis=(0 0 1)
          SimmSpline: x=(0 0.174533 0.349066 0.523599 0.698132 0.872665 1.0472 1.22173 1.39626 1.5708 1.74533 1.91986 2.0944)
              y=(0 -0.001055 -0.002061 -0.00289 -0.003447 -0.003676 -0.003559 -0.00311 -0.002373 -0.001418 -0.000329 0.000805 0.001898)
    CustomJoint patellofemoral_l: socket_parent_frame=femur_l_offset socket_child_frame=patella_l_offset
      Coordinate knee_angle_l_beta: default_value=4.877992e-5 range=(-99999.9 99999.9) clamped=false
      PhysicalOffsetFrame femur_l_offset: socket_parent=/bodyset/femur_l translation=(-0.00809 -0.40796 0.00275)
      PhysicalOffsetFrame patella_l_offset: socket_parent=/bodyset/patella_l translation=(0 0 0)
      SpatialTransform: axes_held_at_zero=(rotation2 rotation3)
        TransformAxis rotation1: coordinates=knee_angle_l_beta axis=(0 0 1)
          SimmSpline: x=(0 0.174533 0.349066 0.523599 0.698132 0.872665 1.0472 1.22173 1.39626 1.5708 1.74533 1.91986 2.0944)
              y=(0.00113686 -0.00629212 -0.105582 -0.253683 -0.414245 -0.579047 -0.747244 -0.91799 -1.09044 -1.26379 -1.43763 -1.61186 -1.78634)
        TransformAxis translation1: coordinates=knee_angle_l_beta axis=(1 0 0)
          SimmSpline: x=(0 0.174533 0.349066 0.523599 0.698132 0.872665 1.0472 1.22173 1.39626 1.5708 1.74533 1.91986 2.0944)
              y=(0.0524 0.0488 0.0437 0.0371 0.0296 0.0216 0.0136 0.0057 -0.0019 -0.0088 -0.0148 -0.0196 -0.0227)
        TransformAxis translation2: coordinates=knee_angle_l_beta axis=(0 1 0)
          SimmSpline: x=(0 0.174533 0.349066 0.523599 0.698132 0.872665 1.0472 1.22173 1.39626 1.5708 1.74533 1.91986 2.0944)
              y=(-0.0108 -0.019 -0.0263 -0.0322 -0.0367 -0.0395 -0.0408 -0.0404 -0.0384 -0.0349 -0.0301 -0.0245 -0.0187)
        TransformAxis translation3: axis=(0 0 1) Constant(value=-0.00275)
    PinJoint ankle_l: socket_parent_frame=tibia_l_offset socket_child_frame=talus_l_offset
      Coordinate ankle_angle_l: default_value=8.352658e-11 range=(-0.6981317 0.5235988) clamped=true
      PhysicalOffsetFrame tibia_l_offset: socket_parent=/bodyset/tibia_l translation=(-0.01 -0.4 0)
          orientation=(-0.175895 0.105208 0.0186622)
      PhysicalOffsetFrame talus_l_offset: socket_parent=/bodyset/talus_l translation=(0 0 0)
          orientation=(-0.175895 0.105208 0.0186622)
    PinJoint subtalar_l: socket_parent_frame=talus_l_offset socket_child_frame=calcn_l_offset
      Coordinate subtalar_angle_l: default_value=0 range=(-0.6108652 0.6108652) clamped=true
      PhysicalOffsetFrame talus_l_offset: socket_parent=/bodyset/talus_l translation=(-0.04877 -0.04195 -0.00792)
          orientation=(1.76819 -0.906223 1.8196)
      PhysicalOffsetFrame calcn_l_offset: socket_parent=/bodyset/calcn_l translation=(0 0 0)
          orientation=(1.76819 -0.906223 1.8196)
    PinJoint mtp_l: socket_parent_frame=calcn_l_offset socket_child_frame=toes_l_offset
      Coordinate mtp_angle_l: default_value=0 range=(-0.5235988 0.5235988) clamped=true locked=true
      PhysicalOffsetFrame calcn_l_offset: socket_parent=/bodyset/calcn_l translation=(0.1788 -0.002 -0.00108)
          orientation=(-3.14159 -0.619901 0)
      PhysicalOffsetFrame toes_l_offset: socket_parent=/bodyset/toes_l translation=(0 0 0)
          orientation=(-3.14159 -0.619901 0)
    CustomJoint Abdjnt: socket_parent_frame=sacrum_offset socket_child_frame=Abdomen_offset
      Coordinate Abs_FE: default_value=0 range=(-1.57 1.57) clamped=false
      Coordinate Abs_LB: default_value=0 range=(-1.57 1.57) clamped=false
      Coordinate Abs_AR: default_value=0 range=(-1.57 1.57) clamped=false
      PhysicalOffsetFrame sacrum_offset: socket_parent=/bodyset/sacrum translation=(-0.078 0.071 0)
      PhysicalOffsetFrame Abdomen_offset: socket_parent=/bodyset/Abdomen translation=(-0.09 -0.09 0)
      SpatialTransform: axes_held_at_zero=(translation1 translation2 translation3)
        TransformAxis rotation1: coordinates=Abs_FE axis=(0 0 1) LinearFunction(coefficients=1 0)
        TransformAxis rotation2: coordinates=Abs_LB axis=(1 0 0) LinearFunction(coefficients=1 0)
        TransformAxis rotation3: coordinates=Abs_AR axis=(0 1 0) LinearFunction(coefficients=1 0)
    CustomJoint L5_S1_IVDjnt: socket_parent_frame=sacrum_offset socket_child_frame=lumbar5_offset
      Coordinate L5_S1_FE: default_value=0 range=(-1.57 1.57) clamped=false
      Coordinate L5_S1_LB: default_value=0 range=(-1.57 1.57) clamped=false
      Coordinate L5_S1_AR: default_value=0 range=(-1.57 1.57) clamped=false
      PhysicalOffsetFrame sacrum_offset: socket_parent=/bodyset/sacrum translation=(-0.098 0.071 0)
          orientation=(0 0 -0.36652)
      PhysicalOffsetFrame lumbar5_offset: socket_parent=/bodyset/lumbar5 translation=(0 0 0)
      SpatialTransform: axes_held_at_zero=(translation1 translation2 translation3)
        TransformAxis rotation1: coordinates=L5_S1_FE axis=(0 0 1) LinearFunction(coefficients=1 0)
        TransformAxis rotation2: coordinates=L5_S1_LB axis=(1 0 0) LinearFunction(coefficients=1 0)
        TransformAxis rotation3: coordinates=L5_S1_AR axis=(0 1 0) LinearFunction(coefficients=1 0)
    CustomJoint L4_L5_IVDjnt: socket_parent_frame=lumbar5_offset socket_child_frame=lumbar4_offset
      Coordinate L4_L5_FE: default_value=0 range=(-1.57 1.57) clamped=false
      Coordinate L4_L5_LB: default_value=0 range=(-1.57 1.57) clamped=false
      Coordinate L4_L5_AR: default_value=0 range=(-1.57 1.57) clamped=false
      PhysicalOffsetFrame lumbar5_offset: socket_parent=/bodyset/lumbar5 translation=(0 0.039581 0)
          orientation=(0 0 0.31416)
      PhysicalOffsetFrame lumbar4_offset: socket_parent=/bodyset/lumbar4 translation=(0 0 0)
      SpatialTransform: axes_held_at_zero=(translation1 translation2 translation3)
        TransformAxis rotation1: coordinates=L4_L5_FE axis=(0 0 1) LinearFunction(coefficients=1 0)
        TransformAxis rotation2: coordinates=L4_L5_LB axis=(1 0 0) LinearFunction(coefficients=1 0)
        TransformAxis rotation3: coordinates=L4_L5_AR axis=(0 1 0) LinearFunction(coefficients=1 0)
    CustomJoint L3_L4_IVDjnt: socket_parent_frame=lumbar4_offset socket_child_frame=lumbar3_offset
      Coordinate L3_L4_FE: default_value=0 range=(-1.57 1.57) clamped=false
      Coordinate L3_L4_LB: default_value=0 range=(-1.57 1.57) clamped=false
      Coordinate L3_L4_AR: default_value=0 range=(-1.57 1.57) clamped=false
      PhysicalOffsetFrame lumbar4_offset: socket_parent=/bodyset/lumbar4 translation=(0 0.036802 0)
          orientation=(0 0 0.20944)
      PhysicalOffsetFrame lumbar3_offset: socket_parent=/bodyset/lumbar3 translation=(0 0 0)
      SpatialTransform: axes_held_at_zero=(translation1 translation2 translation3)
        TransformAxis rotation1: coordinates=L3_L4_FE axis=(0 0 1) LinearFunction(coefficients=1 0)
        TransformAxis rotation2: coordinates=L3_L4_LB axis=(1 0 0) LinearFunction(coefficients=1 0)
        TransformAxis rotation3: coordinates=L3_L4_AR axis=(0 1 0) LinearFunction(coefficients=1 0)
    CustomJoint L2_L3_IVDjnt: socket_parent_frame=lumbar3_offset socket_child_frame=lumbar2_offset
      Coordinate L2_L3_FE: default_value=0 range=(-1.57 1.57) clamped=false
      Coordinate L2_L3_LB: default_value=0 range=(-1.57 1.57) clamped=false
      Coordinate L2_L3_AR: default_value=0 range=(-1.57 1.57) clamped=false
      PhysicalOffsetFrame lumbar3_offset: socket_parent=/bodyset/lumbar3 translation=(0 0.036764 0)
          orientation=(0 0 0.12217)
      PhysicalOffsetFrame lumbar2_offset: socket_parent=/bodyset/lumbar2 translation=(0 0 0)
      SpatialTransform: axes_held_at_zero=(translation1 translation2 translation3)
        TransformAxis rotation1: coordinates=L2_L3_FE axis=(0 0 1) LinearFunction(coefficients=1 0)
        TransformAxis rotation2: coordinates=L2_L3_LB axis=(1 0 0) LinearFunction(coefficients=1 0)
        TransformAxis rotation3: coordinates=L2_L3_AR axis=(0 1 0) LinearFunction(coefficients=1 0)
    CustomJoint L1_L2_IVDjnt: socket_parent_frame=lumbar2_offset socket_child_frame=lumbar1_offset
      Coordinate L1_L2_FE: default_value=0 range=(-1.57 1.57) clamped=false
      Coordinate L1_L2_LB: default_value=0 range=(-1.57 1.57) clamped=false
      Coordinate L1_L2_AR: default_value=0 range=(-1.57 1.57) clamped=false
      PhysicalOffsetFrame lumbar2_offset: socket_parent=/bodyset/lumbar2 translation=(0 0.034054 0)
          orientation=(0 0 0.10472)
      PhysicalOffsetFrame lumbar1_offset: socket_parent=/bodyset/lumbar1 translation=(0 0 0)
      SpatialTransform: axes_held_at_zero=(translation1 translation2 translation3)
        TransformAxis rotation1: coordinates=L1_L2_FE axis=(0 0 1) LinearFunction(coefficients=1 0)
        TransformAxis rotation2: coordinates=L1_L2_LB axis=(1 0 0) LinearFunction(coefficients=1 0)
        TransformAxis rotation3: coordinates=L1_L2_AR axis=(0 1 0) LinearFunction(coefficients=1 0)
    CustomJoint T12_L1_IVDjnt: socket_parent_frame=lumbar1_offset socket_child_frame=thoracic12_offset
      Coordinate T12_L1_FE: default_value=0 range=(-1.57 1.57) clamped=false
      Coordinate T12_L1_LB: default_value=0 range=(-1.57 1.57) clamped=false
      Coordinate T12_L1_AR: default_value=0 range=(-1.57 1.57) clamped=false
      PhysicalOffsetFrame lumbar1_offset: socket_parent=/bodyset/lumbar1 translation=(0 0.035497 0)
          orientation=(0 0 -0.034907)
      PhysicalOffsetFrame thoracic12_offset: socket_parent=/bodyset/thoracic12 translation=(0 0 0)
      SpatialTransform: axes_held_at_zero=(translation1 translation2 translation3)
        TransformAxis rotation1: coordinates=T12_L1_FE axis=(0 0 1) LinearFunction(coefficients=1 0)
        TransformAxis rotation2: coordinates=T12_L1_LB axis=(1 0 0) LinearFunction(coefficients=1 0)
        TransformAxis rotation3: coordinates=T12_L1_AR axis=(0 1 0) LinearFunction(coefficients=1 0)
    CustomJoint T11_T12_IVDjnt: socket_parent_frame=thoracic12_offset socket_child_frame=thoracic11_offset
      Coordinate T11_T12_FE: default_value=0 range=(-1.57 1.57) clamped=false
      Coordinate T11_T12_LB: default_value=0 range=(-1.57 1.57) clamped=false
      Coordinate T11_T12_AR: default_value=0 range=(-1.57 1.57) clamped=false
      PhysicalOffsetFrame thoracic12_offset: socket_parent=/bodyset/thoracic12 translation=(0 0.033837 0)
          orientation=(0 0 -0.069813)
      PhysicalOffsetFrame thoracic11_offset: socket_parent=/bodyset/thoracic11 translation=(0 0 0)
      SpatialTransform: axes_held_at_zero=(translation1 translation2 translation3)
        TransformAxis rotation1: coordinates=T11_T12_FE axis=(0 0 1) LinearFunction(coefficients=1 0)
        TransformAxis rotation2: coordinates=T11_T12_LB axis=(1 0 0) LinearFunction(coefficients=1 0)
        TransformAxis rotation3: coordinates=T11_T12_AR axis=(0 1 0) LinearFunction(coefficients=1 0)
    CustomJoint T10_T11_IVDjnt: socket_parent_frame=thoracic11_offset socket_child_frame=thoracic10_offset
      Coordinate T10_T11_FE: default_value=0 range=(-1.57 1.57) clamped=false
      Coordinate T10_T11_LB: default_value=0 range=(-1.57 1.57) clamped=false
      Coordinate T10_T11_AR: default_value=0 range=(-1.57 1.57) clamped=false
      PhysicalOffsetFrame thoracic11_offset: socket_parent=/bodyset/thoracic11 translation=(0 0.029544 0)
          orientation=(0 0 -0.087266)
      PhysicalOffsetFrame thoracic10_offset: socket_parent=/bodyset/thoracic10 translation=(0 0 0)
      SpatialTransform: axes_held_at_zero=(translation1 translation2 translation3)
        TransformAxis rotation1: coordinates=T10_T11_FE axis=(0 0 1) LinearFunction(coefficients=1 0)
        TransformAxis rotation2: coordinates=T10_T11_LB axis=(1 0 0) LinearFunction(coefficients=1 0)
        TransformAxis rotation3: coordinates=T10_T11_AR axis=(0 1 0) LinearFunction(coefficients=1 0)
    CustomJoint T9_T10_IVDjnt: socket_parent_frame=thoracic10_offset socket_child_frame=thoracic9_offset
      Coordinate T9_T10_FE: default_value=0 range=(-1.57 1.57) clamped=false
      Coordinate T9_T10_LB: default_value=0 range=(-1.57 1.57) clamped=false
      Coordinate T9_T10_AR: default_value=0 range=(-1.57 1.57) clamped=false
      PhysicalOffsetFrame thoracic10_offset: socket_parent=/bodyset/thoracic10 translation=(0 0.029 0)
          orientation=(0 0 -0.069813)
      PhysicalOffsetFrame thoracic9_offset: socket_parent=/bodyset/thoracic9 translation=(0 0 0)
      SpatialTransform: axes_held_at_zero=(translation1 translation2 translation3)
        TransformAxis rotation1: coordinates=T9_T10_FE axis=(0 0 1) LinearFunction(coefficients=1 0)
        TransformAxis rotation2: coordinates=T9_T10_LB axis=(1 0 0) LinearFunction(coefficients=1 0)
        TransformAxis rotation3: coordinates=T9_T10_AR axis=(0 1 0) LinearFunction(coefficients=1 0)
    CustomJoint T8_T9_IVDjnt: socket_parent_frame=thoracic9_offset socket_child_frame=thoracic8_offset
      Coordinate T8_T9_FE: default_value=0 range=(-1.57 1.57) clamped=false
      Coordinate T8_T9_LB: default_value=0 range=(-1.57 1.57) clamped=false
      Coordinate T8_T9_AR: default_value=0 range=(-1.57 1.57) clamped=false
      PhysicalOffsetFrame thoracic9_offset: socket_parent=/bodyset/thoracic9 translation=(0 0.025135 0)
          orientation=(0 0 -0.087266)
      PhysicalOffsetFrame thoracic8_offset: socket_parent=/bodyset/thoracic8 translation=(0 0 0)
      SpatialTransform: axes_held_at_zero=(translation1 translation2 translation3)
        TransformAxis rotation1: coordinates=T8_T9_FE axis=(0 0 1) LinearFunction(coefficients=1 0)
        TransformAxis rotation2: coordinates=T8_T9_LB axis=(1 0 0) LinearFunction(coefficients=1 0)
        TransformAxis rotation3: coordinates=T8_T9_AR axis=(0 1 0) LinearFunction(coefficients=1 0)
    CustomJoint T7_T8_IVDjnt: socket_parent_frame=thoracic8_offset socket_child_frame=thoracic7_offset
      Coordinate T7_T8_FE: default_value=0 range=(-1.57 1.57) clamped=false
      Coordinate T7_T8_LB: default_value=0 range=(-1.57 1.57) clamped=false
      Coordinate T7_T8_AR: default_value=0 range=(-1.57 1.57) clamped=false
      PhysicalOffsetFrame thoracic8_offset: socket_parent=/bodyset/thoracic8 translation=(0 0.024615 0)
          orientation=(0 0 -0.10472)
      PhysicalOffsetFrame thoracic7_offset: socket_parent=/bodyset/thoracic7 translation=(0 0 0)
      SpatialTransform: axes_held_at_zero=(translation1 translation2 translation3)
        TransformAxis rotation1: coordinates=T7_T8_FE axis=(0 0 1) LinearFunction(coefficients=1 0)
        TransformAxis rotation2: coordinates=T7_T8_LB axis=(1 0 0) LinearFunction(coefficients=1 0)
        TransformAxis rotation3: coordinates=T7_T8_AR axis=(0 1 0) LinearFunction(coefficients=1 0)
    CustomJoint T6_T7_IVDjnt: socket_parent_frame=thoracic7_offset socket_child_frame=thoracic6_offset
      Coordinate T6_T7_FE: default_value=0 range=(-1.57 1.57) clamped=false
      Coordinate T6_T7_LB: default_value=0 range=(-1.57 1.57) clamped=false
      Coordinate T6_T7_AR: default_value=0 range=(-1.57 1.57) clamped=false
      PhysicalOffsetFrame thoracic7_offset: socket_parent=/bodyset/thoracic7 translation=(0 0.025934 0)
          orientation=(0 0 -0.10472)
      PhysicalOffsetFrame thoracic6_offset: socket_parent=/bodyset/thoracic6 translation=(0 0 0)
      SpatialTransform: axes_held_at_zero=(translation1 translation2 translation3)
        TransformAxis rotation1: coordinates=T6_T7_FE axis=(0 0 1) LinearFunction(coefficients=1 0)
        TransformAxis rotation2: coordinates=T6_T7_LB axis=(1 0 0) LinearFunction(coefficients=1 0)
        TransformAxis rotation3: coordinates=T6_T7_AR axis=(0 1 0) LinearFunction(coefficients=1 0)
    CustomJoint T5_T6_IVDjnt: socket_parent_frame=thoracic6_offset socket_child_frame=thoracic5_offset
      Coordinate T5_T6_FE: default_value=0 range=(-1.57 1.57) clamped=false
      Coordinate T5_T6_LB: default_value=0 range=(-1.57 1.57) clamped=false
      Coordinate T5_T6_AR: default_value=0 range=(-1.57 1.57) clamped=false
      PhysicalOffsetFrame thoracic6_offset: socket_parent=/bodyset/thoracic6 translation=(0 0.025672 0)
          orientation=(0 0 -0.10472)
      PhysicalOffsetFrame thoracic5_offset: socket_parent=/bodyset/thoracic5 translation=(0 0 0)
      SpatialTransform: axes_held_at_zero=(translation1 translation2 translation3)
        TransformAxis rotation1: coordinates=T5_T6_FE axis=(0 0 1) LinearFunction(coefficients=1 0)
        TransformAxis rotation2: coordinates=T5_T6_LB axis=(1 0 0) LinearFunction(coefficients=1 0)
        TransformAxis rotation3: coordinates=T5_T6_AR axis=(0 1 0) LinearFunction(coefficients=1 0)
    CustomJoint T4_T5_IVDjnt: socket_parent_frame=thoracic5_offset socket_child_frame=thoracic4_offset
      Coordinate T4_T5_FE: default_value=0 range=(-1.57 1.57) clamped=false
      Coordinate T4_T5_LB: default_value=0 range=(-1.57 1.57) clamped=false
      Coordinate T4_T5_AR: default_value=0 range=(-1.57 1.57) clamped=false
      PhysicalOffsetFrame thoracic5_offset: socket_parent=/bodyset/thoracic5 translation=(0 0.026267 0)
          orientation=(0 0 -0.10472)
      PhysicalOffsetFrame thoracic4_offset: socket_parent=/bodyset/thoracic4 translation=(0 0 0)
      SpatialTransform: axes_held_at_zero=(translation1 translation2 translation3)
        TransformAxis rotation1: coordinates=T4_T5_FE axis=(0 0 1) LinearFunction(coefficients=1 0)
        TransformAxis rotation2: coordinates=T4_T5_LB axis=(1 0 0) LinearFunction(coefficients=1 0)
        TransformAxis rotation3: coordinates=T4_T5_AR axis=(0 1 0) LinearFunction(coefficients=1 0)
    CustomJoint T3_T4_IVDjnt: socket_parent_frame=thoracic4_offset socket_child_frame=thoracic3_offset
      Coordinate T3_T4_FE: default_value=0 range=(-1.57 1.57) clamped=false
      Coordinate T3_T4_LB: default_value=0 range=(-1.57 1.57) clamped=false
      Coordinate T3_T4_AR: default_value=0 range=(-1.57 1.57) clamped=false
      PhysicalOffsetFrame thoracic4_offset: socket_parent=/bodyset/thoracic4 translation=(0 0.024475 0)
          orientation=(0 0 -0.069813)
      PhysicalOffsetFrame thoracic3_offset: socket_parent=/bodyset/thoracic3 translation=(0 0 0)
      SpatialTransform: axes_held_at_zero=(translation1 translation2 translation3)
        TransformAxis rotation1: coordinates=T3_T4_FE axis=(0 0 1) LinearFunction(coefficients=1 0)
        TransformAxis rotation2: coordinates=T3_T4_LB axis=(1 0 0) LinearFunction(coefficients=1 0)
        TransformAxis rotation3: coordinates=T3_T4_AR axis=(0 1 0) LinearFunction(coefficients=1 0)
    CustomJoint T2_T3_IVDjnt: socket_parent_frame=thoracic3_offset socket_child_frame=thoracic2_offset
      Coordinate T2_T3_FE: default_value=0 range=(-1.57 1.57) clamped=false
      Coordinate T2_T3_LB: default_value=0 range=(-1.57 1.57) clamped=false
      Coordinate T2_T3_AR: default_value=0 range=(-1.57 1.57) clamped=false
      PhysicalOffsetFrame thoracic3_offset: socket_parent=/bodyset/thoracic3 translation=(0 0.02221 0)
          orientation=(0 0 -0.05236)
      PhysicalOffsetFrame thoracic2_offset: socket_parent=/bodyset/thoracic2 translation=(0 0 0)
      SpatialTransform: axes_held_at_zero=(translation1 translation2 translation3)
        TransformAxis rotation1: coordinates=T2_T3_FE axis=(0 0 1) LinearFunction(coefficients=1 0)
        TransformAxis rotation2: coordinates=T2_T3_LB axis=(1 0 0) LinearFunction(coefficients=1 0)
        TransformAxis rotation3: coordinates=T2_T3_AR axis=(0 1 0) LinearFunction(coefficients=1 0)
    CustomJoint T1_T2_IVDjnt: socket_parent_frame=thoracic2_offset socket_child_frame=thoracic1_offset
      Coordinate T1_T2_FE: default_value=0 range=(-1.57 1.57) clamped=false
      Coordinate T1_T2_LB: default_value=0 range=(-1.57 1.57) clamped=false
      Coordinate T1_T2_AR: default_value=0 range=(-1.57 1.57) clamped=false
      PhysicalOffsetFrame thoracic2_offset: socket_parent=/bodyset/thoracic2 translation=(0 0.020271 0)
          orientation=(0 0 -0.017453)
      PhysicalOffsetFrame thoracic1_offset: socket_parent=/bodyset/thoracic1 translation=(0 0 0)
      SpatialTransform: axes_held_at_zero=(translation1 translation2 translation3)
        TransformAxis rotation1: coordinates=T1_T2_FE axis=(0 0 1) LinearFunction(coefficients=1 0)
        TransformAxis rotation2: coordinates=T1_T2_LB axis=(1 0 0) LinearFunction(coefficients=1 0)
        TransformAxis rotation3: coordinates=T1_T2_AR axis=(0 1 0) LinearFunction(coefficients=1 0)
    CustomJoint T1_head_neck: socket_parent_frame=thoracic1_offset socket_child_frame=head_neck_offset
      Coordinate T1_head_neck_FE: default_value=0 range=(-1.57 1.57) clamped=false
      Coordinate T1_head_neck_LB: default_value=0 range=(-1.57 1.57) clamped=false
      Coordinate T1_head_neck_AR: default_value=0 range=(-1.57 1.57) clamped=false
      PhysicalOffsetFrame thoracic1_offset: socket_parent=/bodyset/thoracic1 translation=(-0.00684 0.020271 0)
          orientation=(0 0 0.5236)
      PhysicalOffsetFrame head_neck_offset: socket_parent=/bodyset/head_neck translation=(0 0 0)
      SpatialTransform: axes_held_at_zero=(translation1 translation2 translation3)
        TransformAxis rotation1: coordinates=T1_head_neck_FE axis=(0 0 1) LinearFunction(coefficients=1 0)
        TransformAxis rotation2: coordinates=T1_head_neck_LB axis=(1 0 0) LinearFunction(coefficients=1 0)
        TransformAxis rotation3: coordinates=T1_head_neck_AR axis=(0 1 0) LinearFunction(coefficients=1 0)
    CustomJoint T12_r12R_CVjnt: socket_parent_frame=thoracic12_offset socket_child_frame=rib12_R_offset
      Coordinate T12_r12R_X: default_value=0 range=(-1.57 1.57) clamped=false
      Coordinate T12_r12R_Y: default_value=0 range=(-1.57 1.57) clamped=false locked=true
      Coordinate T12_r12R_Z: default_value=0 range=(-1.57 1.57) clamped=false locked=true
      PhysicalOffsetFrame thoracic12_offset: socket_parent=/bodyset/thoracic12
          translation=(-0.022046 0.022058 0.021423) orientation=(1.5708 3.1416 0.2748)
      PhysicalOffsetFrame rib12_R_offset: socket_parent=/bodyset/rib12_R translation=(0 0 0)
          orientation=(-1.5708 -0.349066 -2.86679)
      SpatialTransform: axes_held_at_zero=(translation1 translation2 translation3)
        TransformAxis rotation1: coordinates=T12_r12R_X axis=(1 0 0) LinearFunction(coefficients=1 0)
        TransformAxis rotation2: coordinates=T12_r12R_Y axis=(0 1 0) LinearFunction(coefficients=1 0)
        TransformAxis rotation3: coordinates=T12_r12R_Z axis=(0 0 1) LinearFunction(coefficients=1 0)
    CustomJoint T11_r11R_CVjnt: socket_parent_frame=thoracic11_offset socket_child_frame=rib11_R_offset
      Coordinate T11_r11R_X: default_value=0 range=(-1.57 1.57) clamped=false
      Coordinate T11_r11R_Y: default_value=0 range=(-1.57 1.57) clamped=false locked=true
      Coordinate T11_r11R_Z: default_value=0 range=(-1.57 1.57) clamped=false locked=true
      PhysicalOffsetFrame thoracic11_offset: socket_parent=/bodyset/thoracic11 translation=(-0.01598 0.0188 0.01679)
          orientation=(1.5708 3.1416 0.34175)
      PhysicalOffsetFrame rib11_R_offset: socket_parent=/bodyset/rib11_R translation=(0 0 0)
          orientation=(-1.5708 -0.279253 -2.79985)
      SpatialTransform: axes_held_at_zero=(translation1 translation2 translation3)
        TransformAxis rotation1: coordinates=T11_r11R_X axis=(1 0 0) LinearFunction(coefficients=1 0)
        TransformAxis rotation2: coordinates=T11_r11R_Y axis=(0 1 0) LinearFunction(coefficients=1 0)
        TransformAxis rotation3: coordinates=T11_r11R_Z axis=(0 0 1) LinearFunction(coefficients=1 0)
    CustomJoint T10_r10R_CVjnt: socket_parent_frame=thoracic10_offset socket_child_frame=rib10_R_offset
      Coordinate T10_r10R_X: default_value=0 range=(-1.57 1.57) clamped=false
      Coordinate T10_r10R_Y: default_value=0 range=(-1.57 1.57) clamped=false locked=true
      Coordinate T10_r10R_Z: default_value=0 range=(-1.57 1.57) clamped=false locked=true
      PhysicalOffsetFrame thoracic10_offset: socket_parent=/bodyset/thoracic10 translation=(-0.014883 0.029 0.01702)
          orientation=(1.5708 3.1416 0.40034)
      PhysicalOffsetFrame rib10_R_offset: socket_parent=/bodyset/rib10_R translation=(0 0 0)
          orientation=(-1.5708 -0.191986 -2.74125)
      SpatialTransform: axes_held_at_zero=(translation1 translation2 translation3)
        TransformAxis rotation1: coordinates=T10_r10R_X axis=(1 0 0) LinearFunction(coefficients=1 0)
        TransformAxis rotation2: coordinates=T10_r10R_Y axis=(0 1 0) LinearFunction(coefficients=1 0)
        TransformAxis rotation3: coordinates=T10_r10R_Z axis=(0 0 1) LinearFunction(coefficients=1 0)
    CustomJoint T9_r9R_CVjnt: socket_parent_frame=thoracic9_offset socket_child_frame=rib9_R_offset
      Coordinate T9_r9R_X: default_value=0 range=(-1.57 1.57) clamped=false
      Coordinate T9_r9R_Y: default_value=0 range=(-1.57 1.57) clamped=false locked=true
      Coordinate T9_r9R_Z: default_value=0 range=(-1.57 1.57) clamped=false locked=true
      PhysicalOffsetFrame thoracic9_offset: socket_parent=/bodyset/thoracic9 translation=(-0.011703 0.025135 0.014682)
          orientation=(1.5708 3.1416 0.45172)
      PhysicalOffsetFrame rib9_R_offset: socket_parent=/bodyset/rib9_R translation=(0 0 0)
          orientation=(-1.5708 -0.122173 -2.68987)
      SpatialTransform: axes_held_at_zero=(translation1 translation2 translation3)
        TransformAxis rotation1: coordinates=T9_r9R_X axis=(1 0 0) LinearFunction(coefficients=1 0)
        TransformAxis rotation2: coordinates=T9_r9R_Y axis=(0 1 0) LinearFunction(coefficients=1 0)
        TransformAxis rotation3: coordinates=T9_r9R_Z axis=(0 0 1) LinearFunction(coefficients=1 0)
    CustomJoint T8_r8R_CVjnt: socket_parent_frame=thoracic8_offset socket_child_frame=rib8_R_offset
      Coordinate T8_r8R_X: default_value=0 range=(-1.57 1.57) clamped=false
      Coordinate T8_r8R_Y: default_value=0 range=(-1.57 1.57) clamped=false locked=true
      Coordinate T8_r8R_Z: default_value=0 range=(-1.57 1.57) clamped=false locked=true
      PhysicalOffsetFrame thoracic8_offset: socket_parent=/bodyset/thoracic8 translation=(-0.010496 0.024615 0.014582)
          orientation=(1.5708 3.1416 0.49691)
      PhysicalOffsetFrame rib8_R_offset: socket_parent=/bodyset/rib8_R translation=(0 0 0)
          orientation=(-1.5708 -0.0349066 -2.64468)
      SpatialTransform: axes_held_at_zero=(translation1 translation2 translation3)
        TransformAxis rotation1: coordinates=T8_r8R_X axis=(1 0 0) LinearFunction(coefficients=1 0)
        TransformAxis rotation2: coordinates=T8_r8R_Y axis=(0 1 0) LinearFunction(coefficients=1 0)
        TransformAxis rotation3: coordinates=T8_r8R_Z axis=(0 0 1) LinearFunction(coefficients=1 0)
    CustomJoint T7_r7R_CVjnt: socket_parent_frame=thoracic7_offset socket_child_frame=rib7_R_offset
      Coordinate T7_r7R_X: default_value=0 range=(-1.57 1.57) clamped=false
      Coordinate T7_r7R_Y: default_value=0 range=(-1.57 1.57) clamped=false locked=true
      Coordinate T7_r7R_Z: default_value=0 range=(-1.57 1.57) clamped=false locked=true
      PhysicalOffsetFrame thoracic7_offset: socket_parent=/bodyset/thoracic7 translation=(-0.010069 0.025934 0.015672)
          orientation=(1.5708 3.1416 0.53682)
      PhysicalOffsetFrame rib7_R_offset: socket_parent=/bodyset/rib7_R translation=(0 0 0)
          orientation=(-1.5708 0.0698132 -2.60477)
      SpatialTransform: axes_held_at_zero=(translation1 translation2 translation3)
        TransformAxis rotation1: coordinates=T7_r7R_X axis=(1 0 0) LinearFunction(coefficients=1 0)
        TransformAxis rotation2: coordinates=T7_r7R_Y axis=(0 1 0) LinearFunction(coefficients=1 0)
        TransformAxis rotation3: coordinates=T7_r7R_Z axis=(0 0 1) LinearFunction(coefficients=1 0)
    CustomJoint T6_r6R_CVjnt: socket_parent_frame=thoracic6_offset socket_child_frame=rib6_R_offset
      Coordinate T6_r6R_X: default_value=0 range=(-1.57 1.57) clamped=false
      Coordinate T6_r6R_Y: default_value=0 range=(-1.57 1.57) clamped=false locked=true
      Coordinate T6_r6R_Z: default_value=0 range=(-1.57 1.57) clamped=false locked=true
      PhysicalOffsetFrame thoracic6_offset: socket_parent=/bodyset/thoracic6 translation=(-0.0088519 0.025672 0.015663)
          orientation=(1.5708 3.1416 0.57221)
      PhysicalOffsetFrame rib6_R_offset: socket_parent=/bodyset/rib6_R translation=(0 0 0)
          orientation=(-1.5708 0.174533 -2.56939)
      SpatialTransform: axes_held_at_zero=(translation1 translation2 translation3)
        TransformAxis rotation1: coordinates=T6_r6R_X axis=(1 0 0) LinearFunction(coefficients=1 0)
        TransformAxis rotation2: coordinates=T6_r6R_Y axis=(0 1 0) LinearFunction(coefficients=1 0)
        TransformAxis rotation3: coordinates=T6_r6R_Z axis=(0 0 1) LinearFunction(coefficients=1 0)
    CustomJoint T5_r5R_CVjnt: socket_parent_frame=thoracic5_offset socket_child_frame=rib5_R_offset
      Coordinate T5_r5R_X: default_value=0 range=(-1.57 1.57) clamped=false
      Coordinate T5_r5R_Y: default_value=0 range=(-1.57 1.57) clamped=false locked=true
      Coordinate T5_r5R_Z: default_value=0 range=(-1.57 1.57) clamped=false locked=true
      PhysicalOffsetFrame thoracic5_offset: socket_parent=/bodyset/thoracic5 translation=(-0.0078849 0.026267 0.016164)
          orientation=(1.5708 3.1416 0.60373)
      PhysicalOffsetFrame rib5_R_offset: socket_parent=/bodyset/rib5_R translation=(0 0 0)
          orientation=(-1.5708 0.279253 -2.53787)
      SpatialTransform: axes_held_at_zero=(translation1 translation2 translation3)
        TransformAxis rotation1: coordinates=T5_r5R_X axis=(1 0 0) LinearFunction(coefficients=1 0)
        TransformAxis rotation2: coordinates=T5_r5R_Y axis=(0 1 0) LinearFunction(coefficients=1 0)
        TransformAxis rotation3: coordinates=T5_r5R_Z axis=(0 0 1) LinearFunction(coefficients=1 0)
    CustomJoint T4_r4R_CVjnt: socket_parent_frame=thoracic4_offset socket_child_frame=rib4_R_offset
      Coordinate T4_r4R_X: default_value=0 range=(-1.57 1.57) clamped=false
      Coordinate T4_r4R_Y: default_value=0 range=(-1.57 1.57) clamped=false locked=true
      Coordinate T4_r4R_Z: default_value=0 range=(-1.57 1.57) clamped=false locked=true
      PhysicalOffsetFrame thoracic4_offset: socket_parent=/bodyset/thoracic4 translation=(-0.0061241 0.024475 0.014919)
          orientation=(1.5708 3.1416 0.63193)
      PhysicalOffsetFrame rib4_R_offset: socket_parent=/bodyset/rib4_R translation=(0 0 0)
          orientation=(-1.5708 0.383972 -2.50967)
      SpatialTransform: axes_held_at_zero=(translation1 translation2 translation3)
        TransformAxis rotation1: coordinates=T4_r4R_X axis=(1 0 0) LinearFunction(coefficients=1 0)
        TransformAxis rotation2: coordinates=T4_r4R_Y axis=(0 1 0) LinearFunction(coefficients=1 0)
        TransformAxis rotation3: coordinates=T4_r4R_Z axis=(0 0 1) LinearFunction(coefficients=1 0)
    CustomJoint T3_r3R_CVjnt: socket_parent_frame=thoracic3_offset socket_child_frame=rib3_R_offset
      Coordinate T3_r3R_X: default_value=0 range=(-1.57 1.57) clamped=false
      Coordinate T3_r3R_Y: default_value=0 range=(-1.57 1.57) clamped=false locked=true
      Coordinate T3_r3R_Z: default_value=0 range=(-1.57 1.57) clamped=false locked=true
      PhysicalOffsetFrame thoracic3_offset: socket_parent=/bodyset/thoracic3 translation=(-0.0044462 0.02221 0.013345)
          orientation=(1.5708 3.1416 0.65727)
      PhysicalOffsetFrame rib3_R_offset: socket_parent=/bodyset/rib3_R translation=(0 0 0)
          orientation=(-1.5708 0.453786 -2.48433)
      SpatialTransform: axes_held_at_zero=(translation1 translation2 translation3)
        TransformAxis rotation1: coordinates=T3_r3R_X axis=(1 0 0) LinearFunction(coefficients=1 0)
        TransformAxis rotation2: coordinates=T3_r3R_Y axis=(0 1 0) LinearFunction(coefficients=1 0)
        TransformAxis rotation3: coordinates=T3_r3R_Z axis=(0 0 1) LinearFunction(coefficients=1 0)
    CustomJoint T2_r2R_CVjnt: socket_parent_frame=thoracic2_offset socket_child_frame=rib2_R_offset
      Coordinate T2_r2R_X: default_value=0 range=(-1.57 1.57) clamped=false
      Coordinate T2_r2R_Y: default_value=0 range=(-1.57 1.57) clamped=false locked=true
      Coordinate T2_r2R_Z: default_value=0 range=(-1.57 1.57) clamped=false locked=true
      PhysicalOffsetFrame thoracic2_offset: socket_parent=/bodyset/thoracic2 translation=(-0.0030697 0.020271 0.011998)
          orientation=(1.5708 3.1416 0.68013)
      PhysicalOffsetFrame rib2_R_offset: socket_parent=/bodyset/rib2_R translation=(0 0 0)
          orientation=(-1.5708 0.506145 -2.46146)
      SpatialTransform: axes_held_at_zero=(translation1 translation2 translation3)
        TransformAxis rotation1: coordinates=T2_r2R_X axis=(1 0 0) LinearFunction(coefficients=1 0)
        TransformAxis rotation2: coordinates=T2_r2R_Y axis=(0 1 0) LinearFunction(coefficients=1 0)
        TransformAxis rotation3: coordinates=T2_r2R_Z axis=(0 0 1) LinearFunction(coefficients=1 0)
    CustomJoint T1_r1R_CVjnt: socket_parent_frame=thoracic1_offset socket_child_frame=rib1_R_offset
      Coordinate T1_r1R_X: default_value=0 range=(-1.57 1.57) clamped=false
      Coordinate T1_r1R_Y: default_value=0 range=(-1.57 1.57) clamped=false locked=true
      Coordinate T1_r1R_Z: default_value=0 range=(-1.57 1.57) clamped=false locked=true
      PhysicalOffsetFrame thoracic1_offset: socket_parent=/bodyset/thoracic1 translation=(-0.0033483 0.019498 0.018755)
          orientation=(1.5708 3.1416 0.70085)
      PhysicalOffsetFrame rib1_R_offset: socket_parent=/bodyset/rib1_R translation=(0 0 0)
          orientation=(-1.5708 0.523599 -2.44074)
      SpatialTransform: axes_held_at_zero=(translation1 translation2 translation3)
        TransformAxis rotation1: coordinates=T1_r1R_X axis=(1 0 0) LinearFunction(coefficients=1 0)
        TransformAxis rotation2: coordinates=T1_r1R_Y axis=(0 1 0) LinearFunction(coefficients=1 0)
        TransformAxis rotation3: coordinates=T1_r1R_Z axis=(0 0 1) LinearFunction(coefficients=1 0)
    CustomJoint T12_r12L_CVjnt: socket_parent_frame=thoracic12_offset socket_child_frame=rib12_L_offset
      Coordinate T12_r12L_X: default_value=0 range=(-1.57 1.57) clamped=false
      Coordinate T12_r12L_Y: default_value=0 range=(-1.57 1.57) clamped=false locked=true
      Coordinate T12_r12L_Z: default_value=0 range=(-1.57 1.57) clamped=false locked=true
      PhysicalOffsetFrame thoracic12_offset: socket_parent=/bodyset/thoracic12
          translation=(-0.022046 0.022058 -0.021423) orientation=(1.5708 3.1416 -0.2748)
      PhysicalOffsetFrame rib12_L_offset: socket_parent=/bodyset/rib12_L translation=(0 0 0)
          orientation=(-1.5708 -0.349066 2.86679)
      SpatialTransform: axes_held_at_zero=(translation1 translation2 translation3)
        TransformAxis rotation1: coordinates=T12_r12L_X axis=(1 0 0) LinearFunction(coefficients=1 0)
        TransformAxis rotation2: coordinates=T12_r12L_Y axis=(0 1 0) LinearFunction(coefficients=1 0)
        TransformAxis rotation3: coordinates=T12_r12L_Z axis=(0 0 1) LinearFunction(coefficients=1 0)
    CustomJoint T11_r11L_CVjnt: socket_parent_frame=thoracic11_offset socket_child_frame=rib11_L_offset
      Coordinate T11_r11L_X: default_value=0 range=(-1.57 1.57) clamped=false
      Coordinate T11_r11L_Y: default_value=0 range=(-1.57 1.57) clamped=false locked=true
      Coordinate T11_r11L_Z: default_value=0 range=(-1.57 1.57) clamped=false locked=true
      PhysicalOffsetFrame thoracic11_offset: socket_parent=/bodyset/thoracic11 translation=(-0.01598 0.0188 -0.01679)
          orientation=(1.5708 3.1416 -0.34175)
      PhysicalOffsetFrame rib11_L_offset: socket_parent=/bodyset/rib11_L translation=(0 0 0)
          orientation=(-1.5708 -0.279253 2.79985)
      SpatialTransform: axes_held_at_zero=(translation1 translation2 translation3)
        TransformAxis rotation1: coordinates=T11_r11L_X axis=(1 0 0) LinearFunction(coefficients=1 0)
        TransformAxis rotation2: coordinates=T11_r11L_Y axis=(0 1 0) LinearFunction(coefficients=1 0)
        TransformAxis rotation3: coordinates=T11_r11L_Z axis=(0 0 1) LinearFunction(coefficients=1 0)
    CustomJoint T10_r10L_CVjnt: socket_parent_frame=thoracic10_offset socket_child_frame=rib10_L_offset
      Coordinate T10_r10L_X: default_value=0 range=(-1.57 1.57) clamped=false
      Coordinate T10_r10L_Y: default_value=0 range=(-1.57 1.57) clamped=false locked=true
      Coordinate T10_r10L_Z: default_value=0 range=(-1.57 1.57) clamped=false locked=true
      PhysicalOffsetFrame thoracic10_offset: socket_parent=/bodyset/thoracic10 translation=(-0.014883 0.029 -0.01702)
          orientation=(1.5708 3.1416 -0.40034)
      PhysicalOffsetFrame rib10_L_offset: socket_parent=/bodyset/rib10_L translation=(0 0 0)
          orientation=(-1.5708 -0.191986 2.74125)
      SpatialTransform: axes_held_at_zero=(translation1 translation2 translation3)
        TransformAxis rotation1: coordinates=T10_r10L_X axis=(1 0 0) LinearFunction(coefficients=1 0)
        TransformAxis rotation2: coordinates=T10_r10L_Y axis=(0 1 0) LinearFunction(coefficients=1 0)
        TransformAxis rotation3: coordinates=T10_r10L_Z axis=(0 0 1) LinearFunction(coefficients=1 0)
    CustomJoint T9_r9L_CVjnt: socket_parent_frame=thoracic9_offset socket_child_frame=rib9_L_offset
      Coordinate T9_r9L_X: default_value=0 range=(-1.57 1.57) clamped=false
      Coordinate T9_r9L_Y: default_value=0 range=(-1.57 1.57) clamped=false locked=true
      Coordinate T9_r9L_Z: default_value=0 range=(-1.57 1.57) clamped=false locked=true
      PhysicalOffsetFrame thoracic9_offset: socket_parent=/bodyset/thoracic9 translation=(-0.011703 0.025135 -0.014682)
          orientation=(1.5708 3.1416 -0.45172)
      PhysicalOffsetFrame rib9_L_offset: socket_parent=/bodyset/rib9_L translation=(0 0 0)
          orientation=(-1.5708 -0.122173 2.68987)
      SpatialTransform: axes_held_at_zero=(translation1 translation2 translation3)
        TransformAxis rotation1: coordinates=T9_r9L_X axis=(1 0 0) LinearFunction(coefficients=1 0)
        TransformAxis rotation2: coordinates=T9_r9L_Y axis=(0 1 0) LinearFunction(coefficients=1 0)
        TransformAxis rotation3: coordinates=T9_r9L_Z axis=(0 0 1) LinearFunction(coefficients=1 0)
    CustomJoint T8_r8L_CVjnt: socket_parent_frame=thoracic8_offset socket_child_frame=rib8_L_offset
      Coordinate T8_r8L_X: default_value=0 range=(-1.57 1.57) clamped=false
      Coordinate T8_r8L_Y: default_value=0 range=(-1.57 1.57) clamped=false locked=true
      Coordinate T8_r8L_Z: default_value=0 range=(-1.57 1.57) clamped=false locked=true
      PhysicalOffsetFrame thoracic8_offset: socket_parent=/bodyset/thoracic8 translation=(-0.010496 0.024615 -0.014582)
          orientation=(1.5708 3.1416 -0.49691)
      PhysicalOffsetFrame rib8_L_offset: socket_parent=/bodyset/rib8_L translation=(0 0 0)
          orientation=(-1.5708 -0.0349066 2.64468)
      SpatialTransform: axes_held_at_zero=(translation1 translation2 translation3)
        TransformAxis rotation1: coordinates=T8_r8L_X axis=(1 0 0) LinearFunction(coefficients=1 0)
        TransformAxis rotation2: coordinates=T8_r8L_Y axis=(0 1 0) LinearFunction(coefficients=1 0)
        TransformAxis rotation3: coordinates=T8_r8L_Z axis=(0 0 1) LinearFunction(coefficients=1 0)
    CustomJoint T7_r7L_CVjnt: socket_parent_frame=thoracic7_offset socket_child_frame=rib7_L_offset
      Coordinate T7_r7L_X: default_value=0 range=(-1.57 1.57) clamped=false
      Coordinate T7_r7L_Y: default_value=0 range=(-1.57 1.57) clamped=false locked=true
      Coordinate T7_r7L_Z: default_value=0 range=(-1.57 1.57) clamped=false locked=true
      PhysicalOffsetFrame thoracic7_offset: socket_parent=/bodyset/thoracic7 translation=(-0.010069 0.025934 -0.015672)
          orientation=(1.5708 3.1416 -0.53682)
      PhysicalOffsetFrame rib7_L_offset: socket_parent=/bodyset/rib7_L translation=(0 0 0)
          orientation=(-1.5708 0.0698132 2.60477)
      SpatialTransform: axes_held_at_zero=(translation1 translation2 translation3)
        TransformAxis rotation1: coordinates=T7_r7L_X axis=(1 0 0) LinearFunction(coefficients=1 0)
        TransformAxis rotation2: coordinates=T7_r7L_Y axis=(0 1 0) LinearFunction(coefficients=1 0)
        TransformAxis rotation3: coordinates=T7_r7L_Z axis=(0 0 1) LinearFunction(coefficients=1 0)
    CustomJoint T6_r6L_CVjnt: socket_parent_frame=thoracic6_offset socket_child_frame=rib6_L_offset
      Coordinate T6_r6L_X: default_value=0 range=(-1.57 1.57) clamped=false
      Coordinate T6_r6L_Y: default_value=0 range=(-1.57 1.57) clamped=false locked=true
      Coordinate T6_r6L_Z: default_value=0 range=(-1.57 1.57) clamped=false locked=true
      PhysicalOffsetFrame thoracic6_offset: socket_parent=/bodyset/thoracic6
          translation=(-0.0088519 0.025672 -0.015663) orientation=(1.5708 3.1416 -0.57221)
      PhysicalOffsetFrame rib6_L_offset: socket_parent=/bodyset/rib6_L translation=(0 0 0)
          orientation=(-1.5708 0.174533 2.56939)
      SpatialTransform: axes_held_at_zero=(translation1 translation2 translation3)
        TransformAxis rotation1: coordinates=T6_r6L_X axis=(1 0 0) LinearFunction(coefficients=1 0)
        TransformAxis rotation2: coordinates=T6_r6L_Y axis=(0 1 0) LinearFunction(coefficients=1 0)
        TransformAxis rotation3: coordinates=T6_r6L_Z axis=(0 0 1) LinearFunction(coefficients=1 0)
    CustomJoint T5_r5L_CVjnt: socket_parent_frame=thoracic5_offset socket_child_frame=rib5_L_offset
      Coordinate T5_r5L_X: default_value=0 range=(-1.57 1.57) clamped=false
      Coordinate T5_r5L_Y: default_value=0 range=(-1.57 1.57) clamped=false locked=true
      Coordinate T5_r5L_Z: default_value=0 range=(-1.57 1.57) clamped=false locked=true
      PhysicalOffsetFrame thoracic5_offset: socket_parent=/bodyset/thoracic5
          translation=(-0.0078849 0.026267 -0.016164) orientation=(1.5708 3.1416 -0.60373)
      PhysicalOffsetFrame rib5_L_offset: socket_parent=/bodyset/rib5_L translation=(0 0 0)
          orientation=(-1.5708 0.279253 2.53787)
      SpatialTransform: axes_held_at_zero=(translation1 translation2 translation3)
        TransformAxis rotation1: coordinates=T5_r5L_X axis=(1 0 0) LinearFunction(coefficients=1 0)
        TransformAxis rotation2: coordinates=T5_r5L_Y axis=(0 1 0) LinearFunction(coefficients=1 0)
        TransformAxis rotation3: coordinates=T5_r5L_Z axis=(0 0 1) LinearFunction(coefficients=1 0)
    CustomJoint T4_r4L_CVjnt: socket_parent_frame=thoracic4_offset socket_child_frame=rib4_L_offset
      Coordinate T4_r4L_X: default_value=0 range=(-1.57 1.57) clamped=false
      Coordinate T4_r4L_Y: default_value=0 range=(-1.57 1.57) clamped=false locked=true
      Coordinate T4_r4L_Z: default_value=0 range=(-1.57 1.57) clamped=false locked=true
      PhysicalOffsetFrame thoracic4_offset: socket_parent=/bodyset/thoracic4
          translation=(-0.0061241 0.024475 -0.014919) orientation=(1.5708 3.1416 -0.63193)
      PhysicalOffsetFrame rib4_L_offset: socket_parent=/bodyset/rib4_L translation=(0 0 0)
          orientation=(-1.5708 0.383972 2.50967)
      SpatialTransform: axes_held_at_zero=(translation1 translation2 translation3)
        TransformAxis rotation1: coordinates=T4_r4L_X axis=(1 0 0) LinearFunction(coefficients=1 0)
        TransformAxis rotation2: coordinates=T4_r4L_Y axis=(0 1 0) LinearFunction(coefficients=1 0)
        TransformAxis rotation3: coordinates=T4_r4L_Z axis=(0 0 1) LinearFunction(coefficients=1 0)
    CustomJoint T3_r3L_CVjnt: socket_parent_frame=thoracic3_offset socket_child_frame=rib3_L_offset
      Coordinate T3_r3L_X: default_value=0 range=(-1.57 1.57) clamped=false
      Coordinate T3_r3L_Y: default_value=0 range=(-1.57 1.57) clamped=false locked=true
      Coordinate T3_r3L_Z: default_value=0 range=(-1.57 1.57) clamped=false locked=true
      PhysicalOffsetFrame thoracic3_offset: socket_parent=/bodyset/thoracic3 translation=(-0.0044462 0.02221 -0.013345)
          orientation=(1.5708 3.1416 -0.65727)
      PhysicalOffsetFrame rib3_L_offset: socket_parent=/bodyset/rib3_L translation=(0 0 0)
          orientation=(-1.5708 0.453786 2.48433)
      SpatialTransform: axes_held_at_zero=(translation1 translation2 translation3)
        TransformAxis rotation1: coordinates=T3_r3L_X axis=(1 0 0) LinearFunction(coefficients=1 0)
        TransformAxis rotation2: coordinates=T3_r3L_Y axis=(0 1 0) LinearFunction(coefficients=1 0)
        TransformAxis rotation3: coordinates=T3_r3L_Z axis=(0 0 1) LinearFunction(coefficients=1 0)
    CustomJoint T2_r2L_CVjnt: socket_parent_frame=thoracic2_offset socket_child_frame=rib2_L_offset
      Coordinate T2_r2L_X: default_value=0 range=(-1.57 1.57) clamped=false
      Coordinate T2_r2L_Y: default_value=0 range=(-1.57 1.57) clamped=false locked=true
      Coordinate T2_r2L_Z: default_value=0 range=(-1.57 1.57) clamped=false locked=true
      PhysicalOffsetFrame thoracic2_offset: socket_parent=/bodyset/thoracic2
          translation=(-0.0030697 0.020271 -0.011998) orientation=(1.5708 3.1416 -0.68013)
      PhysicalOffsetFrame rib2_L_offset: socket_parent=/bodyset/rib2_L translation=(0 0 0)
          orientation=(-1.5708 0.506145 2.46146)
      SpatialTransform: axes_held_at_zero=(translation1 translation2 translation3)
        TransformAxis rotation1: coordinates=T2_r2L_X axis=(1 0 0) LinearFunction(coefficients=1 0)
        TransformAxis rotation2: coordinates=T2_r2L_Y axis=(0 1 0) LinearFunction(coefficients=1 0)
        TransformAxis rotation3: coordinates=T2_r2L_Z axis=(0 0 1) LinearFunction(coefficients=1 0)
    CustomJoint T1_r1L_CVjnt: socket_parent_frame=thoracic1_offset socket_child_frame=rib1_L_offset
      Coordinate T1_r1L_X: default_value=0 range=(-1.57 1.57) clamped=false
      Coordinate T1_r1L_Y: default_value=0 range=(-1.57 1.57) clamped=false locked=true
      Coordinate T1_r1L_Z: default_value=0 range=(-1.57 1.57) clamped=false locked=true
      PhysicalOffsetFrame thoracic1_offset: socket_parent=/bodyset/thoracic1
          translation=(-0.0033483 0.019498 -0.018755) orientation=(1.5708 3.1416 -0.70085)
      PhysicalOffsetFrame rib1_L_offset: socket_parent=/bodyset/rib1_L translation=(0 0 0)
          orientation=(-1.5708 0.523599 2.44074)
      SpatialTransform: axes_held_at_zero=(translation1 translation2 translation3)
        TransformAxis rotation1: coordinates=T1_r1L_X axis=(1 0 0) LinearFunction(coefficients=1 0)
        TransformAxis rotation2: coordinates=T1_r1L_Y axis=(0 1 0) LinearFunction(coefficients=1 0)
        TransformAxis rotation3: coordinates=T1_r1L_Z axis=(0 0 1) LinearFunction(coefficients=1 0)
    CustomJoint r1R_sterR_jnt: socket_parent_frame=rib1_R_offset socket_child_frame=sternum_offset
      Coordinate SternumRotZ: default_value=0 range=(-1.57 1.57) clamped=false
      Coordinate SternumRotX: default_value=0 range=(-1.57 1.57) clamped=false
      Coordinate SternumRotY: default_value=0 range=(-1.57 1.57) clamped=false
      Coordinate SternumX: default_value=0 range=(-9999 9999) clamped=false
      Coordinate SternumY: default_value=0 range=(-9999 9999) clamped=false
      Coordinate SternumZ: default_value=0 range=(-9999 9999) clamped=false
      PhysicalOffsetFrame rib1_R_offset: socket_parent=/bodyset/rib1_R translation=(0.0684394 -0.0547531 0.0147941)
      PhysicalOffsetFrame sternum_offset: socket_parent=/bodyset/sternum translation=(0 0 0)
      SpatialTransform:
        TransformAxis rotation1: coordinates=SternumRotZ axis=(0 0 1) LinearFunction(coefficients=1 0)
        TransformAxis rotation2: coordinates=SternumRotX axis=(1 0 0) LinearFunction(coefficients=1 0)
        TransformAxis rotation3: coordinates=SternumRotY axis=(0 1 0) LinearFunction(coefficients=1 0)
        TransformAxis translation1: coordinates=SternumX axis=(1 0 0) LinearFunction(coefficients=1 0)
        TransformAxis translation2: coordinates=SternumY axis=(0 1 0) LinearFunction(coefficients=1 0)
        TransformAxis translation3: coordinates=SternumZ axis=(0 0 1) LinearFunction(coefficients=1 0)
    WeldJoint sterR_clavR_jnt: socket_parent_frame=sternum_offset socket_child_frame=clavicle_R_offset
      PhysicalOffsetFrame sternum_offset: socket_parent=/bodyset/sternum translation=(0 0 0) orientation=(0 -0.2618 0)
      PhysicalOffsetFrame clavicle_R_offset: socket_parent=/bodyset/clavicle_R translation=(0 0 0)
    WeldJoint clavR_scapR_jnt: socket_parent_frame=clavicle_R_offset socket_child_frame=scapula_R_offset
      PhysicalOffsetFrame clavicle_R_offset: socket_parent=/bodyset/clavicle_R translation=(-0.01433 0.02007 0.13554)
          orientation=(0 0.34907 0)
      PhysicalOffsetFrame scapula_R_offset: socket_parent=/bodyset/scapula_R translation=(0 0 0)
    CustomJoint shoulder_R: socket_parent_frame=scapula_R_offset socket_child_frame=humerus_r_offset
      Coordinate shoulder_elv_r: default_value=0 range=(0 2.0071) clamped=true
      Coordinate shoulder_rot_r: default_value=0 range=(-0.7854 0.7854) clamped=true
      Coordinate elv_angle_r: default_value=0 range=(-1.5708 1.5708) clamped=true
      PhysicalOffsetFrame scapula_R_offset: socket_parent=/bodyset/scapula_R translation=(-0.009595 -0.034 0.009)
          orientation=(0 -0.087266 0)
      PhysicalOffsetFrame humerus_r_offset: socket_parent=/bodyset/humerus_r translation=(0 0 0)
      SpatialTransform: axes_held_at_zero=(translation1 translation2 translation3)
        TransformAxis rotation1: coordinates=shoulder_elv_r axis=(-0.99826 0.0023 0.058898)
            LinearFunction(coefficients=1 0)
        TransformAxis rotation2: coordinates=shoulder_rot_r axis=(0.0048 0.99909 0.0424)
            LinearFunction(coefficients=1 0)
        TransformAxis rotation3: coordinates=elv_angle_r axis=(0.0048 0.0424 0.99909) LinearFunction(coefficients=1 0)
    PinJoint elbow_r: socket_parent_frame=humerus_r_offset socket_child_frame=ulna_r_offset
      Coordinate elbow_flex_r: default_value=0 range=(0 2.618) clamped=true
      PhysicalOffsetFrame humerus_r_offset: socket_parent=/bodyset/humerus_r translation=(0.013144 -0.286273 -0.009595)
          orientation=(-0.0228627 0.228018 0.0051689)
      PhysicalOffsetFrame ulna_r_offset: socket_parent=/bodyset/ulna_r translation=(0 0 0)
          orientation=(-0.0228627 0.228018 0.0051689)
    PinJoint radioulnar_r: socket_parent_frame=ulna_r_offset socket_child_frame=radius_r_offset
      Coordinate pro_sup_r: default_value=0 range=(0 1.570796) clamped=true
      PhysicalOffsetFrame ulna_r_offset: socket_parent=/bodyset/ulna_r translation=(-0.006727 -0.013007 0.026083)
          orientation=(-1.56884 0.056428 1.53614)
      PhysicalOffsetFrame radius_r_offset: socket_parent=/bodyset/radius_r translation=(0 0 0)
          orientation=(-1.56884 0.056428 1.53614)
    UniversalJoint radius_hand_r: socket_parent_frame=radius_r_offset socket_child_frame=hand_r_offset
      Coordinate wrist_flex_r: default_value=0 range=(-1.22173 1.22173) clamped=true locked=true
      Coordinate wrist_dev_r: default_value=0 range=(-0.4363323 0.6108652) clamped=true locked=true
      PhysicalOffsetFrame radius_r_offset: socket_parent=/bodyset/radius_r translation=(-0.008797 -0.235841 0.01361)
          orientation=(-1.5708 0 -1.5708)
      PhysicalOffsetFrame hand_r_offset: socket_parent=/bodyset/hand_r translation=(0 0 0)
          orientation=(-1.5708 0 -1.5708)
    WeldJoint sterL_clavL_jnt: socket_parent_frame=sternum_offset socket_child_frame=clavicle_L_offset
      PhysicalOffsetFrame sternum_offset: socket_parent=/bodyset/sternum translation=(0 0 -0.0670986)
          orientation=(0 0.2618 0)
      PhysicalOffsetFrame clavicle_L_offset: socket_parent=/bodyset/clavicle_L translation=(0 0 0)
    WeldJoint clavL_scapL_jnt: socket_parent_frame=clavicle_L_offset socket_child_frame=scapula_L_offset
      PhysicalOffsetFrame clavicle_L_offset: socket_parent=/bodyset/clavicle_L translation=(-0.01433 0.02007 -0.13554)
          orientation=(0 -0.34907 0)
      PhysicalOffsetFrame scapula_L_offset: socket_parent=/bodyset/scapula_L translation=(0 0 0)
    CustomJoint shoulder_L: socket_parent_frame=scapula_L_offset socket_child_frame=humerus_l_offset
      Coordinate shoulder_elv_l: default_value=0 range=(-2.0071 0) clamped=true
      Coordinate shoulder_rot_l: default_value=0 range=(-0.7854 0.7854) clamped=true
      Coordinate elv_angle_l: default_value=0 range=(-1.5708 1.5708) clamped=true
      PhysicalOffsetFrame scapula_L_offset: socket_parent=/bodyset/scapula_L translation=(-0.009595 -0.034 -0.009)
          orientation=(0 0.087266 0)
      PhysicalOffsetFrame humerus_l_offset: socket_parent=/bodyset/humerus_l translation=(0 0 0)
      SpatialTransform: axes_held_at_zero=(translation1 translation2 translation3)
        TransformAxis rotation1: coordinates=shoulder_elv_l axis=(-0.99826 0.0023 0.058898)
            LinearFunction(coefficients=1 0)
        TransformAxis rotation2: coordinates=shoulder_rot_l axis=(0.0048 0.99909 0.0424)
            LinearFunction(coefficients=1 0)
        TransformAxis rotation3: coordinates=elv_angle_l axis=(0.0048 0.0424 0.99909) LinearFunction(coefficients=1 0)
    PinJoint elbow_l: socket_parent_frame=humerus_l_offset socket_child_frame=ulna_l_offset
      Coordinate elbow_flex_l: default_value=0 range=(0 2.618) clamped=true
      PhysicalOffsetFrame humerus_l_offset: socket_parent=/bodyset/humerus_l translation=(0.013144 -0.286273 0.009595)
          orientation=(0.0228627 -0.228018 0.0051689)
      PhysicalOffsetFrame ulna_l_offset: socket_parent=/bodyset/ulna_l translation=(0 0 0)
          orientation=(0.0228627 -0.228018 0.0051689)
    PinJoint radioulnar_l: socket_parent_frame=ulna_l_offset socket_child_frame=radius_l_offset
      Coordinate pro_sup_l: default_value=0 range=(0 1.570796) clamped=true
      PhysicalOffsetFrame ulna_l_offset: socket_parent=/bodyset/ulna_l translation=(-0.006727 -0.013007 -0.026083)
          orientation=(1.56884 -0.056428 1.53614)
      PhysicalOffsetFrame radius_l_offset: socket_parent=/bodyset/radius_l translation=(0 0 0)
          orientation=(1.56884 -0.056428 1.53614)
    UniversalJoint radius_hand_l: socket_parent_frame=radius_l_offset socket_child_frame=hand_l_offset
      Coordinate wrist_flex_l: default_value=0 range=(-1.22173 1.22173) clamped=true locked=true
      Coordinate wrist_dev_l: default_value=0 range=(-0.4363323 0.6108652) clamped=true locked=true
      PhysicalOffsetFrame radius_l_offset: socket_parent=/bodyset/radius_l translation=(-0.008797 -0.235841 -0.01361)
          orientation=(1.5708 0 1.5708)
      PhysicalOffsetFrame hand_l_offset: socket_parent=/bodyset/hand_l translation=(0 0 0)
          orientation=(1.5708 0 1.5708)
    WeldJoint Abd_L_L1: socket_parent_frame=lumbar1_offset socket_child_frame=Abd_L_L1_offset
      PhysicalOffsetFrame lumbar1_offset: socket_parent=/bodyset/lumbar1 translation=(0 0 0) orientation=(0 0 -0.38397)
      PhysicalOffsetFrame Abd_L_L1_offset: socket_parent=/bodyset/Abd_L_L1 translation=(0 0 0)
    WeldJoint Abd_L_L2: socket_parent_frame=lumbar2_offset socket_child_frame=Abd_L_L2_offset
      PhysicalOffsetFrame lumbar2_offset: socket_parent=/bodyset/lumbar2 translation=(0 0 0) orientation=(0 0 -0.27925)
      PhysicalOffsetFrame Abd_L_L2_offset: socket_parent=/bodyset/Abd_L_L2 translation=(0 0 0)
    WeldJoint Abd_L_L3: socket_parent_frame=lumbar3_offset socket_child_frame=Abd_L_L3_offset
      PhysicalOffsetFrame lumbar3_offset: socket_parent=/bodyset/lumbar3 translation=(0 0 0) orientation=(0 0 -0.15708)
      PhysicalOffsetFrame Abd_L_L3_offset: socket_parent=/bodyset/Abd_L_L3 translation=(0 0 0)
    WeldJoint Abd_L_L4: socket_parent_frame=lumbar4_offset socket_child_frame=Abd_L_L4_offset
      PhysicalOffsetFrame lumbar4_offset: socket_parent=/bodyset/lumbar4 translation=(0 0 0) orientation=(0 0 0.05236)
      PhysicalOffsetFrame Abd_L_L4_offset: socket_parent=/bodyset/Abd_L_L4 translation=(0 0 0)
    WeldJoint Abd_L_L5: socket_parent_frame=lumbar5_offset socket_child_frame=Abd_L_L5_offset
      PhysicalOffsetFrame lumbar5_offset: socket_parent=/bodyset/lumbar5 translation=(0 0 0) orientation=(0 0 0.36652)
      PhysicalOffsetFrame Abd_L_L5_offset: socket_parent=/bodyset/Abd_L_L5 translation=(0 0 0)
    WeldJoint Abd_R_L1: socket_parent_frame=lumbar1_offset socket_child_frame=Abd_R_L1_offset
      PhysicalOffsetFrame lumbar1_offset: socket_parent=/bodyset/lumbar1 translation=(0 0 0) orientation=(0 0 -0.38397)
      PhysicalOffsetFrame Abd_R_L1_offset: socket_parent=/bodyset/Abd_R_L1 translation=(0 0 0)
    WeldJoint Abd_R_L2: socket_parent_frame=lumbar2_offset socket_child_frame=Abd_R_L2_offset
      PhysicalOffsetFrame lumbar2_offset: socket_parent=/bodyset/lumbar2 translation=(0 0 0) orientation=(0 0 -0.27925)
      PhysicalOffsetFrame Abd_R_L2_offset: socket_parent=/bodyset/Abd_R_L2 translation=(0 0 0)
    WeldJoint Abd_R_L3: socket_parent_frame=lumbar3_offset socket_child_frame=Abd_R_L3_offset
      PhysicalOffsetFrame lumbar3_offset: socket_parent=/bodyset/lumbar3 translation=(0 0 0) orientation=(0 0 -0.15708)
      PhysicalOffsetFrame Abd_R_L3_offset: socket_parent=/bodyset/Abd_R_L3 translation=(0 0 0)
    WeldJoint Abd_R_L4: socket_parent_frame=lumbar4_offset socket_child_frame=Abd_R_L4_offset
      PhysicalOffsetFrame lumbar4_offset: socket_parent=/bodyset/lumbar4 translation=(0 0 0) orientation=(0 0 0.05236)
      PhysicalOffsetFrame Abd_R_L4_offset: socket_parent=/bodyset/Abd_R_L4 translation=(0 0 0)
    WeldJoint Abd_R_L5: socket_parent_frame=lumbar5_offset socket_child_frame=Abd_R_L5_offset
      PhysicalOffsetFrame lumbar5_offset: socket_parent=/bodyset/lumbar5 translation=(0 0 0) orientation=(0 0 0.36652)
      PhysicalOffsetFrame Abd_R_L5_offset: socket_parent=/bodyset/Abd_R_L5 translation=(0 0 0)
  ConstraintSet:
    CoordinateCouplerConstraint patellofemoral_knee_angle_r_con: independent_coordinate_names=knee_angle_r
        dependent_coordinate_name=knee_angle_r_beta scale_factor=1
        coupled_coordinates_function=LinearFunction(coefficients=1 0)
    CoordinateCouplerConstraint patellofemoral_knee_angle_l_con: independent_coordinate_names=knee_angle_l
        dependent_coordinate_name=knee_angle_l_beta scale_factor=1
        coupled_coordinates_function=LinearFunction(coefficients=1 0)
  ForceSet:
    Millard2012EquilibriumMuscle [values shared by the 98 below unless stated]: default_activation=0.01
        minimum_activation=0.01
      ActiveForceLengthCurve: min_norm_active_fiber_length=0.25 transition_norm_fiber_length=0.77
          max_norm_active_fiber_length=1.9 shallow_ascending_slope=0.75 minimum_value=0
      ForceVelocityCurve: concentric_slope_at_vmax=0 concentric_slope_near_vmax=0.25 isometric_slope=5
          eccentric_slope_at_vmax=0 eccentric_slope_near_vmax=0.15 max_eccentric_velocity_force_multiplier=1.4
      FiberForceLengthCurve: strain_at_zero_force=0 strain_at_one_norm_force=0.7
      TendonForceLengthCurve
    Millard2012EquilibriumMuscle addbrev_r: max_isometric_force=625.8197 optimal_fiber_length=0.1031
        tendon_slack_length=0.03545029 pennation_angle_at_optimal=0.1147809 [radians] ignore_tendon_compliance=true
        fiber_damping=0.01
      PathPoint P1: pelvis (-0.0191 -0.094 0.0154)
      PathPoint P2: femur_r (-0.002 -0.118 0.0249)
      PathWrap: wrap_object=AB_at_femshaft_r method=hybrid
    Millard2012EquilibriumMuscle addlong_r: max_isometric_force=916.8 optimal_fiber_length=0.1082
        tendon_slack_length=0.1317994 pennation_angle_at_optimal=0.1377704 fiber_damping=0.01
      PathPoint P1: pelvis (-0.00758 -0.0889 0.01888)
      PathPoint P2: femur_r (0.01126 -0.23937 0.01583)
      PathWrap: wrap_object=AL_at_femshaft_r method=hybrid
    Millard2012EquilibriumMuscle addmagDist_r: max_isometric_force=597.2951 optimal_fiber_length=0.1772
        tendon_slack_length=0.0873807 pennation_angle_at_optimal=0.194705 ignore_tendon_compliance=true
        fiber_damping=0.01
      PathPoint P1: pelvis (-0.07404 -0.12767 0.03982)
      PathPoint P2: femur_r (0.01125 -0.2625 0.0193)
      PathWrap: wrap_object=AMdist_at_femshaft_r method=hybrid
    Millard2012EquilibriumMuscle addmagIsch_r: max_isometric_force=597.2951 optimal_fiber_length=0.1562
        tendon_slack_length=0.216343 pennation_angle_at_optimal=0.1680443 fiber_damping=0.01
      PathPoint P1: pelvis (-0.08962 -0.12976 0.04171)
      PathPoint P2: femur_r (0.00481 -0.38797 -0.03273)
      PathWrap: wrap_object=AMisch_at_condyles_r method=hybrid
    Millard2012EquilibriumMuscle addmagMid_r: max_isometric_force=597.2951 optimal_fiber_length=0.1377
        tendon_slack_length=0.0466277 pennation_angle_at_optimal=0.2073076 ignore_tendon_compliance=true
        fiber_damping=0.01
      PathPoint P1: pelvis (-0.05266 -0.12075 0.02854)
      PathPoint P2: femur_r (0.00242 -0.1624 0.02922)
      PathWrap: wrap_object=AMmid_at_femshaft_r method=hybrid
    Millard2012EquilibriumMuscle addmagProx_r: max_isometric_force=597.2951 optimal_fiber_length=0.1056
        tendon_slack_length=0.0403241 pennation_angle_at_optimal=0.3114833 ignore_tendon_compliance=true
        fiber_damping=0.01
      PathPoint P1: pelvis (-0.03098 -0.10755 0.01365)
      PathPoint P2: femur_r (-0.01527 -0.07886 0.03202)
      PathWrap: wrap_object=AMprox_at_femshaft_r method=hybrid
    Millard2012EquilibriumMuscle bflh140_r: max_isometric_force=1313.184 optimal_fiber_length=0.0976
        tendon_slack_length=0.3325 pennation_angle_at_optimal=0.1759182 fiber_damping=0.01
      PathPoint bflh_r-P1: pelvis (-0.104 -0.1191 0.0586)
      PathPoint bflh_r-P2: tibia_r (-0.03436 -0.03648 0.03618)
      PathPoint bflh_r-P3: tibia_r (-0.02704 -0.05008 0.03476)
    Millard2012EquilibriumMuscle bfsh140_r: max_isometric_force=557.1148 optimal_fiber_length=0.1103
        tendon_slack_length=0.1058172 pennation_angle_at_optimal=0.2642232 ignore_tendon_compliance=true
        fiber_damping=0.01
      PathPoint bfsh_r-P1: femur_r (0.005 -0.2111 0.0234)
      PathPoint bfsh_r-P2: tibia_r (-0.02866 -0.03284 0.03204)
      PathWrap: wrap_object=BF140_at_gastroc_r method=hybrid
    Millard2012EquilibriumMuscle edl_r: max_isometric_force=603.4982 optimal_fiber_length=0.0693
        tendon_slack_length=0.3688752 pennation_angle_at_optimal=0.2182582 fiber_damping=0.01
      PathPoint P1: tibia_r (-0.016 -0.1157 0.0205)
      PathPoint P2: tibia_r (0.0164 -0.376 0.0112)
      PathPoint P3: calcn_r (0.0919 0.036 0.0008)
      PathPoint P4: calcn_r (0.1616 0.0055 0.013)
      PathPoint P5: toes_r (0.0003 0.0047 0.0153)
      PathPoint P6: toes_r (0.0443 -0.0004 0.025)
    Millard2012EquilibriumMuscle ehl_r: max_isometric_force=285.8675 optimal_fiber_length=0.0748
        tendon_slack_length=0.3267953 pennation_angle_at_optimal=0.1972681 fiber_damping=0.01
      PathPoint P1: tibia_r (-0.014 -0.155 0.0189)
      PathPoint P2: tibia_r (0.0071 -0.2909 0.0164)
      PathPoint P3: tibia_r (0.02 -0.3693 -0.0028)
      PathPoint P4: calcn_r (0.097 0.0389 -0.0211)
      PathPoint P5: calcn_r (0.1293 0.0309 -0.0257)
      PathPoint P6: calcn_r (0.1734 0.0139 -0.028)
      PathPoint P7: toes_r (0.0298 0.0041 -0.0245)
      PathPoint P8: toes_r (0.0563 0.0034 -0.0186)
    Millard2012EquilibriumMuscle fdl_r: max_isometric_force=423.177 optimal_fiber_length=0.0446
        tendon_slack_length=0.3787729 pennation_angle_at_optimal=0.2248391 fiber_damping=0.01
      PathPoint P1: tibia_r (-0.0023 -0.1832 -0.0018)
      PathPoint P2: tibia_r (-0.0176 -0.3645 -0.0124)
      PathPoint P3: calcn_r (0.0436 0.0315 -0.028)
      PathPoint P4: calcn_r (0.0708 0.0176 -0.0263)
      PathPoint P5: calcn_r (0.1658 -0.0081 0.0116)
      PathPoint P6: toes_r (-0.0019 -0.0078 0.0147)
      PathPoint P7: toes_r (0.0285 -0.0071 0.0215)
      PathPoint P8: toes_r (0.0441 -0.006 0.0242)
    Millard2012EquilibriumMuscle fhl_r: max_isometric_force=907.8393 optimal_fiber_length=0.0527
        tendon_slack_length=0.3543397 pennation_angle_at_optimal=0.2580255 fiber_damping=0.01
      PathPoint P1: tibia_r (-0.031 -0.2163 0.02)
      PathPoint P2: tibia_r (-0.0242 -0.3671 -0.0076)
      PathPoint P3: calcn_r (0.0374 0.0276 -0.0241)
      PathPoint P4: calcn_r (0.1038 0.0068 -0.0256)
      PathPoint P5: calcn_r (0.1726 -0.0053 -0.0269)
      PathPoint P6: toes_r (0.0155 -0.0064 -0.0265)
      PathPoint P7: toes_r (0.0562 -0.0102 -0.0181)
    Millard2012EquilibriumMuscle gaslat140_r: max_isometric_force=1575.059 optimal_fiber_length=0.069
        tendon_slack_length=0.374 pennation_angle_at_optimal=0.2102268 fiber_damping=0.01
      PathPoint gaslat_r-P1: femur_r (0.002 -0.381 0.02059)
      PathPoint gaslat_r-P2: calcn_r (0.0044 0.031 -0.0053)
      PathWrap: wrap_object=GasLat_at_shank_r method=hybrid
      PathWrap pathwrap_0: wrap_object=GasLat_at_condyles_r method=hybrid
    Millard2012EquilibriumMuscle gasmed_r: max_isometric_force=3115.515 optimal_fiber_length=0.059
        tendon_slack_length=0.387 pennation_angle_at_optimal=0.1656816 fiber_damping=0.01
      PathPoint P1: femur_r (0.006 -0.385 -0.022)
      PathPoint P2: calcn_r (0.0044 0.031 -0.0053)
      PathWrap: wrap_object=GasMed_at_shank_r method=hybrid
      PathWrap pathwrap_0: wrap_object=GasMed_at_condyles_r method=hybrid
    Millard2012EquilibriumMuscle glmax1_r: max_isometric_force=983.7836 optimal_fiber_length=0.147
        tendon_slack_length=0.0873 pennation_angle_at_optimal=0.3540118 ignore_tendon_compliance=true
        fiber_damping=0.01
      PathPoint P1: pelvis (-0.1231 0.0345 0.0563)
      PathPoint P2: pelvis (-0.1257 -0.0242 0.0779)
      PathPoint P3: femur_r (-0.0444 -0.0326 0.0302)
      PathPoint P4: femur_r (-0.0277 -0.0566 0.047)
      PathWrap: wrap_object=Gmax1_at_pelvis_r method=hybrid
    Millard2012EquilibriumMuscle glmax2_r: max_isometric_force=1406.046 optimal_fiber_length=0.157
        tendon_slack_length=0.109 pennation_angle_at_optimal=0.3673821 ignore_tendon_compliance=true fiber_damping=0.01
      PathPoint P1: pelvis (-0.1317 0.0087 0.0462)
      PathPoint P2: pelvis (-0.1344 -0.0609 0.0813)
      PathPoint P3: femur_r (-0.045 -0.0584 0.0252)
      PathPoint P4: femur_r (-0.0156 -0.1016 0.0419)
      PathWrap: wrap_object=Gmax2_at_pelvis_r method=hybrid
    Millard2012EquilibriumMuscle glmax3_r: max_isometric_force=947.7541 optimal_fiber_length=0.167
        tendon_slack_length=0.103 pennation_angle_at_optimal=0.3824161 ignore_tendon_compliance=true fiber_damping=0.01
      PathPoint P1: pelvis (-0.13 -0.0525 0.009)
      PathPoint P2: pelvis (-0.1273 -0.1263 0.0435)
      PathPoint P3: femur_r (-0.0281 -0.1125 0.0094)
      PathPoint P4: femur_r (-0.006 -0.1419 0.0411)
      PathWrap: wrap_object=Gmax3_at_pelvis_r method=hybrid
    Millard2012EquilibriumMuscle glmed1_r: max_isometric_force=1093.467 optimal_fiber_length=0.073
        tendon_slack_length=0.05581683 pennation_angle_at_optimal=0.3165559 ignore_tendon_compliance=true
        fiber_damping=0.01
      PathPoint P1: pelvis (-0.0445 0.0245 0.1172)
      PathPoint P2: femur_r (-0.0218 -0.0117 0.0555)
    Millard2012EquilibriumMuscle glmed2_r: max_isometric_force=765.0917 optimal_fiber_length=0.073
        tendon_slack_length=0.06524881 pennation_angle_at_optimal=0.3165559 ignore_tendon_compliance=true
        fiber_damping=0.01
      PathPoint P1: pelvis (-0.085 0.0316 0.0675)
      PathPoint P2: femur_r (-0.0258 -0.0058 0.0527)
    Millard2012EquilibriumMuscle glmed3_r: max_isometric_force=871.1993 optimal_fiber_length=0.073
        tendon_slack_length=0.04523284 pennation_angle_at_optimal=0.3165559 ignore_tendon_compliance=true
        fiber_damping=0.01
      PathPoint P1: pelvis (-0.1152 -0.0073 0.0526)
      PathPoint P2: femur_r (-0.0309 -0.0047 0.0518)
    Millard2012EquilibriumMuscle glmin1_r: max_isometric_force=374.0459 optimal_fiber_length=0.068
        tendon_slack_length=0.01613778 pennation_angle_at_optimal=0.1745329 ignore_tendon_compliance=true
        fiber_damping=0.01
      PathPoint P1: pelvis (-0.0464 -0.0149 0.1042)
      PathPoint P2: femur_r (-0.0072 -0.0104 0.056)
    Millard2012EquilibriumMuscle glmin2_r: max_isometric_force=394.8197 optimal_fiber_length=0.056
        tendon_slack_length=0.02609905 pennation_angle_at_optimal=0 ignore_tendon_compliance=true fiber_damping=0.01
      PathPoint P1: pelvis (-0.0616 -0.0142 0.0971)
      PathPoint P2: femur_r (-0.0096 -0.0104 0.056)
    Millard2012EquilibriumMuscle glmin3_r: max_isometric_force=446.7738 optimal_fiber_length=0.038
        tendon_slack_length=0.0508725 pennation_angle_at_optimal=0.01745329 fiber_damping=0.01
      PathPoint P1: pelvis (-0.0789 -0.0155 0.0798)
      PathPoint P2: femur_r (-0.0135 -0.0083 0.055)
    Millard2012EquilibriumMuscle grac_r: max_isometric_force=281.3115 optimal_fiber_length=0.2278
        tendon_slack_length=0.1720138 pennation_angle_at_optimal=0.1720016 ignore_tendon_compliance=true
        fiber_damping=0.01
      PathPoint P1: pelvis (-0.04736 -0.12932 0.02456)
      PathPoint P2: tibia_r (-0.01842 -0.04755 -0.02961)
      PathPoint P3: tibia_r (0.00178 -0.06962 -0.01573)
      PathWrap: wrap_object=GR_at_condyles_r method=hybrid
    Millard2012EquilibriumMuscle iliacus_r: max_isometric_force=1021.141 optimal_fiber_length=0.1066
        tendon_slack_length=0.09612071 pennation_angle_at_optimal=0.279914 ignore_tendon_compliance=true
        fiber_damping=0.01
      PathPoint P1: pelvis (-0.0605 0.0309 0.0843)
      PathPoint P2: pelvis (-0.0135 -0.0557 0.0756)
      PathPoint P3: femur_r (-0.0023 -0.0565 0.0139)
      PathPoint P4: femur_r (-0.0122 -0.0637 0.0196)
      PathWrap: wrap_object=IL_at_brim_r method=hybrid range=(2 3)
    Millard2012EquilibriumMuscle perbrev_r: max_isometric_force=521.2016 optimal_fiber_length=0.0454
        tendon_slack_length=0.1475275 pennation_angle_at_optimal=0.2052361 fiber_damping=0.01
      PathPoint P1: tibia_r (-0.0243 -0.2532 0.0251)
      PathPoint P2: tibia_r (-0.0339 -0.3893 0.0249)
      PathPoint P3: tibia_r (-0.0285 -0.4004 0.0255)
      PathPoint P4: calcn_r (0.0471 0.027 0.0233)
      PathPoint P5: calcn_r (0.0677 0.0219 0.0343)
    Millard2012EquilibriumMuscle perlong_r: max_isometric_force=1115.371 optimal_fiber_length=0.0508
        tendon_slack_length=0.3322208 pennation_angle_at_optimal=0.2479525 fiber_damping=0.01
      PathPoint P1: tibia_r (-0.02 -0.1373 0.0282)
      PathPoint P2: tibia_r (-0.0317 -0.39 0.0237)
      PathPoint P3: tibia_r (-0.0272 -0.4014 0.024)
      PathPoint P4: calcn_r (0.0438 0.023 0.0221)
      PathPoint P5: calcn_r (0.0681 0.0106 0.0284)
      PathPoint P6: calcn_r (0.0852 0.0069 0.0118)
      PathPoint P7: calcn_r (0.1203 0.0085 -0.0184)
    Millard2012EquilibriumMuscle piri_r: max_isometric_force=1029.787 optimal_fiber_length=0.026
        tendon_slack_length=0.1149062 pennation_angle_at_optimal=0.1745329 fiber_damping=0.01
      PathPoint P1: pelvis (-0.10181 -0.00653 0.01351)
      PathPoint P2: pelvis (-0.10202 -0.03066 0.06092)
      PathPoint P3: femur_r (-0.0148 -0.0036 0.0437)
    Millard2012EquilibriumMuscle psoas_r: max_isometric_force=1426.79 optimal_fiber_length=0.1169
        tendon_slack_length=0.09954317 pennation_angle_at_optimal=0.2155251 ignore_tendon_compliance=true
        fiber_damping=0.01
      PathPoint P1: pelvis (-0.0606 0.062 0.039)
      PathPoint P2: pelvis (-0.0205 -0.0654 0.0656)
      PathPoint P3: femur_r (-0.0132 -0.0467 0.0046)
      PathPoint P4: femur_r (-0.0235 -0.0524 0.0088)
      PathWrap: wrap_object=PS_at_brim_r method=hybrid range=(2 3)
    Millard2012EquilibriumMuscle recfem_r: max_isometric_force=2191.741 optimal_fiber_length=0.0759
        tendon_slack_length=0.4504 pennation_angle_at_optimal=0.2170149 fiber_damping=0.01
      PathPoint P1: pelvis (-0.024 -0.0388 0.0933)
      PathPoint P2: patella_r (0.01 0.049 0.0007)
      PathPoint P3: patella_r (0.0121 0.0437 -0.001)
      PathPoint P4: patella_r (0.005 0.00247 3e-5)
      PathPoint P5: tibia_r (0.0326 -0.06312 -0.00047)
      PathWrap: wrap_object=KnExt_at_fem_r method=hybrid
    Millard2012EquilibriumMuscle sart_r: max_isometric_force=249.4131 optimal_fiber_length=0.403
        tendon_slack_length=0.1239998 pennation_angle_at_optimal=0.02613542 ignore_tendon_compliance=true
        fiber_damping=0.01
      PathPoint P1: pelvis (-0.0195 -0.0156 0.1056)
      PathPoint P2: femur_r (-0.003 -0.3568 -0.0421)
      PathPoint P3: tibia_r (-0.0251 -0.0401 -0.0365)
      PathPoint P4: tibia_r (-0.0159 -0.0599 -0.0264)
      PathPoint P5: tibia_r (0.0136 -0.081 -0.0026)
    Millard2012EquilibriumMuscle semimem_r: max_isometric_force=2200.987 optimal_fiber_length=0.086
        tendon_slack_length=0.335 pennation_angle_at_optimal=0.2545615 fiber_damping=0.01
      PathPoint P1: pelvis (-0.0987 -0.114 0.0614)
      PathPoint P2: tibia_r (-0.027 -0.041 -0.0196)
      PathWrap: wrap_object=SM_at_condyles_r method=hybrid
    Millard2012EquilibriumMuscle semiten_r: max_isometric_force=591.2951 optimal_fiber_length=0.193
        tendon_slack_length=0.2471989 pennation_angle_at_optimal=0.241295 fiber_damping=0.01
      PathPoint P1: pelvis (-0.1038 -0.1253 0.0515)
      PathPoint P2: tibia_r (-0.0312 -0.0508 -0.0229)
      PathPoint P3: tibia_r (0.0019 -0.0773 -0.0117)
      PathWrap: wrap_object=ST_at_condyles_r method=hybrid
    Millard2012EquilibriumMuscle soleus_r: max_isometric_force=6194.843 optimal_fiber_length=0.044
        tendon_slack_length=0.28135 pennation_angle_at_optimal=0.3814289 fiber_damping=0.01
      PathPoint P1: tibia_r (-0.0076 -0.0916 0.0098)
      PathPoint P2: calcn_r (0.0044 0.031 -0.0053)
    Millard2012EquilibriumMuscle tfl_r: max_isometric_force=411.2066 optimal_fiber_length=0.095
        tendon_slack_length=0.4494971 pennation_angle_at_optimal=0.05235988 fiber_damping=0.01
      PathPoint P1: pelvis (-0.0311 0.0214 0.1241)
      PathPoint P2: femur_r (0.0294 -0.0995 0.0597)
      PathPoint P3: femur_r (0.0107 -0.405 0.0324)
      PathPoint P4: tibia_r (0.0108 -0.041 0.0346)
    Millard2012EquilibriumMuscle tibant_r: max_isometric_force=1227.452 optimal_fiber_length=0.0683
        tendon_slack_length=0.240461 pennation_angle_at_optimal=0.1951828 fiber_damping=0.01
      PathPoint P1: tibia_r (0.0154 -0.1312 0.0162)
      PathPoint P2: tibia_r (0.0251 -0.1906 0.0128)
      PathPoint P3: tibia_r (0.0233 -0.3659 -0.0132)
      PathPoint P4: calcn_r (0.1166 0.0178 -0.0305)
    Millard2012EquilibriumMuscle tibpost_r: max_isometric_force=1730.154 optimal_fiber_length=0.0378
        tendon_slack_length=0.2807796 pennation_angle_at_optimal=0.2264891 fiber_damping=0.01
      PathPoint P1: tibia_r (-0.0041 -0.1304 0.0103)
      PathPoint P2: tibia_r (-0.0164 -0.3655 -0.0175)
      PathPoint P3: calcn_r (0.0417 0.0334 -0.0286)
      PathPoint P4: calcn_r (0.0772 0.0159 -0.0281)
    Millard2012EquilibriumMuscle vasint_r: max_isometric_force=1697.361 optimal_fiber_length=0.117
        tendon_slack_length=0.205 pennation_angle_at_optimal=0.06309973 fiber_damping=0.01
      PathPoint P1: femur_r (0.029 -0.1924 0.031)
      PathPoint P2: femur_r (0.0335 -0.2084 0.0285)
      PathPoint P3: patella_r (0.0058 0.048 -0.0006)
      PathPoint P4: patella_r (0.005 0.00247 -0.00039)
      PathPoint P5: tibia_r (0.03257 -0.0632 0.00043)
      PathWrap: wrap_object=KnExt_at_fem_r method=hybrid
    Millard2012EquilibriumMuscle vaslat140_r: max_isometric_force=5148.767 optimal_fiber_length=0.117
        tendon_slack_length=0.221 pennation_angle_at_optimal=0.2528673 fiber_damping=0.01
      PathPoint vaslat_r-P1: femur_r (0.0048 -0.1854 0.0349)
      PathPoint vaslat_r-P2: femur_r (0.0269 -0.2591 0.0409)
      PathPoint vaslat_r-P3: patella_r (0.0103 0.0423 0.0141)
      PathPoint vaslat_r-P4: patella_r (0.005 0.00247 0.00733)
      PathPoint vaslat_r-P5: tibia_r (0.03254 -0.06338 0.00511)
      PathWrap: wrap_object=KnExtVL_at_fem_r method=hybrid
    Millard2012EquilibriumMuscle vasmed_r: max_isometric_force=2747.823 optimal_fiber_length=0.11
        tendon_slack_length=0.208 pennation_angle_at_optimal=0.4222225 fiber_damping=0.01
      PathPoint P1: femur_r (0.014 -0.2099 0.0188)
      PathPoint P2: femur_r (0.0356 -0.2769 0.0009)
      PathPoint P3: patella_r (0.0063 0.0445 -0.017)
      PathPoint P4: patella_r (0.005 0.00247 -0.0085)
      PathPoint P5: tibia_r (0.0319 -0.06357 -0.00678)
      PathWrap: wrap_object=KnExt_at_fem_r method=hybrid
    Millard2012EquilibriumMuscle addbrev_l: max_isometric_force=625.8197 optimal_fiber_length=0.1031
        tendon_slack_length=0.03545029 pennation_angle_at_optimal=0.1147809 ignore_tendon_compliance=true
        fiber_damping=0.01
      PathPoint P1: pelvis (-0.0191 -0.094 -0.0154)
      PathPoint P2: femur_l (-0.002 -0.118 -0.0249)
      PathWrap: wrap_object=AB_at_femshaft_l method=hybrid
    Millard2012EquilibriumMuscle addlong_l: max_isometric_force=916.8 optimal_fiber_length=0.1082
        tendon_slack_length=0.1317994 pennation_angle_at_optimal=0.1377704 fiber_damping=0.01
      PathPoint P1: pelvis (-0.00758 -0.0889 -0.01888)
      PathPoint P2: femur_l (0.01126 -0.23937 -0.01583)
      PathWrap: wrap_object=AL_at_femshaft_l method=hybrid
    Millard2012EquilibriumMuscle addmagDist_l: max_isometric_force=597.2951 optimal_fiber_length=0.1772
        tendon_slack_length=0.0873807 pennation_angle_at_optimal=0.194705 ignore_tendon_compliance=true
        fiber_damping=0.01
      PathPoint P1: pelvis (-0.07404 -0.12767 -0.03982)
      PathPoint P2: femur_l (0.01125 -0.2625 -0.0193)
      PathWrap: wrap_object=AMdist_at_femshaft_l method=hybrid
    Millard2012EquilibriumMuscle addmagIsch_l: max_isometric_force=597.2951 optimal_fiber_length=0.1562
        tendon_slack_length=0.216343 pennation_angle_at_optimal=0.1680443 fiber_damping=0.01
      PathPoint P1: pelvis (-0.08962 -0.12976 -0.04171)
      PathPoint P2: femur_l (0.00481 -0.38797 0.03273)
      PathWrap: wrap_object=AMisch_at_condyles_l method=hybrid
    Millard2012EquilibriumMuscle addmagMid_l: max_isometric_force=597.2951 optimal_fiber_length=0.1377
        tendon_slack_length=0.0466277 pennation_angle_at_optimal=0.2073076 ignore_tendon_compliance=true
        fiber_damping=0.01
      PathPoint P1: pelvis (-0.05266 -0.12075 -0.02854)
      PathPoint P2: femur_l (0.00242 -0.1624 -0.02922)
      PathWrap: wrap_object=AMmid_at_femshaft_l method=hybrid
    Millard2012EquilibriumMuscle addmagProx_l: max_isometric_force=597.2951 optimal_fiber_length=0.1056
        tendon_slack_length=0.0403241 pennation_angle_at_optimal=0.3114833 ignore_tendon_compliance=true
        fiber_damping=0.01
      PathPoint P1: pelvis (-0.03098 -0.10755 -0.01365)
      PathPoint P2: femur_l (-0.01527 -0.07886 -0.03202)
      PathWrap: wrap_object=AMprox_at_femshaft_l method=hybrid
    Millard2012EquilibriumMuscle bflh140_l: max_isometric_force=1313.184 optimal_fiber_length=0.0976
        tendon_slack_length=0.3325 pennation_angle_at_optimal=0.1759182 fiber_damping=0.01
      PathPoint bflh_l-P1: pelvis (-0.104 -0.1191 -0.0586)
      PathPoint bflh_l-P2: tibia_l (-0.03436 -0.03648 -0.03618)
      PathPoint bflh_l-P3: tibia_l (-0.02704 -0.05008 -0.03476)
    Millard2012EquilibriumMuscle bfsh140_l: max_isometric_force=557.1148 optimal_fiber_length=0.1103
        tendon_slack_length=0.1058172 pennation_angle_at_optimal=0.2642232 ignore_tendon_compliance=true
        fiber_damping=0.01
      PathPoint bfsh_l-P1: femur_l (0.005 -0.2111 -0.0234)
      PathPoint bfsh_l-P2: tibia_l (-0.02866 -0.03284 -0.03204)
      PathWrap: wrap_object=BF140_at_gastroc_l method=hybrid
    Millard2012EquilibriumMuscle edl_l: max_isometric_force=603.4982 optimal_fiber_length=0.0693
        tendon_slack_length=0.3688752 pennation_angle_at_optimal=0.2182582 fiber_damping=0.01
      PathPoint P1: tibia_l (-0.016 -0.1157 -0.0205)
      PathPoint P2: tibia_l (0.0164 -0.376 -0.0112)
      PathPoint P3: calcn_l (0.0919 0.036 -0.0008)
      PathPoint P4: calcn_l (0.1616 0.0055 -0.013)
      PathPoint P5: toes_l (0.0003 0.0047 -0.0153)
      PathPoint P6: toes_l (0.0443 -0.0004 -0.025)
    Millard2012EquilibriumMuscle ehl_l: max_isometric_force=285.8675 optimal_fiber_length=0.0748
        tendon_slack_length=0.3267953 pennation_angle_at_optimal=0.1972681 fiber_damping=0.01
      PathPoint P1: tibia_l (-0.014 -0.155 -0.0189)
      PathPoint P2: tibia_l (0.0071 -0.2909 -0.0164)
      PathPoint P3: tibia_l (0.02 -0.3693 0.0028)
      PathPoint P4: calcn_l (0.097 0.0389 0.0211)
      PathPoint P5: calcn_l (0.1293 0.0309 0.0257)
      PathPoint P6: calcn_l (0.1734 0.0139 0.028)
      PathPoint P7: toes_l (0.0298 0.0041 0.0245)
      PathPoint P8: toes_l (0.0563 0.0034 0.0186)
    Millard2012EquilibriumMuscle fdl_l: max_isometric_force=423.177 optimal_fiber_length=0.0446
        tendon_slack_length=0.3787729 pennation_angle_at_optimal=0.2248391 fiber_damping=0.01
      PathPoint P1: tibia_l (-0.0023 -0.1832 0.0018)
      PathPoint P2: tibia_l (-0.0176 -0.3645 0.0124)
      PathPoint P3: calcn_l (0.0436 0.0315 0.028)
      PathPoint P4: calcn_l (0.0708 0.0176 0.0263)
      PathPoint P5: calcn_l (0.1658 -0.0081 -0.0116)
      PathPoint P6: toes_l (-0.0019 -0.0078 -0.0147)
      PathPoint P7: toes_l (0.0285 -0.0071 -0.0215)
      PathPoint P8: toes_l (0.0441 -0.006 -0.0242)
    Millard2012EquilibriumMuscle fhl_l: max_isometric_force=907.8393 optimal_fiber_length=0.0527
        tendon_slack_length=0.3543397 pennation_angle_at_optimal=0.2580255 fiber_damping=0.01
      PathPoint P1: tibia_l (-0.031 -0.2163 -0.02)
      PathPoint P2: tibia_l (-0.0242 -0.3671 0.0076)
      PathPoint P3: calcn_l (0.0374 0.0276 0.0241)
      PathPoint P4: calcn_l (0.1038 0.0068 0.0256)
      PathPoint P5: calcn_l (0.1726 -0.0053 0.0269)
      PathPoint P6: toes_l (0.0155 -0.0064 0.0265)
      PathPoint P7: toes_l (0.0562 -0.0102 0.0181)
    Millard2012EquilibriumMuscle gaslat140_l: max_isometric_force=1575.059 optimal_fiber_length=0.069
        tendon_slack_length=0.374 pennation_angle_at_optimal=0.2102268 fiber_damping=0.01
      PathPoint gaslat_l-P1: femur_l (0.002 -0.381 -0.02059)
      PathPoint gaslat_l-P2: calcn_l (0.0044 0.031 0.0053)
      PathWrap: wrap_object=GasLat_at_shank_l method=hybrid
      PathWrap pathwrap_0: wrap_object=GasLat_at_condyles_l method=hybrid
    Millard2012EquilibriumMuscle gasmed_l: max_isometric_force=3115.515 optimal_fiber_length=0.059
        tendon_slack_length=0.387 pennation_angle_at_optimal=0.1656816 fiber_damping=0.01
      PathPoint P1: femur_l (0.006 -0.385 0.022)
      PathPoint P2: calcn_l (0.0044 0.031 0.0053)
      PathWrap: wrap_object=GasMed_at_shank_l method=hybrid
      PathWrap pathwrap_0: wrap_object=GasMed_at_condyles_l method=hybrid
    Millard2012EquilibriumMuscle glmax1_l: max_isometric_force=983.7836 optimal_fiber_length=0.147
        tendon_slack_length=0.0873 pennation_angle_at_optimal=0.3540118 ignore_tendon_compliance=true
        fiber_damping=0.01
      PathPoint P1: pelvis (-0.1231 0.0345 -0.0563)
      PathPoint P2: pelvis (-0.1257 -0.0242 -0.0779)
      PathPoint P3: femur_l (-0.0444 -0.0326 -0.0302)
      PathPoint P4: femur_l (-0.0277 -0.0566 -0.047)
      PathWrap: wrap_object=Gmax1_at_pelvis_l method=hybrid
    Millard2012EquilibriumMuscle glmax2_l: max_isometric_force=1406.046 optimal_fiber_length=0.157
        tendon_slack_length=0.109 pennation_angle_at_optimal=0.3673821 ignore_tendon_compliance=true fiber_damping=0.01
      PathPoint P1: pelvis (-0.1317 0.0087 -0.0462)
      PathPoint P2: pelvis (-0.1344 -0.0609 -0.0813)
      PathPoint P3: femur_l (-0.045 -0.0584 -0.0252)
      PathPoint P4: femur_l (-0.0156 -0.1016 -0.0419)
      PathWrap: wrap_object=Gmax2_at_pelvis_l method=hybrid
    Millard2012EquilibriumMuscle glmax3_l: max_isometric_force=947.7541 optimal_fiber_length=0.167
        tendon_slack_length=0.103 pennation_angle_at_optimal=0.3824161 ignore_tendon_compliance=true fiber_damping=0.01
      PathPoint P1: pelvis (-0.13 -0.0525 -0.009)
      PathPoint P2: pelvis (-0.1273 -0.1263 -0.0435)
      PathPoint P3: femur_l (-0.0281 -0.1125 -0.0094)
      PathPoint P4: femur_l (-0.006 -0.1419 -0.0411)
      PathWrap: wrap_object=Gmax3_at_pelvis_l method=hybrid
    Millard2012EquilibriumMuscle glmed1_l: max_isometric_force=1093.467 optimal_fiber_length=0.073
        tendon_slack_length=0.05581683 pennation_angle_at_optimal=0.3165559 ignore_tendon_compliance=true
        fiber_damping=0.01
      PathPoint P1: pelvis (-0.0445 0.0245 -0.1172)
      PathPoint P2: femur_l (-0.0218 -0.0117 -0.0555)
    Millard2012EquilibriumMuscle glmed2_l: max_isometric_force=765.0917 optimal_fiber_length=0.073
        tendon_slack_length=0.06524881 pennation_angle_at_optimal=0.3165559 ignore_tendon_compliance=true
        fiber_damping=0.01
      PathPoint P1: pelvis (-0.085 0.0316 -0.0675)
      PathPoint P2: femur_l (-0.0258 -0.0058 -0.0527)
    Millard2012EquilibriumMuscle glmed3_l: max_isometric_force=871.1993 optimal_fiber_length=0.073
        tendon_slack_length=0.04523284 pennation_angle_at_optimal=0.3165559 ignore_tendon_compliance=true
        fiber_damping=0.01
      PathPoint P1: pelvis (-0.1152 -0.0073 -0.0526)
      PathPoint P2: femur_l (-0.0309 -0.0047 -0.0518)
    Millard2012EquilibriumMuscle glmin1_l: max_isometric_force=374.0459 optimal_fiber_length=0.068
        tendon_slack_length=0.01613778 pennation_angle_at_optimal=0.1745329 ignore_tendon_compliance=true
        fiber_damping=0.01
      PathPoint P1: pelvis (-0.0464 -0.0149 -0.1042)
      PathPoint P2: femur_l (-0.0072 -0.0104 -0.056)
    Millard2012EquilibriumMuscle glmin2_l: max_isometric_force=394.8197 optimal_fiber_length=0.056
        tendon_slack_length=0.02609905 pennation_angle_at_optimal=0 ignore_tendon_compliance=true fiber_damping=0.01
      PathPoint P1: pelvis (-0.0616 -0.0142 -0.0971)
      PathPoint P2: femur_l (-0.0096 -0.0104 -0.056)
    Millard2012EquilibriumMuscle glmin3_l: max_isometric_force=446.7738 optimal_fiber_length=0.038
        tendon_slack_length=0.0508725 pennation_angle_at_optimal=0.01745329 fiber_damping=0.01
      PathPoint P1: pelvis (-0.0789 -0.0155 -0.0798)
      PathPoint P2: femur_l (-0.0135 -0.0083 -0.055)
    Millard2012EquilibriumMuscle grac_l: max_isometric_force=281.3115 optimal_fiber_length=0.2278
        tendon_slack_length=0.1720138 pennation_angle_at_optimal=0.1720016 ignore_tendon_compliance=true
        fiber_damping=0.01
      PathPoint P1: pelvis (-0.04736 -0.12932 -0.02456)
      PathPoint P2: tibia_l (-0.01842 -0.04755 0.02961)
      PathPoint P3: tibia_l (0.00178 -0.06962 0.01573)
      PathWrap: wrap_object=GR_at_condyles_l method=hybrid
    Millard2012EquilibriumMuscle iliacus_l: max_isometric_force=1021.141 optimal_fiber_length=0.1066
        tendon_slack_length=0.09612071 pennation_angle_at_optimal=0.279914 ignore_tendon_compliance=true
        fiber_damping=0.01
      PathPoint P1: pelvis (-0.0605 0.0309 -0.0843)
      PathPoint P2: pelvis (-0.0135 -0.0557 -0.0756)
      PathPoint P3: femur_l (-0.0023 -0.0565 -0.0139)
      PathPoint P4: femur_l (-0.0122 -0.0637 -0.0196)
      PathWrap: wrap_object=IL_at_brim_l method=hybrid range=(2 3)
    Millard2012EquilibriumMuscle perbrev_l: max_isometric_force=521.2016 optimal_fiber_length=0.0454
        tendon_slack_length=0.1475275 pennation_angle_at_optimal=0.2052361 fiber_damping=0.01
      PathPoint P1: tibia_l (-0.0243 -0.2532 -0.0251)
      PathPoint P2: tibia_l (-0.0339 -0.3893 -0.0249)
      PathPoint P3: tibia_l (-0.0285 -0.4004 -0.0255)
      PathPoint P4: calcn_l (0.0471 0.027 -0.0233)
      PathPoint P5: calcn_l (0.0677 0.0219 -0.0343)
    Millard2012EquilibriumMuscle perlong_l: max_isometric_force=1115.371 optimal_fiber_length=0.0508
        tendon_slack_length=0.3322208 pennation_angle_at_optimal=0.2479525 fiber_damping=0.01
      PathPoint P1: tibia_l (-0.02 -0.1373 -0.0282)
      PathPoint P2: tibia_l (-0.0317 -0.39 -0.0237)
      PathPoint P3: tibia_l (-0.0272 -0.4014 -0.024)
      PathPoint P4: calcn_l (0.0438 0.023 -0.0221)
      PathPoint P5: calcn_l (0.0681 0.0106 -0.0284)
      PathPoint P6: calcn_l (0.0852 0.0069 -0.0118)
      PathPoint P7: calcn_l (0.1203 0.0085 0.0184)
    Millard2012EquilibriumMuscle piri_l: max_isometric_force=1029.787 optimal_fiber_length=0.026
        tendon_slack_length=0.1149062 pennation_angle_at_optimal=0.1745329 fiber_damping=0.01
      PathPoint P1: pelvis (-0.10181 -0.00653 -0.01351)
      PathPoint P2: pelvis (-0.10202 -0.03066 -0.06092)
      PathPoint P3: femur_l (-0.0148 -0.0036 -0.0437)
    Millard2012EquilibriumMuscle psoas_l: max_isometric_force=1426.79 optimal_fiber_length=0.1169
        tendon_slack_length=0.09954317 pennation_angle_at_optimal=0.2155251 ignore_tendon_compliance=true
        fiber_damping=0.01
      PathPoint P1: pelvis (-0.0606 0.062 -0.039)
      PathPoint P2: pelvis (-0.0205 -0.0654 -0.0656)
      PathPoint P3: femur_l (-0.0132 -0.0467 -0.0046)
      PathPoint P4: femur_l (-0.0235 -0.0524 -0.0088)
      PathWrap: wrap_object=PS_at_brim_l method=hybrid range=(2 3)
    Millard2012EquilibriumMuscle recfem_l: max_isometric_force=2191.741 optimal_fiber_length=0.0759
        tendon_slack_length=0.4504 pennation_angle_at_optimal=0.2170149 fiber_damping=0.01
      PathPoint P1: pelvis (-0.024 -0.0388 -0.0933)
      PathPoint P2: patella_l (0.01 0.049 -0.0007)
      PathPoint P3: patella_l (0.0121 0.0437 0.001)
      PathPoint P4: patella_l (0.005 0.00247 -3e-5)
      PathPoint P5: tibia_l (0.0326 -0.06312 0.00047)
      PathWrap: wrap_object=KnExt_at_fem_l method=hybrid
    Millard2012EquilibriumMuscle sart_l: max_isometric_force=249.4131 optimal_fiber_length=0.403
        tendon_slack_length=0.1239998 pennation_angle_at_optimal=0.02613542 ignore_tendon_compliance=true
        fiber_damping=0.01
      PathPoint P1: pelvis (-0.0195 -0.0156 -0.1056)
      PathPoint P2: femur_l (-0.003 -0.3568 0.0421)
      PathPoint P3: tibia_l (-0.0251 -0.0401 0.0365)
      PathPoint P4: tibia_l (-0.0159 -0.0599 0.0264)
      PathPoint P5: tibia_l (0.0136 -0.081 0.0026)
    Millard2012EquilibriumMuscle semimem_l: max_isometric_force=2200.987 optimal_fiber_length=0.086
        tendon_slack_length=0.335 pennation_angle_at_optimal=0.2545615 fiber_damping=0.01
      PathPoint P1: pelvis (-0.0987 -0.114 -0.0614)
      PathPoint P2: tibia_l (-0.027 -0.041 0.0196)
      PathWrap: wrap_object=SM_at_condyles_l method=hybrid
    Millard2012EquilibriumMuscle semiten_l: max_isometric_force=591.2951 optimal_fiber_length=0.193
        tendon_slack_length=0.2471989 pennation_angle_at_optimal=0.241295 fiber_damping=0.01
      PathPoint P1: pelvis (-0.1038 -0.1253 -0.0515)
      PathPoint P2: tibia_l (-0.0312 -0.0508 0.0229)
      PathPoint P3: tibia_l (0.0019 -0.0773 0.0117)
      PathWrap: wrap_object=ST_at_condyles_l method=hybrid
    Millard2012EquilibriumMuscle soleus_l: max_isometric_force=6194.843 optimal_fiber_length=0.044
        tendon_slack_length=0.28135 pennation_angle_at_optimal=0.3814289 fiber_damping=0.01
      PathPoint P1: tibia_l (-0.0076 -0.0916 -0.0098)
      PathPoint P2: calcn_l (0.0044 0.031 0.0053)
    Millard2012EquilibriumMuscle tfl_l: max_isometric_force=411.2066 optimal_fiber_length=0.095
        tendon_slack_length=0.4494971 pennation_angle_at_optimal=0.05235988 fiber_damping=0.01
      PathPoint P1: pelvis (-0.0311 0.0214 -0.1241)
      PathPoint P2: femur_l (0.0294 -0.0995 -0.0597)
      PathPoint P3: femur_l (0.0107 -0.405 -0.0324)
      PathPoint P4: tibia_l (0.0108 -0.041 -0.0346)
    Millard2012EquilibriumMuscle tibant_l: max_isometric_force=1227.452 optimal_fiber_length=0.0683
        tendon_slack_length=0.240461 pennation_angle_at_optimal=0.1951828 fiber_damping=0.01
      PathPoint P1: tibia_l (0.0154 -0.1312 -0.0162)
      PathPoint P2: tibia_l (0.0251 -0.1906 -0.0128)
      PathPoint P3: tibia_l (0.0233 -0.3659 0.0132)
      PathPoint P4: calcn_l (0.1166 0.0178 0.0305)
    Millard2012EquilibriumMuscle tibpost_l: max_isometric_force=1730.154 optimal_fiber_length=0.0378
        tendon_slack_length=0.2807796 pennation_angle_at_optimal=0.2264891 fiber_damping=0.01
      PathPoint P1: tibia_l (-0.0041 -0.1304 -0.0103)
      PathPoint P2: tibia_l (-0.0164 -0.3655 0.0175)
      PathPoint P3: calcn_l (0.0417 0.0334 0.0286)
      PathPoint P4: calcn_l (0.0772 0.0159 0.0281)
    Millard2012EquilibriumMuscle vasint_l: max_isometric_force=1697.361 optimal_fiber_length=0.117
        tendon_slack_length=0.205 pennation_angle_at_optimal=0.06309973 fiber_damping=0.01
      PathPoint P1: femur_l (0.029 -0.1924 -0.031)
      PathPoint P2: femur_l (0.0335 -0.2084 -0.0285)
      PathPoint P3: patella_l (0.0058 0.048 0.0006)
      PathPoint P4: patella_l (0.005 0.00247 0.00039)
      PathPoint P5: tibia_l (0.03257 -0.0632 -0.00043)
      PathWrap: wrap_object=KnExt_at_fem_l method=hybrid
    Millard2012EquilibriumMuscle vaslat140_l: max_isometric_force=5148.767 optimal_fiber_length=0.117
        tendon_slack_length=0.221 pennation_angle_at_optimal=0.2528673 fiber_damping=0.01
      PathPoint vaslat_l-P1: femur_l (0.0048 -0.1854 -0.0349)
      PathPoint vaslat_l-P2: femur_l (0.0269 -0.2591 -0.0409)
      PathPoint vaslat_l-P3: patella_l (0.0103 0.0423 -0.0141)
      PathPoint vaslat_l-P4: patella_l (0.005 0.00247 -0.00733)
      PathPoint vaslat_l-P5: tibia_l (0.03254 -0.06338 -0.00511)
      PathWrap: wrap_object=KnExtVL_at_fem_l method=hybrid
    Millard2012EquilibriumMuscle vasmed_l: max_isometric_force=2747.823 optimal_fiber_length=0.11
        tendon_slack_length=0.208 pennation_angle_at_optimal=0.4222225 fiber_damping=0.01
      PathPoint P1: femur_l (0.014 -0.2099 -0.0188)
      PathPoint P2: femur_l (0.0356 -0.2769 -0.0009)
      PathPoint P3: patella_l (0.0063 0.0445 0.017)
      PathPoint P4: patella_l (0.005 0.00247 0.0085)
      PathPoint P5: tibia_l (0.0319 -0.06357 0.00678)
      PathWrap: wrap_object=KnExt_at_fem_l method=hybrid
    Thelen2003Muscle Ps_L1_VB_r: max_isometric_force=252.7844 optimal_fiber_length=0.1411117
        tendon_slack_length=0.1381398 pennation_angle_at_optimal=0.18675 [radians]
      PathPoint PathPoint_lumbar1: lumbar1 (-0.00487725 0.0311666 0.0241456)
      PathPoint PathPoint_pelvis: pelvis (-0.0277265 -0.057 0.0918159)
    Thelen2003Muscle Ps_L1_TP_r: max_isometric_force=75.95618 optimal_fiber_length=0.1494358
        tendon_slack_length=0.1262771 pennation_angle_at_optimal=0.18675
      PathPoint PathPoint_lumbar1: lumbar1 (-0.0202411 0.0280857 0.0267706)
      PathPoint PathPoint_pelvis: pelvis (-0.0277265 -0.057 0.0918159)
    Thelen2003Muscle Ps_L1_L2_IVD_r: max_isometric_force=148.1637 optimal_fiber_length=0.1369227
        tendon_slack_length=0.1204221 pennation_angle_at_optimal=0.18675
      PathPoint PathPoint_lumbar1: lumbar1 (-0.00303983 0.0091103 0.0261047)
      PathPoint PathPoint_pelvis: pelvis (-0.0277265 -0.057 0.0918159)
    Thelen2003Muscle Ps_L2_TP_r: max_isometric_force=286.1836 optimal_fiber_length=0.1287241
        tendon_slack_length=0.1092984 pennation_angle_at_optimal=0.18675
      PathPoint PathPoint_lumbar2: lumbar2 (-0.0154764 0.0236698 0.030678)
      PathPoint PathPoint_pelvis: pelvis (-0.0277265 -0.057 0.0918159)
    Thelen2003Muscle Ps_L2_L3_IVD_r: max_isometric_force=180.6298 optimal_fiber_length=0.1296318
        tendon_slack_length=0.09133999 pennation_angle_at_optimal=0.18675
      PathPoint PathPoint_lumbar2: lumbar2 (0.00389074 0.00646297 0.0293375)
      PathPoint PathPoint_pelvis: pelvis (-0.0277265 -0.057 0.0918159)
    Thelen2003Muscle Ps_L3_TP_r: max_isometric_force=166.0481 optimal_fiber_length=0.122948
        tendon_slack_length=0.0844137 pennation_angle_at_optimal=0.18675
      PathPoint PathPoint_lumbar3: lumbar3 (-0.0225779 0.0257777 0.0341569)
      PathPoint PathPoint_pelvis: pelvis (-0.0277265 -0.057 0.0918159)
    Thelen2003Muscle Ps_L3_L4_IVD_r: max_isometric_force=61.98139 optimal_fiber_length=0.1011261
        tendon_slack_length=0.08618524 pennation_angle_at_optimal=0.18675
      PathPoint PathPoint_lumbar3: lumbar3 (-0.000608427 0.00759914 0.0261613)
      PathPoint PathPoint_pelvis: pelvis (-0.0277265 -0.057 0.0918159)
    Thelen2003Muscle Ps_L4_TP_r: max_isometric_force=289.9194 optimal_fiber_length=0.09639102
        tendon_slack_length=0.08320069 pennation_angle_at_optimal=0.18675
      PathPoint PathPoint_lumbar4: lumbar4 (-0.0230297 0.0262767 0.0300425)
      PathPoint PathPoint_pelvis: pelvis (-0.0277265 -0.057 0.0918159)
    Thelen2003Muscle Ps_L4_L5_IVD_r: max_isometric_force=127.7691 optimal_fiber_length=0.09991503
        tendon_slack_length=0.05462653 pennation_angle_at_optimal=0.18675
      PathPoint PathPoint_lumbar4: lumbar4 (-0.00107687 0.00640038 0.0282565)
      PathPoint PathPoint_pelvis: pelvis (-0.0277265 -0.057 0.0918159)
    Thelen2003Muscle Ps_L5_TP_r: max_isometric_force=286.9734 optimal_fiber_length=0.1095564
        tendon_slack_length=0.04153118 pennation_angle_at_optimal=0.18675
      PathPoint PathPoint_lumbar5: lumbar5 (-0.0198485 0.023594 0.0376714)
      PathPoint PathPoint_pelvis: pelvis (-0.0277265 -0.057 0.0918159)
    Thelen2003Muscle Ps_L5_VB_r: max_isometric_force=358.6234 optimal_fiber_length=0.1004599
        tendon_slack_length=0.03030252 pennation_angle_at_optimal=0.18675
      PathPoint PathPoint_lumbar5: lumbar5 (0.00122274 0.0137623 0.0349159)
      PathPoint PathPoint_pelvis: pelvis (-0.0277265 -0.057 0.0918159)
    Thelen2003Muscle Ps_L1_VB_l: max_isometric_force=252.7844 optimal_fiber_length=0.1411117
        tendon_slack_length=0.1381398 pennation_angle_at_optimal=0.18675
      PathPoint PathPoint_lumbar1: lumbar1 (-0.00487725 0.0311666 -0.0241456)
      PathPoint PathPoint_pelvis: pelvis (-0.0277265 -0.057 -0.0918159)
    Thelen2003Muscle Ps_L1_TP_l: max_isometric_force=75.95605 optimal_fiber_length=0.1494356
        tendon_slack_length=0.126277 pennation_angle_at_optimal=0.18675
      PathPoint PathPoint_lumbar1: lumbar1 (-0.0202411 0.0280857 -0.0267756)
      PathPoint PathPoint_pelvis: pelvis (-0.0277265 -0.057 -0.0918159)
    Thelen2003Muscle Ps_L1_L2_IVD_l: max_isometric_force=148.1638 optimal_fiber_length=0.1369228
        tendon_slack_length=0.1204222 pennation_angle_at_optimal=0.18675
      PathPoint PathPoint_lumbar1: lumbar1 (-0.00303983 0.0091103 -0.0261017)
      PathPoint PathPoint_pelvis: pelvis (-0.0277265 -0.057 -0.0918159)
    Thelen2003Muscle Ps_L2_TP_l: max_isometric_force=286.1835 optimal_fiber_length=0.1287241
        tendon_slack_length=0.1092983 pennation_angle_at_optimal=0.18675
      PathPoint PathPoint_lumbar2: lumbar2 (-0.0154764 0.0236698 -0.030679)
      PathPoint PathPoint_pelvis: pelvis (-0.0277265 -0.057 -0.0918159)
    Thelen2003Muscle Ps_L2_L3_IVD_l: max_isometric_force=180.6297 optimal_fiber_length=0.1296318
        tendon_slack_length=0.09133996 pennation_angle_at_optimal=0.18675
      PathPoint PathPoint_lumbar2: lumbar2 (0.00389074 0.00646297 -0.0293395)
      PathPoint PathPoint_pelvis: pelvis (-0.0277265 -0.057 -0.0918159)
    Thelen2003Muscle Ps_L3_TP_l: max_isometric_force=166.0481 optimal_fiber_length=0.122948
        tendon_slack_length=0.0844137 pennation_angle_at_optimal=0.18675
      PathPoint PathPoint_lumbar3: lumbar3 (-0.0225779 0.0257777 -0.0341569)
      PathPoint PathPoint_pelvis: pelvis (-0.0277265 -0.057 -0.0918159)
    Thelen2003Muscle Ps_L3_L4_IVD_l: max_isometric_force=61.98139 optimal_fiber_length=0.1011262
        tendon_slack_length=0.0861853 pennation_angle_at_optimal=0.18675
      PathPoint PathPoint_lumbar3: lumbar3 (-0.000608427 0.00759914 -0.0261583)
      PathPoint PathPoint_pelvis: pelvis (-0.0277265 -0.057 -0.0918159)
    Thelen2003Muscle Ps_L4_TP_l: max_isometric_force=289.9194 optimal_fiber_length=0.09639093
        tendon_slack_length=0.08320062 pennation_angle_at_optimal=0.18675
      PathPoint PathPoint_lumbar4: lumbar4 (-0.0230297 0.0262767 -0.0300455)
      PathPoint PathPoint_pelvis: pelvis (-0.0277265 -0.057 -0.0918159)
    Thelen2003Muscle Ps_L4_L5_IVD_l: max_isometric_force=127.7691 optimal_fiber_length=0.09991496
        tendon_slack_length=0.05462649 pennation_angle_at_optimal=0.18675
      PathPoint PathPoint_lumbar4: lumbar4 (-0.00107687 0.00640038 -0.0282595)
      PathPoint PathPoint_pelvis: pelvis (-0.0277265 -0.057 -0.0918159)
    Thelen2003Muscle Ps_L5_TP_l: max_isometric_force=286.9734 optimal_fiber_length=0.1095563
        tendon_slack_length=0.04153117 pennation_angle_at_optimal=0.18675
      PathPoint PathPoint_lumbar5: lumbar5 (-0.0198485 0.023594 -0.0376734)
      PathPoint PathPoint_pelvis: pelvis (-0.0277265 -0.057 -0.0918159)
    Thelen2003Muscle Ps_L5_VB_l: max_isometric_force=358.6234 optimal_fiber_length=0.1004599
        tendon_slack_length=0.03030252 pennation_angle_at_optimal=0.18675
      PathPoint PathPoint_lumbar5: lumbar5 (0.00122274 0.0137623 -0.0349159)
      PathPoint PathPoint_pelvis: pelvis (-0.0277265 -0.057 -0.0918159)
    Thelen2003Muscle rect_abd_l: max_isometric_force=705.9128 optimal_fiber_length=0.3029422
        tendon_slack_length=0.08237547 pennation_angle_at_optimal=0
      PathPoint PathPoint_pelvis: pelvis (-0.0342604 -0.096476 -0.0128424)
      PathPoint rect_abd_l_viaPt1: Abdomen (0.0226108 -0.04 -0.0532596)
      PathPoint rect_abd_l_viaPt2: Abdomen (0.0374861 0.04 -0.0595195)
      PathPoint PathPoint_rib6_L: rib6_L (0.183831 -0.110172 -0.0409498)
    Thelen2003Muscle rect_abd_r: max_isometric_force=705.9127 optimal_fiber_length=0.3029447
        tendon_slack_length=0.08237613 pennation_angle_at_optimal=0
      PathPoint PathPoint_pelvis: pelvis (-0.0342584 -0.09648 0.0128434)
      PathPoint rect_abd_r_viaPt1: Abdomen (0.0226108 -0.04 0.0532596)
      PathPoint rect_abd_r_viaPt2: Abdomen (0.0374861 0.04 0.0595195)
      PathPoint PathPoint_rib6_R: rib6_R (0.183831 -0.110172 0.0409498)
    Thelen2003Muscle IL_L1_r: max_isometric_force=236.6806 optimal_fiber_length=0.05785545
        tendon_slack_length=0.1311676 pennation_angle_at_optimal=0.24086
      PathPoint PathPoint_pelvis: pelvis (-0.170317 0.010946 0.04535)
      PathPoint PathPoint_lumbar1: lumbar1 (-0.0307391 0.0332363 0.0280911)
    Thelen2003Muscle IL_L2_r: max_isometric_force=426.3203 optimal_fiber_length=0.04169714
        tendon_slack_length=0.09453411 pennation_angle_at_optimal=0.24086
      PathPoint PathPoint_pelvis: pelvis (-0.161827 0.028177 0.049705)
      PathPoint PathPoint_lumbar2: lumbar2 (-0.0372385 0.0268743 0.0295794)
    Thelen2003Muscle IL_L3_r: max_isometric_force=764.5916 optimal_fiber_length=0.02768748
        tendon_slack_length=0.06277197 pennation_angle_at_optimal=0.24086
      PathPoint PathPoint_pelvis: pelvis (-0.147827 0.039811 0.054567)
      PathPoint PathPoint_lumbar3: lumbar3 (-0.0439222 0.0284091 0.0398436)
    Thelen2003Muscle IL_L4_r: max_isometric_force=1987.998 optimal_fiber_length=0.01799076
        tendon_slack_length=0.04078793 pennation_angle_at_optimal=0.24086
      PathPoint PathPoint_pelvis: pelvis (-0.142747 0.036597 0.05126)
      PathPoint PathPoint_lumbar4: lumbar4 (-0.0498885 0.025506 0.0532212)
    Thelen2003Muscle IL_L1_l: max_isometric_force=236.6806 optimal_fiber_length=0.05785545
        tendon_slack_length=0.1311676 pennation_angle_at_optimal=0.24086
      PathPoint PathPoint_pelvis: pelvis (-0.170317 0.010946 -0.04535)
      PathPoint PathPoint_lumbar1: lumbar1 (-0.0307391 0.0332363 -0.0280911)
    Thelen2003Muscle IL_L2_l: max_isometric_force=426.3203 optimal_fiber_length=0.04169714
        tendon_slack_length=0.09453411 pennation_angle_at_optimal=0.24086
      PathPoint PathPoint_pelvis: pelvis (-0.161827 0.028177 -0.049705)
      PathPoint PathPoint_lumbar2: lumbar2 (-0.0372385 0.0268743 -0.0295794)
    Thelen2003Muscle IL_L3_l: max_isometric_force=764.5916 optimal_fiber_length=0.02768748
        tendon_slack_length=0.06277197 pennation_angle_at_optimal=0.24086
      PathPoint PathPoint_pelvis: pelvis (-0.147827 0.039811 -0.054567)
      PathPoint PathPoint_lumbar3: lumbar3 (-0.0439222 0.0284091 -0.0398436)
    Thelen2003Muscle IL_L4_l: max_isometric_force=1987.998 optimal_fiber_length=0.01799076
        tendon_slack_length=0.04078793 pennation_angle_at_optimal=0.24086
      PathPoint PathPoint_pelvis: pelvis (-0.142747 0.036597 -0.05126)
      PathPoint PathPoint_lumbar4: lumbar4 (-0.0498885 0.025506 -0.0532212)
    Thelen2003Muscle IL_R5_r: max_isometric_force=40.63497 optimal_fiber_length=0.1799992 tendon_slack_length=0.2519274
        pennation_angle_at_optimal=0.24086
      PathPoint PathPoint_pelvis: pelvis (-0.167207 0.014318 0.046028)
      PathPoint PathPoint_lumbar2: lumbar2 (-0.060263 0.0235332 0.0451909)
      PathPoint PathPoint_rib10_R: rib10_R (-0.0397226 -0.0100871 0.0363789)
      PathPoint PathPoint_rib9_R: rib9_R (-0.0417998 -0.00833129 0.041504)
      PathPoint PathPoint_rib8_R: rib8_R (-0.0417194 -0.0055572 0.041928)
      PathPoint PathPoint_rib7_R: rib7_R (-0.0430519 -0.00493471 0.0424473)
      PathPoint PathPoint_rib6_R: rib6_R (-0.0487178 -0.00511637 0.0446108)
      PathPoint PathPoint_rib5_R: rib5_R (-0.055624 -0.00387201 0.0493681)
    Thelen2003Muscle IL_R6_r: max_isometric_force=51.27196 optimal_fiber_length=0.174103 tendon_slack_length=0.2102833
        pennation_angle_at_optimal=0.24086
      PathPoint PathPoint_pelvis: pelvis (-0.156157 0.031008 0.049624)
      PathPoint PathPoint_lumbar2: lumbar2 (-0.0597567 0.0236533 0.0479123)
      PathPoint PathPoint_rib10_R: rib10_R (-0.0415867 -0.0118321 0.0402424)
      PathPoint PathPoint_rib9_R: rib9_R (-0.0436898 -0.00984127 0.0458519)
      PathPoint PathPoint_rib8_R: rib8_R (-0.0434754 -0.00675518 0.0462889)
      PathPoint PathPoint_rib7_R: rib7_R (-0.0446583 -0.00595869 0.0468402)
      PathPoint PathPoint_rib6_R: rib6_R (-0.050306 -0.00606434 0.0487885)
    Thelen2003Muscle IL_R7_r: max_isometric_force=63.21185 optimal_fiber_length=0.1699677 tendon_slack_length=0.178574
        pennation_angle_at_optimal=0.24086
      PathPoint PathPoint_pelvis: pelvis (-0.145067 0.038356 0.052922)
      PathPoint PathPoint_lumbar2: lumbar2 (-0.0592255 0.0235093 0.0508102)
      PathPoint PathPoint_rib10_R: rib10_R (-0.0430301 -0.0137801 0.0440257)
      PathPoint PathPoint_rib9_R: rib9_R (-0.0450227 -0.0115402 0.0501866)
      PathPoint PathPoint_rib8_R: rib8_R (-0.0447264 -0.00813815 0.050724)
      PathPoint PathPoint_rib7_R: rib7_R (-0.0457492 -0.00713566 0.0512978)
    Thelen2003Muscle IL_R8_r: max_isometric_force=56.83128 optimal_fiber_length=0.1577086 tendon_slack_length=0.1593017
        pennation_angle_at_optimal=0.24086
      PathPoint PathPoint_pelvis: pelvis (-0.166341 0.042901 0.0718381)
      PathPoint PathPoint_lumbar2: lumbar2 (-0.0585752 0.0238232 0.0534308)
      PathPoint PathPoint_rib10_R: rib10_R (-0.0439092 -0.015951 0.0478297)
      PathPoint PathPoint_rib9_R: rib9_R (-0.0456487 -0.0134462 0.0543213)
      PathPoint PathPoint_rib8_R: rib8_R (-0.0454223 -0.00972113 0.0552417)
    Thelen2003Muscle IL_R9_r: max_isometric_force=96.7723 optimal_fiber_length=0.1810907 tendon_slack_length=0.1066116
        pennation_angle_at_optimal=0.24086
      PathPoint PathPoint_pelvis: pelvis (-0.162242 0.044884 0.0730482)
      PathPoint PathPoint_lumbar2: lumbar2 (-0.0588076 0.0236818 0.0556646)
      PathPoint PathPoint_rib10_R: rib10_R (-0.0441848 -0.018364 0.0516572)
      PathPoint PathPoint_rib9_R: rib9_R (-0.0456547 -0.0155782 0.0585177)
    Thelen2003Muscle IL_R10_r: max_isometric_force=236.3784 optimal_fiber_length=0.1581041
        tendon_slack_length=0.09307894 pennation_angle_at_optimal=0.24086
      PathPoint PathPoint_pelvis: pelvis (-0.15912 0.04775 0.0753809)
      PathPoint PathPoint_lumbar2: lumbar2 (-0.058566 0.0235824 0.0581525)
      PathPoint PathPoint_rib10_R: rib10_R (-0.0440777 -0.019668 0.0535813)
    Thelen2003Muscle IL_R11_r: max_isometric_force=406.3802 optimal_fiber_length=0.1332244
        tendon_slack_length=0.06668545 pennation_angle_at_optimal=0.24086
      PathPoint PathPoint_pelvis: pelvis (-0.156191 0.049957 0.0780221)
      PathPoint PathPoint_lumbar2: lumbar2 (-0.058398 0.0236143 0.0611516)
      PathPoint PathPoint_rib11_R: rib11_R (-0.0380472 -0.0241953 0.0479418)
    Thelen2003Muscle IL_R12_r: max_isometric_force=461.7736 optimal_fiber_length=0.09885809
        tendon_slack_length=0.04948339 pennation_angle_at_optimal=0.24086
      PathPoint PathPoint_pelvis: pelvis (-0.153456 0.052124 0.0807505)
      PathPoint PathPoint_rib12_R: rib12_R (-0.0349337 -0.0315984 0.0453279)
    Thelen2003Muscle IL_R5_l: max_isometric_force=40.63498 optimal_fiber_length=0.1799992 tendon_slack_length=0.2519274
        pennation_angle_at_optimal=0.24086
      PathPoint PathPoint_pelvis: pelvis (-0.167207 0.014318 -0.046026)
      PathPoint PathPoint_lumbar2: lumbar2 (-0.060263 0.0235332 -0.0451909)
      PathPoint PathPoint_rib10_L: rib10_L (-0.0397226 -0.0100864 -0.0363791)
      PathPoint PathPoint_rib9_L: rib9_L (-0.0417998 -0.0083306 -0.0415039)
      PathPoint PathPoint_rib8_L: rib8_L (-0.0417194 -0.00555751 -0.0419281)
      PathPoint PathPoint_rib7_L: rib7_L (-0.0430529 -0.00493402 -0.0424475)
      PathPoint PathPoint_rib6_L: rib6_L (-0.0487178 -0.00511569 -0.044611)
      PathPoint PathPoint_rib5_L: rib5_L (-0.0556241 -0.00387236 -0.049368)
    Thelen2003Muscle IL_R6_l: max_isometric_force=51.27197 optimal_fiber_length=0.1741033 tendon_slack_length=0.2102837
        pennation_angle_at_optimal=0.24086
      PathPoint PathPoint_pelvis: pelvis (-0.156157 0.031008 -0.049626)
      PathPoint PathPoint_lumbar2: lumbar2 (-0.0597567 0.0236533 -0.0479123)
      PathPoint PathPoint_rib10_L: rib10_L (-0.0415877 -0.0118314 -0.0402429)
      PathPoint PathPoint_rib9_L: rib9_L (-0.0436888 -0.0098416 -0.0458517)
      PathPoint PathPoint_rib8_L: rib8_L (-0.0434754 -0.00675552 -0.0462888)
      PathPoint PathPoint_rib7_L: rib7_L (-0.0446583 -0.00595903 -0.0468403)
      PathPoint PathPoint_rib6_L: rib6_L (-0.0503061 -0.0060647 -0.0487884)
    Thelen2003Muscle IL_R7_l: max_isometric_force=63.21165 optimal_fiber_length=0.169968 tendon_slack_length=0.1785743
        pennation_angle_at_optimal=0.24086
      PathPoint PathPoint_pelvis: pelvis (-0.145067 0.038356 -0.052926)
      PathPoint PathPoint_lumbar2: lumbar2 (-0.0592255 0.0235093 -0.0508102)
      PathPoint PathPoint_rib10_L: rib10_L (-0.043029 -0.0137804 -0.0440261)
      PathPoint PathPoint_rib9_L: rib9_L (-0.0450227 -0.0115406 -0.0501867)
      PathPoint PathPoint_rib8_L: rib8_L (-0.0447263 -0.00813752 -0.0507243)
      PathPoint PathPoint_rib7_L: rib7_L (-0.0457492 -0.00713604 -0.0512979)
    Thelen2003Muscle IL_R8_l: max_isometric_force=56.8312 optimal_fiber_length=0.1577088 tendon_slack_length=0.1593019
        pennation_angle_at_optimal=0.24086
      PathPoint PathPoint_pelvis: pelvis (-0.166341 0.042901 -0.0718381)
      PathPoint PathPoint_lumbar2: lumbar2 (-0.0585752 0.0238232 -0.0534308)
      PathPoint PathPoint_rib10_L: rib10_L (-0.0439091 -0.0159504 -0.0478302)
      PathPoint PathPoint_rib9_L: rib9_L (-0.0456487 -0.0134466 -0.0543215)
      PathPoint PathPoint_rib8_L: rib8_L (-0.0454223 -0.00972154 -0.0552419)
    Thelen2003Muscle IL_R9_l: max_isometric_force=96.77186 optimal_fiber_length=0.181091 tendon_slack_length=0.1066118
        pennation_angle_at_optimal=0.24086
      PathPoint PathPoint_pelvis: pelvis (-0.162242 0.044884 -0.0730492)
      PathPoint PathPoint_lumbar2: lumbar2 (-0.0588076 0.0236818 -0.0556646)
      PathPoint PathPoint_rib10_L: rib10_L (-0.0441858 -0.0183634 -0.0516576)
      PathPoint PathPoint_rib9_L: rib9_L (-0.0456546 -0.0155776 -0.058518)
    Thelen2003Muscle IL_R10_l: max_isometric_force=236.3767 optimal_fiber_length=0.1581044
        tendon_slack_length=0.09307914 pennation_angle_at_optimal=0.24086
      PathPoint PathPoint_pelvis: pelvis (-0.15912 0.04775 -0.0753819)
      PathPoint PathPoint_lumbar2: lumbar2 (-0.058566 0.0235824 -0.0581525)
      PathPoint PathPoint_rib10_L: rib10_L (-0.0440776 -0.0196674 -0.0535815)
    Thelen2003Muscle IL_R11_l: max_isometric_force=406.3796 optimal_fiber_length=0.1332245
        tendon_slack_length=0.06668551 pennation_angle_at_optimal=0.24086
      PathPoint PathPoint_pelvis: pelvis (-0.156191 0.049957 -0.0780211)
      PathPoint PathPoint_lumbar2: lumbar2 (-0.058398 0.0236143 -0.0611516)
      PathPoint PathPoint_rib11_L: rib11_L (-0.0380471 -0.0241956 -0.0479418)
    Thelen2003Muscle IL_R12_l: max_isometric_force=461.7729 optimal_fiber_length=0.09885815
        tendon_slack_length=0.04948342 pennation_angle_at_optimal=0.24086
      PathPoint PathPoint_pelvis: pelvis (-0.153456 0.052124 -0.0807455)
      PathPoint PathPoint_rib12_L: rib12_L (-0.0349336 -0.0315987 -0.0453278)
    Thelen2003Muscle LTpT_T1_r: max_isometric_force=117.2912 optimal_fiber_length=0.1101996
        tendon_slack_length=0.2609467 pennation_angle_at_optimal=0.21991
      PathPoint PathPoint_lumbar1: lumbar1 (-0.058168 0.0163864 0.0036817)
      ConditionalPathPoint ViaPoint_thoracic12: thoracic12 (-0.0382721 0.0244853 -0.000155311)
          socket_coordinate=/jointset/L5_S1_IVDjnt/L5_S1_FE range=(-1.74533 1.74533) [radians]
      ConditionalPathPoint ViaPoint_thoracic11: thoracic11 (-0.0285874 0.0196598 0.000124441)
          socket_coordinate=/jointset/L5_S1_IVDjnt/L5_S1_FE range=(-1.74533 1.74533)
      ConditionalPathPoint ViaPoint_thoracic10: thoracic10 (-0.0306958 0.0301651 0.0121382)
          socket_coordinate=/jointset/L5_S1_IVDjnt/L5_S1_FE range=(-1.74533 1.74533)
      ConditionalPathPoint ViaPoint_thoracic9: thoracic9 (-0.0303209 0.0262022 0.0169136)
          socket_coordinate=/jointset/L5_S1_IVDjnt/L5_S1_FE range=(-1.74533 1.74533)
      ConditionalPathPoint ViaPoint_thoracic8: thoracic8 (-0.0301166 0.0249513 0.0183777)
          socket_coordinate=/jointset/L5_S1_IVDjnt/L5_S1_FE range=(-1.74533 1.74533)
      ConditionalPathPoint ViaPoint_thoracic7: thoracic7 (-0.0321281 0.025089 0.0200684)
          socket_coordinate=/jointset/L5_S1_IVDjnt/L5_S1_FE range=(-1.74533 1.74533)
      ConditionalPathPoint ViaPoint_thoracic6: thoracic6 (-0.0371573 0.0224703 0.0261633)
          socket_coordinate=/jointset/L5_S1_IVDjnt/L5_S1_FE range=(-1.74533 1.74533)
      ConditionalPathPoint ViaPoint_thoracic5: thoracic5 (-0.0416665 0.0190701 0.0336295)
          socket_coordinate=/jointset/L5_S1_IVDjnt/L5_S1_FE range=(-1.74533 1.74533)
      PathPoint PathPoint_thoracic1: thoracic1 (-0.0440818 0.00913772 0.0373488)
    Thelen2003Muscle LTpT_T2_r: max_isometric_force=117.9729 optimal_fiber_length=0.1148596
        tendon_slack_length=0.2762357 pennation_angle_at_optimal=0.21991
      PathPoint PathPoint_lumbar2: lumbar2 (-0.0624818 0.00707317 0.0118707)
      ConditionalPathPoint ViaPoint_thoracic12: thoracic12 (-0.0379825 0.0278597 0.0017488)
          socket_coordinate=/jointset/L5_S1_IVDjnt/L5_S1_FE range=(-1.74533 1.74533)
      ConditionalPathPoint ViaPoint_thoracic11: thoracic11 (-0.0282478 0.0223181 0.0026682)
          socket_coordinate=/jointset/L5_S1_IVDjnt/L5_S1_FE range=(-1.74533 1.74533)
      ConditionalPathPoint ViaPoint_thoracic10: thoracic10 (-0.0309541 0.0321234 0.0149182)
          socket_coordinate=/jointset/L5_S1_IVDjnt/L5_S1_FE range=(-1.74533 1.74533)
      ConditionalPathPoint ViaPoint_thoracic9: thoracic9 (-0.0303494 0.0274238 0.0192085)
          socket_coordinate=/jointset/L5_S1_IVDjnt/L5_S1_FE range=(-1.74533 1.74533)
      ConditionalPathPoint ViaPoint_thoracic8: thoracic8 (-0.0301333 0.0253011 0.0206044)
          socket_coordinate=/jointset/L5_S1_IVDjnt/L5_S1_FE range=(-1.74533 1.74533)
      ConditionalPathPoint ViaPoint_thoracic7: thoracic7 (-0.0320383 0.0243976 0.022198)
          socket_coordinate=/jointset/L5_S1_IVDjnt/L5_S1_FE range=(-1.74533 1.74533)
      ConditionalPathPoint ViaPoint_thoracic6: thoracic6 (-0.0363677 0.0208203 0.0279059)
          socket_coordinate=/jointset/L5_S1_IVDjnt/L5_S1_FE range=(-1.74533 1.74533)
      ConditionalPathPoint ViaPoint_thoracic5: thoracic5 (-0.0411216 0.0167369 0.0349488)
          socket_coordinate=/jointset/L5_S1_IVDjnt/L5_S1_FE range=(-1.74533 1.74533)
      ConditionalPathPoint ViaPoint_thoracic4: thoracic4 (-0.0368271 0.0120711 0.0378488)
          socket_coordinate=/jointset/L5_S1_IVDjnt/L5_S1_FE range=(-1.74533 1.74533)
      PathPoint PathPoint_thoracic2: thoracic2 (-0.0419088 0.00950815 0.0377388)
    Thelen2003Muscle LTpT_T3_r: max_isometric_force=104.8194 optimal_fiber_length=0.1165312
        tendon_slack_length=0.2802558 pennation_angle_at_optimal=0.21991
      PathPoint PathPoint_lumbar3: lumbar3 (-0.069207 0.00870596 0.0230593)
      PathPoint PathPoint_lumbar1: lumbar1 (-0.0521937 0.0100651 0.00560667)
      ConditionalPathPoint ViaPoint_thoracic12: thoracic12 (-0.0379825 0.0278597 0.0011466)
          socket_coordinate=/jointset/L5_S1_IVDjnt/L5_S1_FE range=(-1.74533 1.74533)
      ConditionalPathPoint ViaPoint_thoracic11: thoracic11 (-0.0282478 0.0223181 0.0022347)
          socket_coordinate=/jointset/L5_S1_IVDjnt/L5_S1_FE range=(-1.74533 1.74533)
      ConditionalPathPoint ViaPoint_thoracic10: thoracic10 (-0.0309541 0.0321234 0.0146956)
          socket_coordinate=/jointset/L5_S1_IVDjnt/L5_S1_FE range=(-1.74533 1.74533)
      ConditionalPathPoint ViaPoint_thoracic9: thoracic9 (-0.0303494 0.0274238 0.0191237)
          socket_coordinate=/jointset/L5_S1_IVDjnt/L5_S1_FE range=(-1.74533 1.74533)
      ConditionalPathPoint ViaPoint_thoracic8: thoracic8 (-0.0301333 0.0253011 0.0206537)
          socket_coordinate=/jointset/L5_S1_IVDjnt/L5_S1_FE range=(-1.74533 1.74533)
      ConditionalPathPoint ViaPoint_thoracic7: thoracic7 (-0.0320383 0.0243976 0.0223881)
          socket_coordinate=/jointset/L5_S1_IVDjnt/L5_S1_FE range=(-1.74533 1.74533)
      ConditionalPathPoint ViaPoint_thoracic6: thoracic6 (-0.0363677 0.0208203 0.0282324)
          socket_coordinate=/jointset/L5_S1_IVDjnt/L5_S1_FE range=(-1.74533 1.74533)
      ConditionalPathPoint ViaPoint_thoracic5: thoracic5 (-0.0411216 0.0167369 0.0354106)
          socket_coordinate=/jointset/L5_S1_IVDjnt/L5_S1_FE range=(-1.74533 1.74533)
      PathPoint PathPoint_thoracic3: thoracic3 (-0.0445243 0.00971281 0.0383688)
    Thelen2003Muscle LTpT_T4_r: max_isometric_force=42.33129 optimal_fiber_length=0.1168823
        tendon_slack_length=0.2811003 pennation_angle_at_optimal=0.21991
      PathPoint PathPoint_lumbar4: lumbar4 (-0.0751779 0.00563317 0.0277196)
      PathPoint PathPoint_lumbar1: lumbar1 (-0.0521993 0.010062 0.00672688)
      ConditionalPathPoint ViaPoint_thoracic12: thoracic12 (-0.0379825 0.0278597 0.002381)
          socket_coordinate=/jointset/L5_S1_IVDjnt/L5_S1_FE range=(-1.74533 1.74533)
      ConditionalPathPoint ViaPoint_thoracic11: thoracic11 (-0.0282478 0.0223181 0.0035343)
          socket_coordinate=/jointset/L5_S1_IVDjnt/L5_S1_FE range=(-1.74533 1.74533)
      ConditionalPathPoint ViaPoint_thoracic10: thoracic10 (-0.0309541 0.0321234 0.0160769)
          socket_coordinate=/jointset/L5_S1_IVDjnt/L5_S1_FE range=(-1.74533 1.74533)
      ConditionalPathPoint ViaPoint_thoracic9: thoracic9 (-0.0303494 0.0274238 0.0205583)
          socket_coordinate=/jointset/L5_S1_IVDjnt/L5_S1_FE range=(-1.74533 1.74533)
      ConditionalPathPoint ViaPoint_thoracic8: thoracic8 (-0.0301333 0.0253011 0.0221402)
          socket_coordinate=/jointset/L5_S1_IVDjnt/L5_S1_FE range=(-1.74533 1.74533)
      ConditionalPathPoint ViaPoint_thoracic7: thoracic7 (-0.0320383 0.0243976 0.0239291)
          socket_coordinate=/jointset/L5_S1_IVDjnt/L5_S1_FE range=(-1.74533 1.74533)
      ConditionalPathPoint ViaPoint_thoracic6: thoracic6 (-0.0363677 0.0208203 0.0298262)
          socket_coordinate=/jointset/L5_S1_IVDjnt/L5_S1_FE range=(-1.74533 1.74533)
      PathPoint PathPoint_thoracic4: thoracic4 (-0.0559828 0.00805259 0.0401563)
    Thelen2003Muscle LTpT_T5_r: max_isometric_force=48.45396 optimal_fiber_length=0.1099092 tendon_slack_length=0.26433
        pennation_angle_at_optimal=0.21991
      PathPoint PathPoint_lumbar4: lumbar4 (-0.0766526 0.00246164 0.0245886)
      PathPoint PathPoint_lumbar2: lumbar2 (-0.0538945 0.0240884 0.00940531)
      ConditionalPathPoint ViaPoint_thoracic12: thoracic12 (-0.0379825 0.0278597 0.0043361)
          socket_coordinate=/jointset/L5_S1_IVDjnt/L5_S1_FE range=(-1.74533 1.74533)
      ConditionalPathPoint ViaPoint_thoracic11: thoracic11 (-0.0282478 0.0223181 0.0058009)
          socket_coordinate=/jointset/L5_S1_IVDjnt/L5_S1_FE range=(-1.74533 1.74533)
      ConditionalPathPoint ViaPoint_thoracic10: thoracic10 (-0.0309541 0.0321234 0.0187329)
          socket_coordinate=/jointset/L5_S1_IVDjnt/L5_S1_FE range=(-1.74533 1.74533)
      ConditionalPathPoint ViaPoint_thoracic9: thoracic9 (-0.0303494 0.0274238 0.0234687)
          socket_coordinate=/jointset/L5_S1_IVDjnt/L5_S1_FE range=(-1.74533 1.74533)
      ConditionalPathPoint ViaPoint_thoracic8: thoracic8 (-0.0301333 0.0253011 0.0252982)
          socket_coordinate=/jointset/L5_S1_IVDjnt/L5_S1_FE range=(-1.74533 1.74533)
      ConditionalPathPoint ViaPoint_thoracic7: thoracic7 (-0.0320383 0.0243976 0.0273471)
          socket_coordinate=/jointset/L5_S1_IVDjnt/L5_S1_FE range=(-1.74533 1.74533)
      PathPoint PathPoint_thoracic5: thoracic5 (-0.0566303 0.0103102 0.0403503)
    Thelen2003Muscle LTpT_T6_r: max_isometric_force=63.57828 optimal_fiber_length=0.1123712
        tendon_slack_length=0.2567408 pennation_angle_at_optimal=0.21991
      PathPoint PathPoint_lumbar5: lumbar5 (-0.0497839 -0.00181129 0.00726963)
      PathPoint PathPoint_lumbar2: lumbar2 (-0.0538945 0.0240884 0.0120053)
      PathPoint PathPoint_thoracic10: thoracic10 (-0.0417825 0.0279397 0.0152288)
      PathPoint PathPoint_thoracic6: thoracic6 (-0.0546684 0.0141866 0.0344636)
    Thelen2003Muscle LTpT_T7_r: max_isometric_force=51.6273 optimal_fiber_length=0.1273669 tendon_slack_length=0.240844
        pennation_angle_at_optimal=0.21991
      PathPoint PathPoint_sacrum: sacrum (-0.142227 0.060513 0.00733293)
      PathPoint PathPoint_lumbar2: lumbar2 (-0.0538855 0.0240858 0.0140053)
      PathPoint PathPoint_thoracic10: thoracic10 (-0.0429008 0.0283149 0.0193502)
      PathPoint PathPoint_thoracic7: thoracic7 (-0.0478626 0.0167762 0.0298305)
    Thelen2003Muscle LTpT_T8_r: max_isometric_force=79.80741 optimal_fiber_length=0.1381831
        tendon_slack_length=0.2182273 pennation_angle_at_optimal=0.21991
      PathPoint PathPoint_sacrum: sacrum (-0.153807 0.050246 0.00743058)
      PathPoint PathPoint_lumbar4: lumbar4 (-0.0761173 0.016583 0.0307295)
      PathPoint PathPoint_lumbar3: lumbar3 (-0.0634274 0.0249762 0.0199201)
      PathPoint PathPoint_lumbar2: lumbar2 (-0.0557021 0.0232564 0.0142944)
      PathPoint PathPoint_thoracic8: thoracic8 (-0.045313 0.0160382 0.0287649)
    Thelen2003Muscle LTpT_T9_r: max_isometric_force=102.0682 optimal_fiber_length=0.134815
        tendon_slack_length=0.2284937 pennation_angle_at_optimal=0.21991
      PathPoint PathPoint_sacrum: sacrum (-0.176727 0.026835 0.00705607)
      PathPoint PathPoint_lumbar4: lumbar4 (-0.0758776 0.0165115 0.0325885)
      PathPoint PathPoint_lumbar3: lumbar3 (-0.0629961 0.0252187 0.0211602)
      PathPoint PathPoint_lumbar2: lumbar2 (-0.0549703 0.0234325 0.0147546)
      PathPoint PathPoint_thoracic9: thoracic9 (-0.0426809 0.0267355 0.0299488)
    Thelen2003Muscle LTpT_T10_r: max_isometric_force=113.2762 optimal_fiber_length=0.1249129
        tendon_slack_length=0.2117109 pennation_angle_at_optimal=0.21991
      PathPoint PathPoint_sacrum: sacrum (-0.175367 0.024561 0.017776)
      PathPoint PathPoint_lumbar4: lumbar4 (-0.0758776 0.0165115 0.0376685)
      PathPoint PathPoint_lumbar3: lumbar3 (-0.0626052 0.025335 0.0258036)
      PathPoint PathPoint_lumbar2: lumbar2 (-0.0543206 0.0231494 0.0185296)
      PathPoint PathPoint_thoracic10: thoracic10 (-0.0362835 0.0295897 0.0183686)
    Thelen2003Muscle LTpT_T11_r: max_isometric_force=145.9032 optimal_fiber_length=0.1097875
        tendon_slack_length=0.1860754 pennation_angle_at_optimal=0.21991
      PathPoint PathPoint_sacrum: sacrum (-0.168557 0.030709 0.031096)
      PathPoint PathPoint_lumbar4: lumbar4 (-0.0760372 0.0155418 0.0474664)
      PathPoint PathPoint_lumbar3: lumbar3 (-0.0668048 0.0254524 0.032514)
      PathPoint PathPoint_lumbar2: lumbar2 (-0.0562436 0.0237008 0.0231096)
      PathPoint PathPoint_thoracic11: thoracic11 (-0.0334255 0.0287089 0.00993948)
    Thelen2003Muscle LTpT_T12_r: max_isometric_force=144.4434 optimal_fiber_length=0.08842957
        tendon_slack_length=0.1498765 pennation_angle_at_optimal=0.21991
      PathPoint PathPoint_sacrum: sacrum (-0.155667 0.0488 0.034986)
      PathPoint PathPoint_lumbar4: lumbar4 (-0.0760372 0.0155418 0.0507664)
      PathPoint PathPoint_lumbar3: lumbar3 (-0.0658223 0.0258718 0.0352788)
      PathPoint PathPoint_lumbar2: lumbar2 (-0.0558019 0.0242015 0.0256715)
      PathPoint PathPoint_thoracic12: thoracic12 (-0.037997 0.0291665 0.0101977)
    Thelen2003Muscle LTpT_R4_r: max_isometric_force=43.33033 optimal_fiber_length=0.1485009
        tendon_slack_length=0.2516895 pennation_angle_at_optimal=0.21991
      PathPoint PathPoint_lumbar4: lumbar4 (-0.0751779 0.00563317 0.0277197)
      PathPoint PathPoint_lumbar2: lumbar2 (-0.0556956 0.0257034 0.0141993)
      PathPoint PathPoint_rib10_R: rib10_R (-0.0190369 -0.00245531 0.01214)
      PathPoint PathPoint_rib9_R: rib9_R (-0.0232204 -0.00230748 0.0173403)
      PathPoint PathPoint_rib8_R: rib8_R (-0.0256688 -0.00152138 0.0194668)
      PathPoint PathPoint_rib7_R: rib7_R (-0.0294459 -0.00162786 0.0217521)
      PathPoint PathPoint_rib4_R: rib4_R (-0.0424773 0.000648292 0.0327854)
    Thelen2003Muscle LTpT_R5_r: max_isometric_force=44.7357 optimal_fiber_length=0.1393211 tendon_slack_length=0.236131
        pennation_angle_at_optimal=0.21991
      PathPoint PathPoint_lumbar4: lumbar4 (-0.0766526 0.00246164 0.0245886)
      PathPoint PathPoint_lumbar2: lumbar2 (-0.0570987 0.0252485 0.0171389)
      PathPoint PathPoint_rib10_R: rib10_R (-0.0230224 -0.00336527 0.0158925)
      PathPoint PathPoint_rib9_R: rib9_R (-0.0270575 -0.00307545 0.0213286)
      PathPoint PathPoint_rib8_R: rib8_R (-0.0293079 -0.00203534 0.0235492)
      PathPoint PathPoint_rib7_R: rib7_R (-0.0328602 -0.00212383 0.0259196)
      PathPoint PathPoint_rib5_R: rib5_R (-0.0469845 -0.00182112 0.0359039)
    Thelen2003Muscle LTpT_R6_r: max_isometric_force=56.98793 optimal_fiber_length=0.1484152
        tendon_slack_length=0.2273689 pennation_angle_at_optimal=0.21991
      PathPoint PathPoint_lumbar5: lumbar5 (-0.0497839 -0.00181129 0.00726607)
      PathPoint PathPoint_lumbar3: lumbar3 (-0.0632297 0.0261477 0.0219309)
      PathPoint PathPoint_lumbar2: lumbar2 (-0.0538945 0.0240884 0.0170053)
      PathPoint PathPoint_rib10_R: rib10_R (-0.0268056 -0.00435324 0.019658)
      PathPoint PathPoint_rib9_R: rib9_R (-0.0306792 -0.00392541 0.0253565)
      PathPoint PathPoint_rib8_R: rib8_R (-0.0327036 -0.00263731 0.0276678)
      PathPoint PathPoint_rib7_R: rib7_R (-0.036001 -0.0026998 0.0301209)
      PathPoint PathPoint_rib6_R: rib6_R (-0.0431741 -0.00328544 0.0348976)
    Thelen2003Muscle LTpT_R7_r: max_isometric_force=53.12499 optimal_fiber_length=0.1435289
        tendon_slack_length=0.2400299 pennation_angle_at_optimal=0.21991
      PathPoint PathPoint_sacrum: sacrum (-0.142227 0.06051 0.00733607)
      PathPoint PathPoint_lumbar4: lumbar4 (-0.0757336 0.0173902 0.0328596)
      PathPoint PathPoint_lumbar3: lumbar3 (-0.0625538 0.0254686 0.0241876)
      PathPoint PathPoint_lumbar2: lumbar2 (-0.0539209 0.0240075 0.0203002)
      PathPoint PathPoint_rib10_R: rib10_R (-0.0319926 -0.00602519 0.0253397)
      PathPoint PathPoint_rib9_R: rib9_R (-0.0356057 -0.00539436 0.0314924)
      PathPoint PathPoint_rib8_R: rib8_R (-0.0372325 -0.00374526 0.0339287)
      PathPoint PathPoint_rib7_R: rib7_R (-0.0400897 -0.00374575 0.0365009)
    Thelen2003Muscle LTpT_R8_r: max_isometric_force=77.4901 optimal_fiber_length=0.1188754
        tendon_slack_length=0.2424698 pennation_angle_at_optimal=0.21991
      PathPoint PathPoint_sacrum: sacrum (-0.153807 0.05025 0.00742607)
      PathPoint PathPoint_lumbar4: lumbar4 (-0.0756598 0.0166871 0.0364302)
      PathPoint PathPoint_lumbar3: lumbar3 (-0.0626274 0.0248069 0.027662)
      PathPoint PathPoint_lumbar2: lumbar2 (-0.0541028 0.0236061 0.0236864)
      PathPoint PathPoint_rib10_R: rib10_R (-0.0364408 -0.00798315 0.0310718)
      PathPoint PathPoint_rib9_R: rib9_R (-0.0397776 -0.00715032 0.0377672)
      PathPoint PathPoint_rib8_R: rib8_R (-0.0409405 -0.00515221 0.0403108)
    Thelen2003Muscle LTpT_R9_r: max_isometric_force=73.56407 optimal_fiber_length=0.1033934
        tendon_slack_length=0.2525797 pennation_angle_at_optimal=0.21991
      PathPoint PathPoint_sacrum: sacrum (-0.176727 0.02684 0.00705607)
      PathPoint PathPoint_lumbar4: lumbar4 (-0.0759244 0.0162296 0.04012)
      PathPoint PathPoint_lumbar3: lumbar3 (-0.0629802 0.0243758 0.0314133)
      PathPoint PathPoint_lumbar2: lumbar2 (-0.0540798 0.0236588 0.0273182)
      PathPoint PathPoint_rib10_R: rib10_R (-0.0399795 -0.0102941 0.0368649)
      PathPoint PathPoint_rib9_R: rib9_R (-0.0430372 -0.00925328 0.0442107)
    Thelen2003Muscle LTpT_R10_r: max_isometric_force=122.8668 optimal_fiber_length=0.1227805
        tendon_slack_length=0.2109128 pennation_angle_at_optimal=0.21991
      PathPoint PathPoint_sacrum: sacrum (-0.175367 0.02456 0.017776)
      PathPoint PathPoint_lumbar4: lumbar4 (-0.0760059 0.0154072 0.0450246)
      PathPoint PathPoint_lumbar3: lumbar3 (-0.0630569 0.0240336 0.0354376)
      PathPoint PathPoint_lumbar2: lumbar2 (-0.0541479 0.0233766 0.0305411)
      PathPoint PathPoint_rib10_R: rib10_R (-0.0425507 -0.0130241 0.0426047)
    Thelen2003Muscle LTpT_R11_r: max_isometric_force=171.6811 optimal_fiber_length=0.1154713
        tendon_slack_length=0.1645002 pennation_angle_at_optimal=0.21991
      PathPoint PathPoint_sacrum: sacrum (-0.168557 0.03071 0.031096)
      PathPoint PathPoint_lumbar4: lumbar4 (-0.0752585 0.0165439 0.0545275)
      PathPoint PathPoint_lumbar3: lumbar3 (-0.0626409 0.0252434 0.0440122)
      PathPoint PathPoint_lumbar2: lumbar2 (-0.0538844 0.0241687 0.0385569)
      PathPoint PathPoint_rib11_R: rib11_R (-0.0364628 -0.0183123 0.0387681)
    Thelen2003Muscle LTpT_R12_r: max_isometric_force=150.8764 optimal_fiber_length=0.07459876
        tendon_slack_length=0.1450848 pennation_angle_at_optimal=0.21991
      PathPoint PathPoint_sacrum: sacrum (-0.155667 0.0488 0.034986)
      PathPoint PathPoint_lumbar4: lumbar4 (-0.0759411 0.0161246 0.0587822)
      PathPoint PathPoint_lumbar3: lumbar3 (-0.0627491 0.0249679 0.0474351)
      PathPoint PathPoint_lumbar2: lumbar2 (-0.0538945 0.0240884 0.0418203)
      PathPoint PathPoint_rib12_R: rib12_R (-0.0347358 -0.0264784 0.0390303)
    Thelen2003Muscle LTpT_T1_l: max_isometric_force=117.2026 optimal_fiber_length=0.1110061
        tendon_slack_length=0.2628564 pennation_angle_at_optimal=0.21991
      PathPoint PathPoint_lumbar1: lumbar1 (-0.0586525 0.0163955 -0.00368818)
      ConditionalPathPoint ViaPoint_thoracic12: thoracic12 (-0.0382721 0.0244853 0.000155311)
          socket_coordinate=/jointset/L5_S1_IVDjnt/L5_S1_FE range=(-1.74533 1.74533)
      ConditionalPathPoint ViaPoint_thoracic11: thoracic11 (-0.0285874 0.0196598 -0.000124441)
          socket_coordinate=/jointset/L5_S1_IVDjnt/L5_S1_FE range=(-1.74533 1.74533)
      ConditionalPathPoint ViaPoint_thoracic10: thoracic10 (-0.0306958 0.0301651 -0.0121382)
          socket_coordinate=/jointset/L5_S1_IVDjnt/L5_S1_FE range=(-1.74533 1.74533)
      ConditionalPathPoint ViaPoint_thoracic9: thoracic9 (-0.0303209 0.0262022 -0.0169136)
          socket_coordinate=/jointset/L5_S1_IVDjnt/L5_S1_FE range=(-1.74533 1.74533)
      ConditionalPathPoint ViaPoint_thoracic8: thoracic8 (-0.0301166 0.0249513 -0.0183777)
          socket_coordinate=/jointset/L5_S1_IVDjnt/L5_S1_FE range=(-1.74533 1.74533)
      ConditionalPathPoint ViaPoint_thoracic7: thoracic7 (-0.0321281 0.025089 -0.0200684)
          socket_coordinate=/jointset/L5_S1_IVDjnt/L5_S1_FE range=(-1.74533 1.74533)
      ConditionalPathPoint ViaPoint_thoracic6: thoracic6 (-0.0371573 0.0224703 -0.0261633)
          socket_coordinate=/jointset/L5_S1_IVDjnt/L5_S1_FE range=(-1.74533 1.74533)
      ConditionalPathPoint ViaPoint_thoracic5: thoracic5 (-0.0416665 0.0190701 -0.0336295)
          socket_coordinate=/jointset/L5_S1_IVDjnt/L5_S1_FE range=(-1.74533 1.74533)
      PathPoint PathPoint_thoracic1: thoracic1 (-0.0437178 0.00913776 -0.0373488)
    Thelen2003Muscle LTpT_T2_l: max_isometric_force=117.9729 optimal_fiber_length=0.1148596
        tendon_slack_length=0.2762357 pennation_angle_at_optimal=0.21991
      PathPoint PathPoint_lumbar2: lumbar2 (-0.0624818 0.00707317 -0.0118707)
      ConditionalPathPoint ViaPoint_thoracic12: thoracic12 (-0.0379825 0.0278597 -0.0017488)
          socket_coordinate=/jointset/L5_S1_IVDjnt/L5_S1_FE range=(-1.74533 1.74533)
      ConditionalPathPoint ViaPoint_thoracic11: thoracic11 (-0.0282478 0.0223181 -0.0026682)
          socket_coordinate=/jointset/L5_S1_IVDjnt/L5_S1_FE range=(-1.74533 1.74533)
      ConditionalPathPoint ViaPoint_thoracic10: thoracic10 (-0.0309541 0.0321234 -0.0149182)
          socket_coordinate=/jointset/L5_S1_IVDjnt/L5_S1_FE range=(-1.74533 1.74533)
      ConditionalPathPoint ViaPoint_thoracic9: thoracic9 (-0.0303494 0.0274238 -0.0192085)
          socket_coordinate=/jointset/L5_S1_IVDjnt/L5_S1_FE range=(-1.74533 1.74533)
      ConditionalPathPoint ViaPoint_thoracic8: thoracic8 (-0.0301333 0.0253011 -0.0206044)
          socket_coordinate=/jointset/L5_S1_IVDjnt/L5_S1_FE range=(-1.74533 1.74533)
      ConditionalPathPoint ViaPoint_thoracic7: thoracic7 (-0.0320383 0.0243976 -0.022198)
          socket_coordinate=/jointset/L5_S1_IVDjnt/L5_S1_FE range=(-1.74533 1.74533)
      ConditionalPathPoint ViaPoint_thoracic6: thoracic6 (-0.0363677 0.0208203 -0.0279059)
          socket_coordinate=/jointset/L5_S1_IVDjnt/L5_S1_FE range=(-1.74533 1.74533)
      ConditionalPathPoint ViaPoint_thoracic5: thoracic5 (-0.0411216 0.0167369 -0.0349488)
          socket_coordinate=/jointset/L5_S1_IVDjnt/L5_S1_FE range=(-1.74533 1.74533)
      ConditionalPathPoint ViaPoint_thoracic4: thoracic4 (-0.0368271 0.0120711 -0.0378488)
          socket_coordinate=/jointset/L5_S1_IVDjnt/L5_S1_FE range=(-1.74533 1.74533)
      PathPoint PathPoint_thoracic2: thoracic2 (-0.0419088 0.00950815 -0.0377388)
    Thelen2003Muscle LTpT_T3_l: max_isometric_force=104.8194 optimal_fiber_length=0.1165312
        tendon_slack_length=0.2802558 pennation_angle_at_optimal=0.21991
      PathPoint PathPoint_lumbar3: lumbar3 (-0.069207 0.00870596 -0.0230593)
      PathPoint PathPoint_lumbar1: lumbar1 (-0.0521937 0.0100651 -0.00560667)
      ConditionalPathPoint ViaPoint_thoracic12: thoracic12 (-0.0379825 0.0278597 -0.0011466)
          socket_coordinate=/jointset/L5_S1_IVDjnt/L5_S1_FE range=(-1.74533 1.74533)
      ConditionalPathPoint ViaPoint_thoracic11: thoracic11 (-0.0282478 0.0223181 -0.0022347)
          socket_coordinate=/jointset/L5_S1_IVDjnt/L5_S1_FE range=(-1.74533 1.74533)
      ConditionalPathPoint ViaPoint_thoracic10: thoracic10 (-0.0309541 0.0321234 -0.0146956)
          socket_coordinate=/jointset/L5_S1_IVDjnt/L5_S1_FE range=(-1.74533 1.74533)
      ConditionalPathPoint ViaPoint_thoracic9: thoracic9 (-0.0303494 0.0274238 -0.0191237)
          socket_coordinate=/jointset/L5_S1_IVDjnt/L5_S1_FE range=(-1.74533 1.74533)
      ConditionalPathPoint ViaPoint_thoracic8: thoracic8 (-0.0301333 0.0253011 -0.0206537)
          socket_coordinate=/jointset/L5_S1_IVDjnt/L5_S1_FE range=(-1.74533 1.74533)
      ConditionalPathPoint ViaPoint_thoracic7: thoracic7 (-0.0320383 0.0243976 -0.0223881)
          socket_coordinate=/jointset/L5_S1_IVDjnt/L5_S1_FE range=(-1.74533 1.74533)
      ConditionalPathPoint ViaPoint_thoracic6: thoracic6 (-0.0363677 0.0208203 -0.0282324)
          socket_coordinate=/jointset/L5_S1_IVDjnt/L5_S1_FE range=(-1.74533 1.74533)
      ConditionalPathPoint ViaPoint_thoracic5: thoracic5 (-0.0411216 0.0167369 -0.0354106)
          socket_coordinate=/jointset/L5_S1_IVDjnt/L5_S1_FE range=(-1.74533 1.74533)
      PathPoint PathPoint_thoracic3: thoracic3 (-0.0445243 0.00971281 -0.0383688)
    Thelen2003Muscle LTpT_T4_l: max_isometric_force=42.33129 optimal_fiber_length=0.1168823
        tendon_slack_length=0.2811003 pennation_angle_at_optimal=0.21991
      PathPoint PathPoint_lumbar4: lumbar4 (-0.0751779 0.00563317 -0.0277196)
      PathPoint PathPoint_lumbar1: lumbar1 (-0.0521993 0.010062 -0.00672688)
      ConditionalPathPoint ViaPoint_thoracic12: thoracic12 (-0.0379825 0.0278597 -0.002381)
          socket_coordinate=/jointset/L5_S1_IVDjnt/L5_S1_FE range=(-1.74533 1.74533)
      ConditionalPathPoint ViaPoint_thoracic11: thoracic11 (-0.0282478 0.0223181 -0.0035343)
          socket_coordinate=/jointset/L5_S1_IVDjnt/L5_S1_FE range=(-1.74533 1.74533)
      ConditionalPathPoint ViaPoint_thoracic10: thoracic10 (-0.0309541 0.0321234 -0.0160769)
          socket_coordinate=/jointset/L5_S1_IVDjnt/L5_S1_FE range=(-1.74533 1.74533)
      ConditionalPathPoint ViaPoint_thoracic9: thoracic9 (-0.0303494 0.0274238 -0.0205583)
          socket_coordinate=/jointset/L5_S1_IVDjnt/L5_S1_FE range=(-1.74533 1.74533)
      ConditionalPathPoint ViaPoint_thoracic8: thoracic8 (-0.0301333 0.0253011 -0.0221402)
          socket_coordinate=/jointset/L5_S1_IVDjnt/L5_S1_FE range=(-1.74533 1.74533)
      ConditionalPathPoint ViaPoint_thoracic7: thoracic7 (-0.0320383 0.0243976 -0.0239291)
          socket_coordinate=/jointset/L5_S1_IVDjnt/L5_S1_FE range=(-1.74533 1.74533)
      ConditionalPathPoint ViaPoint_thoracic6: thoracic6 (-0.0363677 0.0208203 -0.0298262)
          socket_coordinate=/jointset/L5_S1_IVDjnt/L5_S1_FE range=(-1.74533 1.74533)
      PathPoint PathPoint_thoracic4: thoracic4 (-0.0559828 0.00805259 -0.0401563)
    Thelen2003Muscle LTpT_T5_l: max_isometric_force=48.45396 optimal_fiber_length=0.1099092 tendon_slack_length=0.26433
        pennation_angle_at_optimal=0.21991
      PathPoint PathPoint_lumbar4: lumbar4 (-0.0766526 0.00246164 -0.0245886)
      PathPoint PathPoint_lumbar2: lumbar2 (-0.0538945 0.0240884 -0.00940531)
      ConditionalPathPoint ViaPoint_thoracic12: thoracic12 (-0.0379825 0.0278597 -0.0043361)
          socket_coordinate=/jointset/L5_S1_IVDjnt/L5_S1_FE range=(-1.74533 1.74533)
      ConditionalPathPoint ViaPoint_thoracic11: thoracic11 (-0.0282478 0.0223181 -0.0058009)
          socket_coordinate=/jointset/L5_S1_IVDjnt/L5_S1_FE range=(-1.74533 1.74533)
      ConditionalPathPoint ViaPoint_thoracic10: thoracic10 (-0.0309541 0.0321234 -0.0187329)
          socket_coordinate=/jointset/L5_S1_IVDjnt/L5_S1_FE range=(-1.74533 1.74533)
      ConditionalPathPoint ViaPoint_thoracic9: thoracic9 (-0.0303494 0.0274238 -0.0234687)
          socket_coordinate=/jointset/L5_S1_IVDjnt/L5_S1_FE range=(-1.74533 1.74533)
      ConditionalPathPoint ViaPoint_thoracic8: thoracic8 (-0.0301333 0.0253011 -0.0252982)
          socket_coordinate=/jointset/L5_S1_IVDjnt/L5_S1_FE range=(-1.74533 1.74533)
      ConditionalPathPoint ViaPoint_thoracic7: thoracic7 (-0.0320383 0.0243976 -0.0273471)
          socket_coordinate=/jointset/L5_S1_IVDjnt/L5_S1_FE range=(-1.74533 1.74533)
      PathPoint PathPoint_thoracic5: thoracic5 (-0.0566303 0.0103102 -0.0403503)
    Thelen2003Muscle LTpT_T6_l: max_isometric_force=63.57801 optimal_fiber_length=0.1123709
        tendon_slack_length=0.2567401 pennation_angle_at_optimal=0.21991
      PathPoint PathPoint_lumbar5: lumbar5 (-0.0497839 -0.00181129 -0.00726607)
      PathPoint PathPoint_lumbar2: lumbar2 (-0.0538945 0.0240884 -0.0120053)
      PathPoint PathPoint_thoracic10: thoracic10 (-0.0417825 0.0279397 -0.0152338)
      PathPoint PathPoint_thoracic6: thoracic6 (-0.0546684 0.0141866 -0.0344636)
    Thelen2003Muscle LTpT_T7_l: max_isometric_force=51.6273 optimal_fiber_length=0.1273668
        tendon_slack_length=0.2408438 pennation_angle_at_optimal=0.21991
      PathPoint PathPoint_sacrum: sacrum (-0.142227 0.060513 -0.00733607)
      PathPoint PathPoint_lumbar2: lumbar2 (-0.0538855 0.0240858 -0.0140053)
      PathPoint PathPoint_thoracic10: thoracic10 (-0.0429008 0.0283149 -0.0193532)
      PathPoint PathPoint_thoracic7: thoracic7 (-0.0478626 0.0167762 -0.0298305)
    Thelen2003Muscle LTpT_T8_l: max_isometric_force=79.80816 optimal_fiber_length=0.1381835
        tendon_slack_length=0.218228 pennation_angle_at_optimal=0.21991
      PathPoint PathPoint_sacrum: sacrum (-0.153807 0.050246 -0.00742607)
      PathPoint PathPoint_lumbar4: lumbar4 (-0.0761173 0.016583 -0.0307321)
      PathPoint PathPoint_lumbar3: lumbar3 (-0.0634274 0.0249762 -0.0199237)
      PathPoint PathPoint_lumbar2: lumbar2 (-0.0557021 0.0232564 -0.0142944)
      PathPoint PathPoint_thoracic8: thoracic8 (-0.045313 0.0160382 -0.0287649)
    Thelen2003Muscle LTpT_T9_l: max_isometric_force=102.0682 optimal_fiber_length=0.134815
        tendon_slack_length=0.2284937 pennation_angle_at_optimal=0.21991
      PathPoint PathPoint_sacrum: sacrum (-0.176727 0.026835 -0.00705607)
      PathPoint PathPoint_lumbar4: lumbar4 (-0.0758776 0.0165115 -0.0325885)
      PathPoint PathPoint_lumbar3: lumbar3 (-0.0629961 0.0252187 -0.0211602)
      PathPoint PathPoint_lumbar2: lumbar2 (-0.0549703 0.0234325 -0.0147546)
      PathPoint PathPoint_thoracic9: thoracic9 (-0.0426809 0.0267355 -0.0299488)
    Thelen2003Muscle LTpT_T10_l: max_isometric_force=113.2762 optimal_fiber_length=0.1249129
        tendon_slack_length=0.2117109 pennation_angle_at_optimal=0.21991
      PathPoint PathPoint_sacrum: sacrum (-0.175367 0.024561 -0.017776)
      PathPoint PathPoint_lumbar4: lumbar4 (-0.0758776 0.0165115 -0.0376685)
      PathPoint PathPoint_lumbar3: lumbar3 (-0.0626052 0.025335 -0.0258036)
      PathPoint PathPoint_lumbar2: lumbar2 (-0.0543206 0.0231494 -0.0185296)
      PathPoint PathPoint_thoracic10: thoracic10 (-0.0362835 0.0295897 -0.0183686)
    Thelen2003Muscle LTpT_T11_l: max_isometric_force=145.9028 optimal_fiber_length=0.1097879
        tendon_slack_length=0.1860761 pennation_angle_at_optimal=0.21991
      PathPoint PathPoint_sacrum: sacrum (-0.168557 0.030709 -0.031096)
      PathPoint PathPoint_lumbar4: lumbar4 (-0.0760372 0.0155418 -0.0474664)
      PathPoint PathPoint_lumbar3: lumbar3 (-0.0668048 0.0254524 -0.032509)
      PathPoint PathPoint_lumbar2: lumbar2 (-0.0562436 0.0237008 -0.0231096)
      PathPoint PathPoint_thoracic11: thoracic11 (-0.0334255 0.0287089 -0.00993948)
    Thelen2003Muscle LTpT_T12_l: max_isometric_force=144.4434 optimal_fiber_length=0.08842957
        tendon_slack_length=0.1498765 pennation_angle_at_optimal=0.21991
      PathPoint PathPoint_sacrum: sacrum (-0.155667 0.0488 0.034986)
      PathPoint PathPoint_lumbar4: lumbar4 (-0.0760372 0.0155418 0.0507664)
      PathPoint PathPoint_lumbar3: lumbar3 (-0.0658223 0.0258718 0.0352788)
      PathPoint PathPoint_lumbar2: lumbar2 (-0.0558019 0.0242015 0.0256715)
      PathPoint PathPoint_thoracic12: thoracic12 (-0.037997 0.0291665 0.0101977)
    Thelen2003Muscle LTpT_R4_l: max_isometric_force=43.33034 optimal_fiber_length=0.1485008
        tendon_slack_length=0.2516894 pennation_angle_at_optimal=0.21991
      PathPoint PathPoint_lumbar4: lumbar4 (-0.0751779 0.00563317 -0.0277196)
      PathPoint PathPoint_lumbar2: lumbar2 (-0.0556956 0.0257034 -0.0142013)
      PathPoint PathPoint_rib10_L: rib10_L (-0.0190369 -0.0024554 -0.01214)
      PathPoint PathPoint_rib9_L: rib9_L (-0.0232204 -0.00230661 -0.0173403)
      PathPoint PathPoint_rib8_L: rib8_L (-0.0256688 -0.00152152 -0.0194668)
      PathPoint PathPoint_rib7_L: rib7_L (-0.0294459 -0.00162802 -0.0217523)
      PathPoint PathPoint_rib4_L: rib4_L (-0.0424773 0.000648068 -0.0327853)
    Thelen2003Muscle LTpT_R5_l: max_isometric_force=44.7358 optimal_fiber_length=0.1393211
        tendon_slack_length=0.2361309 pennation_angle_at_optimal=0.21991
      PathPoint PathPoint_lumbar4: lumbar4 (-0.0766526 0.00246164 -0.0245886)
      PathPoint PathPoint_lumbar2: lumbar2 (-0.0570987 0.0252485 -0.0171429)
      PathPoint PathPoint_rib10_L: rib10_L (-0.0230224 -0.00336539 -0.0158925)
      PathPoint PathPoint_rib9_L: rib9_L (-0.0270575 -0.0030756 -0.0213286)
      PathPoint PathPoint_rib8_L: rib8_L (-0.0293079 -0.00203452 -0.0235492)
      PathPoint PathPoint_rib7_L: rib7_L (-0.0328612 -0.00212302 -0.0259197)
      PathPoint PathPoint_rib5_L: rib5_L (-0.0469846 -0.00182137 -0.0359039)
    Thelen2003Muscle LTpT_R6_l: max_isometric_force=56.98811 optimal_fiber_length=0.1484151
        tendon_slack_length=0.2273688 pennation_angle_at_optimal=0.21991
      PathPoint PathPoint_lumbar5: lumbar5 (-0.0497839 -0.00181129 -0.00726607)
      PathPoint PathPoint_lumbar3: lumbar3 (-0.0632297 0.0261477 -0.0219269)
      PathPoint PathPoint_lumbar2: lumbar2 (-0.0538945 0.0240884 -0.0170053)
      PathPoint PathPoint_rib10_L: rib10_L (-0.0268058 -0.00435338 -0.0196579)
      PathPoint PathPoint_rib9_L: rib9_L (-0.0306792 -0.0039256 -0.0253565)
      PathPoint PathPoint_rib8_L: rib8_L (-0.0327035 -0.00263651 -0.0276677)
      PathPoint PathPoint_rib7_L: rib7_L (-0.036001 -0.00269902 -0.0301211)
      PathPoint PathPoint_rib6_L: rib6_L (-0.0431742 -0.0032857 -0.0348976)
    Thelen2003Muscle LTpT_R7_l: max_isometric_force=53.12505 optimal_fiber_length=0.1435287
        tendon_slack_length=0.2400296 pennation_angle_at_optimal=0.21991
      PathPoint PathPoint_sacrum: sacrum (-0.142227 0.06051 -0.00733607)
      PathPoint PathPoint_lumbar4: lumbar4 (-0.0757336 0.0173902 -0.03286)
      PathPoint PathPoint_lumbar3: lumbar3 (-0.0625538 0.0254686 -0.0241926)
      PathPoint PathPoint_lumbar2: lumbar2 (-0.0539209 0.0240075 -0.0202982)
      PathPoint PathPoint_rib10_L: rib10_L (-0.0319925 -0.00602537 -0.0253396)
      PathPoint PathPoint_rib9_L: rib9_L (-0.0356057 -0.00539459 -0.0314924)
      PathPoint PathPoint_rib8_L: rib8_L (-0.0372325 -0.00374451 -0.0339286)
      PathPoint PathPoint_rib7_L: rib7_L (-0.0400887 -0.00374602 -0.0365011)
    Thelen2003Muscle LTpT_R8_l: max_isometric_force=77.48995 optimal_fiber_length=0.1188751
        tendon_slack_length=0.242469 pennation_angle_at_optimal=0.21991
      PathPoint PathPoint_sacrum: sacrum (-0.153807 0.05025 -0.00742607)
      PathPoint PathPoint_lumbar4: lumbar4 (-0.0756598 0.0166871 -0.0364272)
      PathPoint PathPoint_lumbar3: lumbar3 (-0.0626274 0.0248069 -0.027662)
      PathPoint PathPoint_lumbar2: lumbar2 (-0.0541028 0.0236061 -0.0236854)
      PathPoint PathPoint_rib10_L: rib10_L (-0.0364407 -0.00798337 -0.0310717)
      PathPoint PathPoint_rib9_L: rib9_L (-0.0397786 -0.00714959 -0.0377672)
      PathPoint PathPoint_rib8_L: rib8_L (-0.0409404 -0.00515251 -0.040311)
    Thelen2003Muscle LTpT_R9_l: max_isometric_force=73.56375 optimal_fiber_length=0.1033935 tendon_slack_length=0.25258
        pennation_angle_at_optimal=0.21991
      PathPoint PathPoint_sacrum: sacrum (-0.176727 0.02684 -0.00705607)
      PathPoint PathPoint_lumbar4: lumbar4 (-0.0759244 0.0162296 -0.04012)
      PathPoint PathPoint_lumbar3: lumbar3 (-0.0629802 0.0243758 -0.0314113)
      PathPoint PathPoint_lumbar2: lumbar2 (-0.0540798 0.0236588 -0.0273202)
      PathPoint PathPoint_rib10_L: rib10_L (-0.0399794 -0.0102944 -0.0368649)
      PathPoint PathPoint_rib9_L: rib9_L (-0.0430382 -0.0092536 -0.0442106)
    Thelen2003Muscle LTpT_R10_l: max_isometric_force=122.8665 optimal_fiber_length=0.1227814
        tendon_slack_length=0.2109144 pennation_angle_at_optimal=0.21991
      PathPoint PathPoint_sacrum: sacrum (-0.175367 0.02456 -0.017776)
      PathPoint PathPoint_lumbar4: lumbar4 (-0.0760059 0.0154072 -0.0450256)
      PathPoint PathPoint_lumbar3: lumbar3 (-0.0630569 0.0240336 -0.0354336)
      PathPoint PathPoint_lumbar2: lumbar2 (-0.0541479 0.0233766 -0.0305381)
      PathPoint PathPoint_rib10_L: rib10_L (-0.0425506 -0.0130244 -0.042605)
    Thelen2003Muscle LTpT_R11_l: max_isometric_force=171.6811 optimal_fiber_length=0.1154718
        tendon_slack_length=0.1645009 pennation_angle_at_optimal=0.21991
      PathPoint PathPoint_sacrum: sacrum (-0.168557 0.03071 -0.031096)
      PathPoint PathPoint_lumbar4: lumbar4 (-0.0752585 0.0165439 -0.0545285)
      PathPoint PathPoint_lumbar3: lumbar3 (-0.0626409 0.0252434 -0.0440152)
      PathPoint PathPoint_lumbar2: lumbar2 (-0.0538844 0.0241687 -0.0385539)
      PathPoint PathPoint_rib11_L: rib11_L (-0.0364635 -0.0183126 -0.038768)
    Thelen2003Muscle LTpT_R12_l: max_isometric_force=150.8766 optimal_fiber_length=0.0745989
        tendon_slack_length=0.145085 pennation_angle_at_optimal=0.21991
      PathPoint PathPoint_sacrum: sacrum (-0.155667 0.0488 -0.034986)
      PathPoint PathPoint_lumbar4: lumbar4 (-0.0759411 0.0161246 -0.0587852)
      PathPoint PathPoint_lumbar3: lumbar3 (-0.0627491 0.0249679 -0.0474311)
      PathPoint PathPoint_lumbar2: lumbar2 (-0.0538945 0.0240884 -0.0418253)
      PathPoint PathPoint_rib12_L: rib12_L (-0.0347358 -0.0264787 -0.0390303)
    Thelen2003Muscle LTpL_L5_r: max_isometric_force=513.3199 optimal_fiber_length=0.03425449
        tendon_slack_length=1.597859e-5 pennation_angle_at_optimal=0.21991
      PathPoint PathPoint_sacrum: sacrum (-0.152157 0.07389 0.041926)
      PathPoint PathPoint_lumbar5: lumbar5 (-0.0460777 0.0108584 0.0447858)
    Thelen2003Muscle LTpL_L4_r: max_isometric_force=698.6232 optimal_fiber_length=0.03902364
        tendon_slack_length=0.04132713 pennation_angle_at_optimal=0.21991
      PathPoint PathPoint_pelvis: pelvis (-0.161407 0.017487 0.044366)
      PathPoint PathPoint_lumbar4: lumbar4 (-0.0486913 0.0230372 0.0452942)
    Thelen2003Muscle LTpL_L3_r: max_isometric_force=511.2595 optimal_fiber_length=0.05719652
        tendon_slack_length=0.06106691 pennation_angle_at_optimal=0.21991
      PathPoint PathPoint_pelvis: pelvis (-0.169347 0.01749 0.047256)
      PathPoint PathPoint_lumbar3: lumbar3 (-0.0439766 0.0280543 0.0290112)
    Thelen2003Muscle LTpL_L2_r: max_isometric_force=321.9166 optimal_fiber_length=0.0757228
        tendon_slack_length=0.08183956 pennation_angle_at_optimal=0.21991
      PathPoint PathPoint_pelvis: pelvis (-0.170597 0.012969 0.049002)
      PathPoint PathPoint_lumbar2: lumbar2 (-0.0358393 0.0273979 0.0211283)
    Thelen2003Muscle LTpL_L1_r: max_isometric_force=216.6847 optimal_fiber_length=0.09116413
        tendon_slack_length=0.1043319 pennation_angle_at_optimal=0.21991
      PathPoint PathPoint_pelvis: pelvis (-0.172897 0.010194 0.050173)
      PathPoint PathPoint_lumbar1: lumbar1 (-0.0300226 0.0324669 0.0208176)
    Thelen2003Muscle LTpL_L5_l: max_isometric_force=513.3199 optimal_fiber_length=0.03425488
        tendon_slack_length=1.597971e-5 pennation_angle_at_optimal=0.21991
      PathPoint PathPoint_sacrum: sacrum (-0.152157 0.073888 -0.041923)
      PathPoint PathPoint_lumbar5: lumbar5 (-0.0460777 0.0108584 -0.0447858)
    Thelen2003Muscle LTpL_L4_l: max_isometric_force=698.6232 optimal_fiber_length=0.03902359
        tendon_slack_length=0.04132712 pennation_angle_at_optimal=0.21991
      PathPoint PathPoint_pelvis: pelvis (-0.161407 0.017487 -0.044366)
      PathPoint PathPoint_lumbar4: lumbar4 (-0.0486913 0.0230372 -0.0452922)
    Thelen2003Muscle LTpL_L3_l: max_isometric_force=511.2595 optimal_fiber_length=0.05719652
        tendon_slack_length=0.06106691 pennation_angle_at_optimal=0.21991
      PathPoint PathPoint_pelvis: pelvis (-0.169347 0.01749 -0.047256)
      PathPoint PathPoint_lumbar3: lumbar3 (-0.0439766 0.0280543 -0.0290112)
    Thelen2003Muscle LTpL_L2_l: max_isometric_force=321.9113 optimal_fiber_length=0.07572278
        tendon_slack_length=0.08184042 pennation_angle_at_optimal=0.21991
      PathPoint PathPoint_pelvis: pelvis (-0.170597 0.012969 -0.049006)
      PathPoint PathPoint_lumbar2: lumbar2 (-0.0358371 0.0273983 -0.0211322)
    Thelen2003Muscle LTpL_L1_l: max_isometric_force=216.6876 optimal_fiber_length=0.09116397
        tendon_slack_length=0.104334 pennation_angle_at_optimal=0.21991
      PathPoint PathPoint_pelvis: pelvis (-0.172897 0.01019 -0.050176)
      PathPoint PathPoint_lumbar1: lumbar1 (-0.0300226 0.0324669 -0.0208226)
    Thelen2003Muscle QL_post_I_1-L3_r: max_isometric_force=65.44167 optimal_fiber_length=0.04559112
        tendon_slack_length=0.03830782 pennation_angle_at_optimal=0.12915
      PathPoint PathPoint_pelvis: pelvis (-0.131101 0.04631 0.0729479)
      PathPoint PathPoint_lumbar3: lumbar3 (-0.0261832 0.0252361 0.0488467)
    Thelen2003Muscle QL_post_I_2-L4_r: max_isometric_force=135.4091 optimal_fiber_length=0.0273855
        tendon_slack_length=0.0230106 pennation_angle_at_optimal=0.12915
      PathPoint PathPoint_pelvis: pelvis (-0.119808 0.056308 0.0772341)
      PathPoint PathPoint_lumbar4: lumbar4 (-0.0288481 0.0270773 0.0444066)
    Thelen2003Muscle QL_post_I_2-L3_r: max_isometric_force=50.69932 optimal_fiber_length=0.03984876
        tendon_slack_length=0.03348282 pennation_angle_at_optimal=0.12915
      PathPoint PathPoint_pelvis: pelvis (-0.119808 0.056308 0.0772341)
      PathPoint PathPoint_lumbar3: lumbar3 (-0.0261832 0.0252361 0.0488467)
    Thelen2003Muscle QL_post_I_2-L2_r: max_isometric_force=33.79044 optimal_fiber_length=0.05639958
        tendon_slack_length=0.0473896 pennation_angle_at_optimal=0.12915
      PathPoint PathPoint_pelvis: pelvis (-0.119808 0.056308 0.0772341)
      PathPoint PathPoint_lumbar2: lumbar2 (-0.0277428 0.0244958 0.0523686)
    Thelen2003Muscle QL_post_I_3-L1_r: max_isometric_force=81.71412 optimal_fiber_length=0.07838761
        tendon_slack_length=0.06586498 pennation_angle_at_optimal=0.12915
      PathPoint PathPoint_lumbar1: lumbar1 (-0.0241485 0.0299005 0.0372354)
      PathPoint PathPoint_pelvis: pelvis (-0.112356 0.06212 0.0858065)
    Thelen2003Muscle QL_post_I_3-L2_r: max_isometric_force=53.92227 optimal_fiber_length=0.05495071
        tendon_slack_length=0.04617219 pennation_angle_at_optimal=0.12915
      PathPoint PathPoint_lumbar2: lumbar2 (-0.0277428 0.0244958 0.0523686)
      PathPoint PathPoint_pelvis: pelvis (-0.112356 0.06212 0.0858065)
    Thelen2003Muscle QL_post_I_3-L3_r: max_isometric_force=83.42016 optimal_fiber_length=0.03908213
        tendon_slack_length=0.03283866 pennation_angle_at_optimal=0.12915
      PathPoint PathPoint_lumbar3: lumbar3 (-0.0261832 0.0252361 0.0488467)
      PathPoint PathPoint_pelvis: pelvis (-0.112356 0.06212 0.0858065)
    Thelen2003Muscle QL_post_I_1-L3_l: max_isometric_force=65.44167 optimal_fiber_length=0.04559112
        tendon_slack_length=0.03830782 pennation_angle_at_optimal=0.12915
      PathPoint PathPoint_pelvis: pelvis (-0.131101 0.04631 -0.0729479)
      PathPoint PathPoint_lumbar3: lumbar3 (-0.0261832 0.0252361 -0.0488467)
    Thelen2003Muscle QL_post_I_2-L4_l: max_isometric_force=135.4091 optimal_fiber_length=0.0273855
        tendon_slack_length=0.0230106 pennation_angle_at_optimal=0.12915
      PathPoint PathPoint_pelvis: pelvis (-0.119808 0.056308 -0.0772341)
      PathPoint PathPoint_lumbar4: lumbar4 (-0.0288481 0.0270773 -0.0444066)
    Thelen2003Muscle QL_post_I_2-L3_l: max_isometric_force=50.69932 optimal_fiber_length=0.03984876
        tendon_slack_length=0.03348282 pennation_angle_at_optimal=0.12915
      PathPoint PathPoint_pelvis: pelvis (-0.119808 0.056308 -0.0772341)
      PathPoint PathPoint_lumbar3: lumbar3 (-0.0261832 0.0252361 -0.0488467)
    Thelen2003Muscle QL_post_I_2-L2_l: max_isometric_force=33.79044 optimal_fiber_length=0.05639958
        tendon_slack_length=0.0473896 pennation_angle_at_optimal=0.12915
      PathPoint PathPoint_pelvis: pelvis (-0.119808 0.056308 -0.0772341)
      PathPoint PathPoint_lumbar2: lumbar2 (-0.0277428 0.0244958 -0.0523686)
    Thelen2003Muscle QL_post_I_3-L1_l: max_isometric_force=81.71412 optimal_fiber_length=0.07838761
        tendon_slack_length=0.06586498 pennation_angle_at_optimal=0.12915
      PathPoint PathPoint_lumbar1: lumbar1 (-0.0241485 0.0299005 -0.0372354)
      PathPoint PathPoint_pelvis: pelvis (-0.112356 0.06212 -0.0858065)
    Thelen2003Muscle QL_post_I_3-L2_l: max_isometric_force=53.92227 optimal_fiber_length=0.05495071
        tendon_slack_length=0.04617219 pennation_angle_at_optimal=0.12915
      PathPoint PathPoint_lumbar2: lumbar2 (-0.0277428 0.0244958 -0.0523686)
      PathPoint PathPoint_pelvis: pelvis (-0.112356 0.06212 -0.0858065)
    Thelen2003Muscle QL_post_I_3-L3_l: max_isometric_force=83.42016 optimal_fiber_length=0.03908213
        tendon_slack_length=0.03283866 pennation_angle_at_optimal=0.12915
      PathPoint PathPoint_lumbar3: lumbar3 (-0.0261832 0.0252361 -0.0488467)
      PathPoint PathPoint_pelvis: pelvis (-0.112356 0.06212 -0.0858065)
    Thelen2003Muscle QL_mid_L3-12_3_r: max_isometric_force=43.20535 optimal_fiber_length=0.05955938
        tendon_slack_length=0.03092672 pennation_angle_at_optimal=0.12915
      PathPoint PathPoint_rib12_R: rib12_R (-0.0220808 -0.0432474 0.0705981)
      PathPoint PathPoint_lumbar3: lumbar3 (-0.0263641 0.0273929 0.0491625)
    Thelen2003Muscle QL_mid_L3-12_2_r: max_isometric_force=46.50029 optimal_fiber_length=0.06346574
        tendon_slack_length=0.03295513 pennation_angle_at_optimal=0.12915
      PathPoint PathPoint_rib12_R: rib12_R (-0.0247276 -0.0251835 0.0469604)
      PathPoint PathPoint_lumbar3: lumbar3 (-0.026363 0.0273917 0.0491624)
    Thelen2003Muscle QL_mid_L3-12_1_r: max_isometric_force=86.22508 optimal_fiber_length=0.06708357
        tendon_slack_length=0.03483372 pennation_angle_at_optimal=0.12915
      PathPoint PathPoint_rib12_R: rib12_R (-0.0161104 -0.0113116 0.0279441)
      PathPoint PathPoint_lumbar3: lumbar3 (-0.026363 0.0273917 0.0491624)
    Thelen2003Muscle QL_mid_L2-12_1_r: max_isometric_force=327.7053 optimal_fiber_length=0.04339944
        tendon_slack_length=0.02253553 pennation_angle_at_optimal=0.12915
      PathPoint PathPoint_rib12_R: rib12_R (-0.0161104 -0.0113116 0.0279441)
      PathPoint PathPoint_lumbar2: lumbar2 (-0.0240764 0.0285378 0.0458677)
    Thelen2003Muscle QL_mid_L4-12_3_r: max_isometric_force=51.06528 optimal_fiber_length=0.07583145
        tendon_slack_length=0.03937613 pennation_angle_at_optimal=0.12915
      PathPoint PathPoint_rib12_R: rib12_R (-0.0220808 -0.0432474 0.0705981)
      PathPoint PathPoint_lumbar4: lumbar4 (-0.027914 0.0317826 0.0428969)
    Thelen2003Muscle QL_mid_L3-12_3_l: max_isometric_force=43.20517 optimal_fiber_length=0.05955972
        tendon_slack_length=0.03092689 pennation_angle_at_optimal=0.12915
      PathPoint PathPoint_rib12_L: rib12_L (-0.0220807 -0.0432469 -0.0705975)
      PathPoint PathPoint_lumbar3: lumbar3 (-0.0263641 0.0273929 -0.0491625)
    Thelen2003Muscle QL_mid_L3-12_2_l: max_isometric_force=46.50018 optimal_fiber_length=0.06346635
        tendon_slack_length=0.03295544 pennation_angle_at_optimal=0.12915
      PathPoint PathPoint_rib12_L: rib12_L (-0.0247275 -0.0251828 -0.0469604)
      PathPoint PathPoint_lumbar3: lumbar3 (-0.026363 0.0273917 -0.0491624)
    Thelen2003Muscle QL_mid_L3-12_1_l: max_isometric_force=86.22501 optimal_fiber_length=0.06708366
        tendon_slack_length=0.03483376 pennation_angle_at_optimal=0.12915
      PathPoint PathPoint_rib12_L: rib12_L (-0.0161105 -0.0113118 -0.0279441)
      PathPoint PathPoint_lumbar3: lumbar3 (-0.026363 0.0273917 -0.0491624)
    Thelen2003Muscle QL_mid_L2-12_1_l: max_isometric_force=327.7052 optimal_fiber_length=0.04339953
        tendon_slack_length=0.02253558 pennation_angle_at_optimal=0.12915
      PathPoint PathPoint_rib12_L: rib12_L (-0.0161105 -0.0113118 -0.0279441)
      PathPoint PathPoint_lumbar2: lumbar2 (-0.0240764 0.0285378 -0.0458677)
    Thelen2003Muscle QL_mid_L4-12_3_l: max_isometric_force=51.06502 optimal_fiber_length=0.0758319
        tendon_slack_length=0.03937636 pennation_angle_at_optimal=0.12915
      PathPoint PathPoint_rib12_L: rib12_L (-0.0220807 -0.0432469 -0.0705975)
      PathPoint PathPoint_lumbar4: lumbar4 (-0.027914 0.0317826 -0.0428969)
    Thelen2003Muscle QL_ant_I_2-T12_r: max_isometric_force=46.81086 optimal_fiber_length=0.1175095
        tendon_slack_length=0.06101783 pennation_angle_at_optimal=0.12915
      PathPoint PathPoint_pelvis: pelvis (-0.119808 0.056308 0.0772341)
      PathPoint PathPoint_thoracic12: thoracic12 (0.00325862 0.00931837 0.0256054)
    Thelen2003Muscle QL_ant_I_3-T12_r: max_isometric_force=87.99457 optimal_fiber_length=0.1155454
        tendon_slack_length=0.05999795 pennation_angle_at_optimal=0.12915
      PathPoint PathPoint_pelvis: pelvis (-0.112356 0.06212 0.0858065)
      PathPoint PathPoint_thoracic12: thoracic12 (0.00325862 0.00931837 0.0256054)
    Thelen2003Muscle QL_ant_I_2-12_1_r: max_isometric_force=29.63902 optimal_fiber_length=0.1056073
        tendon_slack_length=0.05483751 pennation_angle_at_optimal=0.12915
      PathPoint PathPoint_pelvis: pelvis (-0.119808 0.056308 0.0772341)
      PathPoint PathPoint_rib12_R: rib12_R (-0.021907 -0.0177675 0.037582)
    Thelen2003Muscle QL_ant_I_3-12_1_r: max_isometric_force=56.16924 optimal_fiber_length=0.1043026
        tendon_slack_length=0.05416002 pennation_angle_at_optimal=0.12915
      PathPoint PathPoint_pelvis: pelvis (-0.112356 0.06212 0.0858065)
      PathPoint PathPoint_rib12_R: rib12_R (-0.021907 -0.0177675 0.037582)
    Thelen2003Muscle QL_ant_I_3-12_2_r: max_isometric_force=37.77078 optimal_fiber_length=0.0989391
        tendon_slack_length=0.05137497 pennation_angle_at_optimal=0.12915
      PathPoint PathPoint_pelvis: pelvis (-0.112356 0.06212 0.0858065)
      PathPoint PathPoint_rib12_R: rib12_R (-0.0247276 -0.0251835 0.0469604)
    Thelen2003Muscle QL_ant_I_3-12_3_r: max_isometric_force=43.77976 optimal_fiber_length=0.0852963
        tendon_slack_length=0.04429083 pennation_angle_at_optimal=0.12915
      PathPoint PathPoint_pelvis: pelvis (-0.112357 0.062115 0.0858078)
      PathPoint PathPoint_rib12_R: rib12_R (-0.0220808 -0.0432474 0.0705981)
    Thelen2003Muscle QL_ant_I_2-T12_l: max_isometric_force=46.81086 optimal_fiber_length=0.1175095
        tendon_slack_length=0.06101783 pennation_angle_at_optimal=0.12915
      PathPoint PathPoint_pelvis: pelvis (-0.119808 0.056308 -0.0772341)
      PathPoint PathPoint_thoracic12: thoracic12 (0.00325862 0.00931837 -0.0256054)
    Thelen2003Muscle QL_ant_I_3-T12_l: max_isometric_force=87.99457 optimal_fiber_length=0.1155454
        tendon_slack_length=0.05999795 pennation_angle_at_optimal=0.12915
      PathPoint PathPoint_pelvis: pelvis (-0.112356 0.06212 -0.0858065)
      PathPoint PathPoint_thoracic12: thoracic12 (0.00325862 0.00931837 -0.0256054)
    Thelen2003Muscle QL_ant_I_2-12_1_l: max_isometric_force=29.63902 optimal_fiber_length=0.1056074
        tendon_slack_length=0.05483752 pennation_angle_at_optimal=0.12915
      PathPoint PathPoint_pelvis: pelvis (-0.119808 0.056308 -0.0772341)
      PathPoint PathPoint_rib12_L: rib12_L (-0.021907 -0.0177678 -0.0375821)
    Thelen2003Muscle QL_ant_I_3-12_1_l: max_isometric_force=56.16924 optimal_fiber_length=0.1043026
        tendon_slack_length=0.05416004 pennation_angle_at_optimal=0.12915
      PathPoint PathPoint_pelvis: pelvis (-0.112356 0.06212 -0.0858065)
      PathPoint PathPoint_rib12_L: rib12_L (-0.021907 -0.0177678 -0.0375821)
    Thelen2003Muscle QL_ant_I_3-12_2_l: max_isometric_force=37.77071 optimal_fiber_length=0.09893979
        tendon_slack_length=0.05137533 pennation_angle_at_optimal=0.12915
      PathPoint PathPoint_pelvis: pelvis (-0.112356 0.06212 -0.0858065)
      PathPoint PathPoint_rib12_L: rib12_L (-0.0247275 -0.0251828 -0.0469604)
    Thelen2003Muscle QL_ant_I_3-12_3_l: max_isometric_force=43.77987 optimal_fiber_length=0.08529698
        tendon_slack_length=0.04429118 pennation_angle_at_optimal=0.12915
      PathPoint PathPoint_pelvis: pelvis (-0.112357 0.062115 -0.0858078)
      PathPoint PathPoint_rib12_L: rib12_L (-0.0220807 -0.0432469 -0.0705975)
    Thelen2003Muscle MF_m1s_r: max_isometric_force=43.14828 optimal_fiber_length=0.05426356
        tendon_slack_length=0.02256183 pennation_angle_at_optimal=0
      PathPoint PathPoint_lumbar4: lumbar4 (-0.0483037 0.0324114 0.0246001)
      PathPoint PathPoint_lumbar1: lumbar1 (-0.0447816 0.00801197 0.00564339)
    Thelen2003Muscle MF_m1t_1_r: max_isometric_force=47.70162 optimal_fiber_length=0.08917677
        tendon_slack_length=0.02673994 pennation_angle_at_optimal=0
      PathPoint PathPoint_lumbar5: lumbar5 (-0.05503 0.0184762 0.0334187)
      PathPoint PathPoint_lumbar1: lumbar1 (-0.052323 0.00797643 0.00580284)
    Thelen2003Muscle MF_m1t_2_r: max_isometric_force=41.7242 optimal_fiber_length=0.1077879
        tendon_slack_length=0.03232056 pennation_angle_at_optimal=0
      PathPoint PathPoint_sacrum: sacrum (-0.138459 0.083977 0.0314829)
      PathPoint PathPoint_lumbar1: lumbar1 (-0.0523214 0.00798117 0.00580629)
    Thelen2003Muscle MF_m1t_3_r: max_isometric_force=70.49196 optimal_fiber_length=0.1231691
        tendon_slack_length=0.03693266 pennation_angle_at_optimal=0
      PathPoint PathPoint_pelvis: pelvis (-0.161609 0.026421 0.0509929)
      PathPoint PathPoint_lumbar1: lumbar1 (-0.0523214 0.00798117 0.00580629)
    Thelen2003Muscle MF_m2s_r: max_isometric_force=45.38172 optimal_fiber_length=0.05768753
        tendon_slack_length=0.02231329 pennation_angle_at_optimal=0
      PathPoint PathPoint_lumbar5: lumbar5 (-0.0548188 0.0193135 0.0313414)
      PathPoint PathPoint_lumbar2: lumbar2 (-0.0462787 0.00509439 0.00850203)
    Thelen2003Muscle MF_m2t_1_r: max_isometric_force=48.19948 optimal_fiber_length=0.07546272
        tendon_slack_length=0.02297357 pennation_angle_at_optimal=0
      PathPoint PathPoint_sacrum: sacrum (-0.137799 0.085218 0.0330779)
      PathPoint PathPoint_lumbar2: lumbar2 (-0.0521291 -0.000126266 0.00917554)
    Thelen2003Muscle MF_m2t_2_r: max_isometric_force=127.6271 optimal_fiber_length=0.1009075
        tendon_slack_length=0.03071988 pennation_angle_at_optimal=0
      PathPoint PathPoint_pelvis: pelvis (-0.164369 0.021159 0.0494919)
      PathPoint PathPoint_lumbar2: lumbar2 (-0.0521291 -0.000126266 0.00917554)
    Thelen2003Muscle MF_m2t_3_r: max_isometric_force=145.5537 optimal_fiber_length=0.1114313
        tendon_slack_length=0.03392369 pennation_angle_at_optimal=0
      PathPoint PathPoint_pelvis: pelvis (-0.166759 0.0079976 0.0472209)
      PathPoint PathPoint_lumbar2: lumbar2 (-0.051525 -0.0006615 0.00793152)
    Thelen2003Muscle MF_m3s_r: max_isometric_force=73.21683 optimal_fiber_length=0.04880649
        tendon_slack_length=0.02029288 pennation_angle_at_optimal=0
      PathPoint PathPoint_sacrum: sacrum (-0.138549 0.083636 0.0300589)
      PathPoint PathPoint_lumbar3: lumbar3 (-0.0517689 0.00288032 0.0102488)
    Thelen2003Muscle MF_m3t_1_r: max_isometric_force=90.02517 optimal_fiber_length=0.117888
        tendon_slack_length=0.03922691 pennation_angle_at_optimal=0
      PathPoint PathPoint_pelvis: pelvis (-0.181539 -0.034977 0.0297429)
      PathPoint PathPoint_lumbar3: lumbar3 (-0.0589324 0.000195894 0.0092426)
    Thelen2003Muscle MF_m3t_2_r: max_isometric_force=90.02605 optimal_fiber_length=0.09997574
        tendon_slack_length=0.03326666 pennation_angle_at_optimal=0
      PathPoint PathPoint_pelvis: pelvis (-0.170909 -0.016062 0.0344969)
      PathPoint PathPoint_lumbar3: lumbar3 (-0.0589138 0.000188901 0.0102406)
    Thelen2003Muscle MF_m3t_3_r: max_isometric_force=90.02605 optimal_fiber_length=0.09997574
        tendon_slack_length=0.03326666 pennation_angle_at_optimal=0
      PathPoint PathPoint_pelvis: pelvis (-0.170909 -0.016062 0.0344969)
      PathPoint PathPoint_lumbar3: lumbar3 (-0.0589138 0.000188901 0.0102406)
    Thelen2003Muscle MF_m4s_r: max_isometric_force=109.9593 optimal_fiber_length=0.0449398
        tendon_slack_length=0.02839467 pennation_angle_at_optimal=0
      PathPoint PathPoint_sacrum: sacrum (-0.160729 0.05471 0.0288219)
      PathPoint PathPoint_lumbar4: lumbar4 (-0.0613639 -0.000927854 0.0171217)
    Thelen2003Muscle MF_m4t_1_r: max_isometric_force=98.385 optimal_fiber_length=0.06356153
        tendon_slack_length=0.02572649 pennation_angle_at_optimal=0
      PathPoint PathPoint_sacrum: sacrum (-0.169269 0.041526 0.0280019)
      PathPoint PathPoint_lumbar4: lumbar4 (-0.0675971 -0.000870994 0.0175995)
    Thelen2003Muscle MF_m4t_2_r: max_isometric_force=98.38376 optimal_fiber_length=0.08249559
        tendon_slack_length=0.03339004 pennation_angle_at_optimal=0
      PathPoint PathPoint_pelvis: pelvis (-0.179329 -0.028658 0.0278469)
      PathPoint PathPoint_lumbar4: lumbar4 (-0.068593 -0.000921187 0.0175984)
    Thelen2003Muscle MF_m4t_3_r: max_isometric_force=98.38376 optimal_fiber_length=0.09405314
        tendon_slack_length=0.03806795 pennation_angle_at_optimal=0
      PathPoint PathPoint_pelvis: pelvis (-0.187869 -0.041181 0.0253649)
      PathPoint PathPoint_lumbar4: lumbar4 (-0.0698911 -0.000989214 0.0175984)
    Thelen2003Muscle MF_m5s_r: max_isometric_force=38.7629 optimal_fiber_length=0.01474275
        tendon_slack_length=0.009315028 pennation_angle_at_optimal=0
      PathPoint PathPoint_sacrum: sacrum (-0.147499 0.06627 0.0230689)
      PathPoint PathPoint_lumbar5: lumbar5 (-0.049583 -0.00254826 0.0165722)
    Thelen2003Muscle MF_m5t_1_r: max_isometric_force=38.7629 optimal_fiber_length=0.07595884
        tendon_slack_length=0.0307443 pennation_angle_at_optimal=0
      PathPoint PathPoint_sacrum: sacrum (-0.191109 0.0052292 0.0226759)
      PathPoint PathPoint_lumbar5: lumbar5 (-0.055102 -0.00308901 0.0155688)
    Thelen2003Muscle MF_m5t_2_r: max_isometric_force=38.7629 optimal_fiber_length=0.05680975
        tendon_slack_length=0.02299371 pennation_angle_at_optimal=0
      PathPoint PathPoint_sacrum: sacrum (-0.180159 0.025662 0.0243509)
      PathPoint PathPoint_lumbar5: lumbar5 (-0.0538724 -0.00361744 0.0154144)
    Thelen2003Muscle MF_m5t_3_r: max_isometric_force=38.7629 optimal_fiber_length=0.04074725
        tendon_slack_length=0.01649243 pennation_angle_at_optimal=0
      PathPoint PathPoint_sacrum: sacrum (-0.169319 0.042584 0.0242399)
      PathPoint PathPoint_lumbar5: lumbar5 (-0.0520142 -0.00363467 0.0149637)
    Thelen2003Muscle MF_m1_laminar_r: max_isometric_force=14.79729 optimal_fiber_length=0.03754778
        tendon_slack_length=0.01425922 pennation_angle_at_optimal=0
      PathPoint PathPoint_lumbar3: lumbar3 (-0.0448492 0.0339038 0.0220369)
      PathPoint PathPoint_lumbar1: lumbar1 (-0.0408922 0.0145738 0.00860589)
    Thelen2003Muscle MF_m2_laminar_r: max_isometric_force=25.61033 optimal_fiber_length=0.0318633
        tendon_slack_length=0.01210047 pennation_angle_at_optimal=0
      PathPoint PathPoint_lumbar4: lumbar4 (-0.0478087 0.0335478 0.0239959)
      PathPoint PathPoint_lumbar2: lumbar2 (-0.0413546 0.0100793 0.0111521)
    Thelen2003Muscle MF_m3_laminar_r: max_isometric_force=30.01878 optimal_fiber_length=0.03657472
        tendon_slack_length=0.01388969 pennation_angle_at_optimal=0
      PathPoint PathPoint_lumbar5: lumbar5 (-0.0550318 0.018981 0.031797)
      PathPoint PathPoint_lumbar3: lumbar3 (-0.048536 0.00960133 0.0132385)
    Thelen2003Muscle MF_m4_laminar_r: max_isometric_force=26.43031 optimal_fiber_length=0.03604504
        tendon_slack_length=0.01368853 pennation_angle_at_optimal=0
      PathPoint PathPoint_sacrum: sacrum (-0.142399 0.077488 0.0319829)
      PathPoint PathPoint_lumbar4: lumbar4 (-0.0553033 0.00542604 0.0193068)
    Thelen2003Muscle MF_m5_laminar_r: max_isometric_force=62.17045 optimal_fiber_length=0.02564914
        tendon_slack_length=0.009740566 pennation_angle_at_optimal=0
      PathPoint PathPoint_pelvis: pelvis (-0.151249 0.01111 0.0250229)
      PathPoint PathPoint_lumbar5: lumbar5 (-0.046197 0.000529602 0.0182829)
    Thelen2003Muscle MF_m1s_l: max_isometric_force=43.14828 optimal_fiber_length=0.05426182
        tendon_slack_length=0.02256111 pennation_angle_at_optimal=0
      PathPoint PathPoint_lumbar4: lumbar4 (-0.0483037 0.0324114 -0.0245961)
      PathPoint PathPoint_lumbar1: lumbar1 (-0.0447816 0.00801197 -0.00564659)
    Thelen2003Muscle MF_m1t_1_l: max_isometric_force=47.70162 optimal_fiber_length=0.08917463
        tendon_slack_length=0.0267393 pennation_angle_at_optimal=0
      PathPoint PathPoint_lumbar5: lumbar5 (-0.05503 0.0184762 -0.0334137)
      PathPoint PathPoint_lumbar1: lumbar1 (-0.052323 0.00797643 -0.00580644)
    Thelen2003Muscle MF_m1t_2_l: max_isometric_force=41.7242 optimal_fiber_length=0.1077879
        tendon_slack_length=0.03232056 pennation_angle_at_optimal=0
      PathPoint PathPoint_sacrum: sacrum (-0.138459 0.083977 -0.0314829)
      PathPoint PathPoint_lumbar1: lumbar1 (-0.0523214 0.00798117 -0.00580629)
    Thelen2003Muscle MF_m1t_3_l: max_isometric_force=70.49196 optimal_fiber_length=0.1231691
        tendon_slack_length=0.03693266 pennation_angle_at_optimal=0
      PathPoint PathPoint_pelvis: pelvis (-0.161609 0.026421 -0.0509929)
      PathPoint PathPoint_lumbar1: lumbar1 (-0.0523214 0.00798117 -0.00580629)
    Thelen2003Muscle MF_m2s_l: max_isometric_force=45.38172 optimal_fiber_length=0.05768683
        tendon_slack_length=0.02231302 pennation_angle_at_optimal=0
      PathPoint PathPoint_lumbar5: lumbar5 (-0.0548188 0.0193135 -0.0313394)
      PathPoint PathPoint_lumbar2: lumbar2 (-0.0462787 0.00509439 -0.00850263)
    Thelen2003Muscle MF_m2t_1_l: max_isometric_force=48.19944 optimal_fiber_length=0.07546446
        tendon_slack_length=0.0229741 pennation_angle_at_optimal=0
      PathPoint PathPoint_sacrum: sacrum (-0.137799 0.085218 -0.0330829)
      PathPoint PathPoint_lumbar2: lumbar2 (-0.0521291 -0.000126266 -0.00917554)
    Thelen2003Muscle MF_m2t_2_l: max_isometric_force=127.6271 optimal_fiber_length=0.1009079
        tendon_slack_length=0.03072001 pennation_angle_at_optimal=0
      PathPoint PathPoint_pelvis: pelvis (-0.164369 0.021159 -0.0494929)
      PathPoint PathPoint_lumbar2: lumbar2 (-0.0521291 -0.000126266 -0.00917554)
    Thelen2003Muscle MF_m2t_3_l: max_isometric_force=145.5619 optimal_fiber_length=0.1109766
        tendon_slack_length=0.03378529 pennation_angle_at_optimal=0
      PathPoint PathPoint_pelvis: pelvis (-0.166759 0.0079976 -0.0472229)
      PathPoint PathPoint_lumbar2: lumbar2 (-0.051525 -0.0006615 -0.00920622)
    Thelen2003Muscle MF_m3s_l: max_isometric_force=73.20445 optimal_fiber_length=0.04901897
        tendon_slack_length=0.02038122 pennation_angle_at_optimal=0
      PathPoint PathPoint_sacrum: sacrum (-0.138549 0.083636 -0.0300629)
      PathPoint PathPoint_lumbar3: lumbar3 (-0.0517689 0.00288032 -0.00971148)
    Thelen2003Muscle MF_m3t_1_l: max_isometric_force=90.02517 optimal_fiber_length=0.1176498
        tendon_slack_length=0.03914766 pennation_angle_at_optimal=0
      PathPoint PathPoint_pelvis: pelvis (-0.181539 -0.034977 -0.0297429)
      PathPoint PathPoint_lumbar3: lumbar3 (-0.0589324 0.000195894 -0.0104905)
    Thelen2003Muscle MF_m3t_2_l: max_isometric_force=90.02605 optimal_fiber_length=0.0999747
        tendon_slack_length=0.03326631 pennation_angle_at_optimal=0
      PathPoint PathPoint_pelvis: pelvis (-0.170909 -0.016062 -0.0344929)
      PathPoint PathPoint_lumbar3: lumbar3 (-0.0589138 0.000188901 -0.0102406)
    Thelen2003Muscle MF_m3t_3_l: max_isometric_force=90.02605 optimal_fiber_length=0.0999747
        tendon_slack_length=0.03326631 pennation_angle_at_optimal=0
      PathPoint PathPoint_pelvis: pelvis (-0.170909 -0.016062 -0.0344929)
      PathPoint PathPoint_lumbar3: lumbar3 (-0.0589138 0.000188901 -0.0102406)
    Thelen2003Muscle MF_m4s_l: max_isometric_force=109.9613 optimal_fiber_length=0.04483829
        tendon_slack_length=0.02833053 pennation_angle_at_optimal=0
      PathPoint PathPoint_sacrum: sacrum (-0.160729 0.05471 -0.0288229)
      PathPoint PathPoint_lumbar4: lumbar4 (-0.0613639 -0.000927854 -0.0175389)
    Thelen2003Muscle MF_m4t_1_l: max_isometric_force=98.385 optimal_fiber_length=0.06370728
        tendon_slack_length=0.02578548 pennation_angle_at_optimal=0
      PathPoint PathPoint_sacrum: sacrum (-0.169269 0.041526 -0.0280029)
      PathPoint PathPoint_lumbar4: lumbar4 (-0.0675971 -0.000870994 -0.0169593)
    Thelen2003Muscle MF_m4t_2_l: max_isometric_force=98.38376 optimal_fiber_length=0.08249492
        tendon_slack_length=0.03338977 pennation_angle_at_optimal=0
      PathPoint PathPoint_pelvis: pelvis (-0.179329 -0.028658 -0.0278429)
      PathPoint PathPoint_lumbar4: lumbar4 (-0.068593 -0.000921187 -0.0175984)
    Thelen2003Muscle MF_m4t_3_l: max_isometric_force=98.38376 optimal_fiber_length=0.09405288
        tendon_slack_length=0.03806785 pennation_angle_at_optimal=0
      PathPoint PathPoint_pelvis: pelvis (-0.187869 -0.041181 -0.0253629)
      PathPoint PathPoint_lumbar4: lumbar4 (-0.0698911 -0.000989214 -0.0175984)
    Thelen2003Muscle MF_m5s_l: max_isometric_force=38.7629 optimal_fiber_length=0.01474345
        tendon_slack_length=0.00931547 pennation_angle_at_optimal=0
      PathPoint PathPoint_sacrum: sacrum (-0.147499 0.06627 -0.0230729)
      PathPoint PathPoint_lumbar5: lumbar5 (-0.049583 -0.00254826 -0.0165729)
    Thelen2003Muscle MF_m5t_1_l: max_isometric_force=38.7629 optimal_fiber_length=0.0759584
        tendon_slack_length=0.03074412 pennation_angle_at_optimal=0
      PathPoint PathPoint_sacrum: sacrum (-0.191109 0.0052292 -0.0226729)
      PathPoint PathPoint_lumbar5: lumbar5 (-0.055102 -0.00308901 -0.0155729)
    Thelen2003Muscle MF_m5t_2_l: max_isometric_force=38.7629 optimal_fiber_length=0.05679323
        tendon_slack_length=0.02298703 pennation_angle_at_optimal=0
      PathPoint PathPoint_sacrum: sacrum (-0.180159 0.025662 -0.0243529)
      PathPoint PathPoint_lumbar5: lumbar5 (-0.0538724 -0.00361744 -0.0155729)
    Thelen2003Muscle MF_m5t_3_l: max_isometric_force=38.7629 optimal_fiber_length=0.04068009
        tendon_slack_length=0.01646524 pennation_angle_at_optimal=0
      PathPoint PathPoint_sacrum: sacrum (-0.169319 0.042584 -0.0242429)
      PathPoint PathPoint_lumbar5: lumbar5 (-0.0520142 -0.00363467 -0.0154129)
    Thelen2003Muscle MF_m1_laminar_l: max_isometric_force=14.79729 optimal_fiber_length=0.03754778
        tendon_slack_length=0.01425922 pennation_angle_at_optimal=0
      PathPoint PathPoint_lumbar3: lumbar3 (-0.0448492 0.0339038 -0.0220369)
      PathPoint PathPoint_lumbar1: lumbar1 (-0.0408922 0.0145738 -0.00860589)
    Thelen2003Muscle MF_m2_laminar_l: max_isometric_force=25.61033 optimal_fiber_length=0.0318633
        tendon_slack_length=0.01210047 pennation_angle_at_optimal=0
      PathPoint PathPoint_lumbar4: lumbar4 (-0.0478087 0.0335478 -0.0239959)
      PathPoint PathPoint_lumbar2: lumbar2 (-0.0413546 0.0100793 -0.0111521)
    Thelen2003Muscle MF_m3_laminar_l: max_isometric_force=30.01878 optimal_fiber_length=0.03657472
        tendon_slack_length=0.01388969 pennation_angle_at_optimal=0
      PathPoint PathPoint_lumbar5: lumbar5 (-0.0550318 0.018981 -0.031797)
      PathPoint PathPoint_lumbar3: lumbar3 (-0.048536 0.00960133 -0.0132385)
    Thelen2003Muscle MF_m4_laminar_l: max_isometric_force=26.43031 optimal_fiber_length=0.03604504
        tendon_slack_length=0.01368853 pennation_angle_at_optimal=0
      PathPoint PathPoint_sacrum: sacrum (-0.142399 0.077488 -0.0319829)
      PathPoint PathPoint_lumbar4: lumbar4 (-0.0553033 0.00542604 -0.0193068)
    Thelen2003Muscle MF_m5_laminar_l: max_isometric_force=62.17045 optimal_fiber_length=0.02564914
        tendon_slack_length=0.009740566 pennation_angle_at_optimal=0
      PathPoint PathPoint_pelvis: pelvis (-0.151249 0.01111 -0.0250229)
      PathPoint PathPoint_lumbar5: lumbar5 (-0.046197 0.000529602 -0.0182829)
    Thelen2003Muscle E0_R5_r: max_isometric_force=186.9451 optimal_fiber_length=0.03488172
        tendon_slack_length=0.05425908 pennation_angle_at_optimal=0
      PathPoint PathPoint_Abdomen: Abdomen (0.02 0.149 0)
      PathPoint PathPoint_rib5_R: rib5_R (0.150682 -0.123359 0.0680861)
    Thelen2003Muscle E0_R6_r: max_isometric_force=633.1262 optimal_fiber_length=0.04367813 tendon_slack_length=0.107381
        pennation_angle_at_optimal=0
      PathPoint PathPoint_Abdomen: Abdomen (0.0153532 0.0761092 0)
      PathPoint PathPoint_rib6_R: rib6_R (0.130272 -0.122879 0.110307)
    Thelen2003Muscle E0_R7_r: max_isometric_force=526.8184 optimal_fiber_length=0.087223 tendon_slack_length=0.1137096
        pennation_angle_at_optimal=0
      PathPoint PathPoint_Abdomen: Abdomen (0.0102989 0.00394575 0)
      PathPoint PathPoint_rib7_R: rib7_R (0.11248 -0.117096 0.132279)
    Thelen2003Muscle E0_R8_r: max_isometric_force=231.3611 optimal_fiber_length=0.1111019 tendon_slack_length=0.1351594
        pennation_angle_at_optimal=0
      PathPoint PathPoint_Abdomen: Abdomen (0.00438156 -0.0688772 0)
      PathPoint PathPoint_rib8_R: rib8_R (0.0908013 -0.111011 0.141926)
    Thelen2003Muscle E0_R9_r: max_isometric_force=706.147 optimal_fiber_length=0.119837 tendon_slack_length=0.1718003
        pennation_angle_at_optimal=0
      PathPoint PathPoint_Abdomen: Abdomen (-0.002 -0.141 0)
      PathPoint PathPoint_rib9_R: rib9_R (0.0687701 -0.105123 0.144037)
    Thelen2003Muscle E0_R10_r: max_isometric_force=125.5796 optimal_fiber_length=0.07625746
        tendon_slack_length=0.07304782 pennation_angle_at_optimal=0
      PathPoint PathPoint_pelvis: pelvis (-0.035 0.05 0.13)
      PathPoint PathPoint_rib10_R: rib10_R (0.0441911 -0.100351 0.136455)
    Thelen2003Muscle E0_R11_r: max_isometric_force=102.5712 optimal_fiber_length=0.07571003
        tendon_slack_length=0.03992672 pennation_angle_at_optimal=0
      PathPoint PathPoint_pelvis: pelvis (-0.070076 0.062137 0.10412)
      PathPoint PathPoint_rib11_R: rib11_R (0.0114526 -0.0815437 0.111038)
    Thelen2003Muscle E0_R12_r: max_isometric_force=47.2656 optimal_fiber_length=0.06149462
        tendon_slack_length=0.03243003 pennation_angle_at_optimal=0
      PathPoint PathPoint_pelvis: pelvis (-0.1 0.065 0.076)
      PathPoint PathPoint_rib12_R: rib12_R (-0.00872238 -0.0637857 0.0738207)
    Thelen2003Muscle E0_R5_l: max_isometric_force=186.9451 optimal_fiber_length=0.03488198
        tendon_slack_length=0.05425948 pennation_angle_at_optimal=0
      PathPoint PathPoint_Abdomen: Abdomen (0.02 0.149 0)
      PathPoint PathPoint_rib5_L: rib5_L (0.150682 -0.123359 -0.0680861)
    Thelen2003Muscle E0_R6_l: max_isometric_force=633.1993 optimal_fiber_length=0.04367841
        tendon_slack_length=0.1073817 pennation_angle_at_optimal=0
      PathPoint PathPoint_Abdomen: Abdomen (0.0153532 0.0761092 0)
      PathPoint PathPoint_rib6_L: rib6_L (0.130272 -0.122879 -0.110307)
    Thelen2003Muscle E0_R7_l: max_isometric_force=526.8106 optimal_fiber_length=0.0872235 tendon_slack_length=0.1137103
        pennation_angle_at_optimal=0
      PathPoint PathPoint_Abdomen: Abdomen (0.0102989 0.00394575 0)
      PathPoint PathPoint_rib7_L: rib7_L (0.11248 -0.117096 -0.132279)
    Thelen2003Muscle E0_R8_l: max_isometric_force=231.3615 optimal_fiber_length=0.1111024 tendon_slack_length=0.1351601
        pennation_angle_at_optimal=0
      PathPoint PathPoint_Abdomen: Abdomen (0.00438156 -0.0688772 0)
      PathPoint PathPoint_rib8_L: rib8_L (0.0908013 -0.111011 -0.141926)
    Thelen2003Muscle E0_R9_l: max_isometric_force=706.1531 optimal_fiber_length=0.1198375 tendon_slack_length=0.1718011
        pennation_angle_at_optimal=0
      PathPoint PathPoint_Abdomen: Abdomen (-0.002 -0.141 0)
      PathPoint PathPoint_rib9_L: rib9_L (0.0687701 -0.105123 -0.144037)
    Thelen2003Muscle E0_R10_l: max_isometric_force=125.5829 optimal_fiber_length=0.07625799
        tendon_slack_length=0.07304833 pennation_angle_at_optimal=0
      PathPoint PathPoint_pelvis: pelvis (-0.035 0.05 -0.13)
      PathPoint PathPoint_rib10_L: rib10_L (0.0441911 -0.100351 -0.136455)
    Thelen2003Muscle E0_R11_l: max_isometric_force=102.5699 optimal_fiber_length=0.0757106
        tendon_slack_length=0.03992702 pennation_angle_at_optimal=0
      PathPoint PathPoint_pelvis: pelvis (-0.070076 0.062137 -0.10412)
      PathPoint PathPoint_rib11_L: rib11_L (0.0114526 -0.0815437 -0.111038)
    Thelen2003Muscle E0_R12_l: max_isometric_force=47.26504 optimal_fiber_length=0.06149501
        tendon_slack_length=0.03243023 pennation_angle_at_optimal=0
      PathPoint PathPoint_pelvis: pelvis (-0.1 0.065 -0.076)
      PathPoint PathPoint_rib12_L: rib12_L (-0.00872238 -0.0637857 -0.0738207)
    Thelen2003Muscle IO1_r: max_isometric_force=449.0806 optimal_fiber_length=0.0563702 tendon_slack_length=0.06428265
        pennation_angle_at_optimal=0
      PathPoint PathPoint_Abdomen: Abdomen (0.0279732 -0.040658 0.0715822)
      PathPoint PathPoint_pelvis: pelvis (-0.0196005 0.0006087 0.129205)
    Thelen2003Muscle IO2_r: max_isometric_force=462.3013 optimal_fiber_length=0.0494819 tendon_slack_length=0.07931855
        pennation_angle_at_optimal=0
      PathPoint PathPoint_Abdomen: Abdomen (0.0284726 -0.01153 0.0731691)
      PathPoint PathPoint_pelvis: pelvis (-0.0285405 0.025567 0.133815)
    Thelen2003Muscle IO3_r: max_isometric_force=122.0465 optimal_fiber_length=0.07149049 tendon_slack_length=0.08643483
        pennation_angle_at_optimal=0
      PathPoint PathPoint_Abdomen: Abdomen (0.0307287 0.029305 0.0589117)
      PathPoint PathPoint_pelvis: pelvis (-0.0348544 0.046659 0.133073)
    Thelen2003Muscle IO4_r: max_isometric_force=426.7694 optimal_fiber_length=0.09717005 tendon_slack_length=0.04093657
        pennation_angle_at_optimal=0
      PathPoint PathPoint_rib9_R: rib9_R (0.137903 -0.138529 0.136664)
      PathPoint PathPoint_pelvis: pelvis (-0.0400774 0.058899 0.128851)
    Thelen2003Muscle IO5_r: max_isometric_force=425.3904 optimal_fiber_length=0.09557411 tendon_slack_length=0.04026422
        pennation_angle_at_optimal=0
      PathPoint PathPoint_rib10_R: rib10_R (0.0922885 -0.117121 0.153142)
      PathPoint PathPoint_pelvis: pelvis (-0.0637654 0.065154 0.113755)
    Thelen2003Muscle IO6_r: max_isometric_force=227.188 optimal_fiber_length=0.08988439 tendon_slack_length=0.03833113
        pennation_angle_at_optimal=0
      PathPoint PathPoint_rib11_R: rib11_R (0.0521947 -0.0947385 0.138411)
      PathPoint PathPoint_pelvis: pelvis (-0.0911019 0.060856 0.0892933)
    Thelen2003Muscle IO1_l: max_isometric_force=449.0806 optimal_fiber_length=0.05636883 tendon_slack_length=0.06428109
        pennation_angle_at_optimal=0
      PathPoint PathPoint_Abdomen: Abdomen (0.0279732 -0.040658 -0.0715872)
      PathPoint PathPoint_pelvis: pelvis (-0.0196005 0.0006087 -0.129205)
    Thelen2003Muscle IO2_l: max_isometric_force=462.3013 optimal_fiber_length=0.04948169 tendon_slack_length=0.0793182
        pennation_angle_at_optimal=0
      PathPoint PathPoint_Abdomen: Abdomen (0.0284726 -0.01153 -0.0731701)
      PathPoint PathPoint_pelvis: pelvis (-0.0285405 0.025567 -0.133815)
    Thelen2003Muscle IO3_l: max_isometric_force=122.0465 optimal_fiber_length=0.07148971 tendon_slack_length=0.08643389
        pennation_angle_at_optimal=0
      PathPoint PathPoint_Abdomen: Abdomen (0.0307287 0.029305 -0.0589147)
      PathPoint PathPoint_pelvis: pelvis (-0.0348544 0.046659 -0.133073)
    Thelen2003Muscle IO4_l: max_isometric_force=426.7757 optimal_fiber_length=0.09717097 tendon_slack_length=0.04093696
        pennation_angle_at_optimal=0
      PathPoint PathPoint_rib9_L: rib9_L (0.137903 -0.138529 -0.136664)
      PathPoint PathPoint_pelvis: pelvis (-0.0400774 0.058899 -0.128851)
    Thelen2003Muscle IO5_l: max_isometric_force=425.3968 optimal_fiber_length=0.09557522 tendon_slack_length=0.04026469
        pennation_angle_at_optimal=0
      PathPoint PathPoint_rib10_L: rib10_L (0.0922885 -0.117121 -0.153142)
      PathPoint PathPoint_pelvis: pelvis (-0.0637654 0.065154 -0.113755)
    Thelen2003Muscle IO6_l: max_isometric_force=227.1921 optimal_fiber_length=0.08988405 tendon_slack_length=0.03833099
        pennation_angle_at_optimal=0
      PathPoint PathPoint_rib11_L: rib11_L (0.0521947 -0.0947385 -0.13841)
      PathPoint PathPoint_pelvis: pelvis (-0.0911019 0.060856 -0.0892953)
    Thelen2003Muscle LD_L1_r: max_isometric_force=114.72 optimal_fiber_length=0.3303011 tendon_slack_length=0.0721227
        pennation_angle_at_optimal=0
      PathPoint PathPoint_humerus_r: humerus_r (-0.0094874 -0.015253 0.0026887)
      ConditionalPathPoint ConditionalPathPoint_rib5_R: rib5_R (0.0201892 -0.053633 0.139914)
          socket_coordinate=/jointset/L5_S1_IVDjnt/L5_S1_FE range=(-99999.9 99999.9)
      ConditionalPathPoint ConditionalPathPoint_rib6_R: rib6_R (0.0178469 -0.0534093 0.141365)
          socket_coordinate=/jointset/L5_S1_IVDjnt/L5_S1_FE range=(-99999.9 99999.9)
      ConditionalPathPoint ConditionalPathPoint_rib7_R: rib7_R (0.0102433 -0.0527617 0.12916)
          socket_coordinate=/jointset/L5_S1_IVDjnt/L5_S1_FE range=(-99999.9 99999.9)
      ConditionalPathPoint ConditionalPathPoint_rib8_R: rib8_R (0.004012 -0.0533642 0.122171)
          socket_coordinate=/jointset/L5_S1_IVDjnt/L5_S1_FE range=(-99999.9 99999.9)
      ConditionalPathPoint ConditionalPathPoint_rib9_R: rib9_R (-0.00149058 -0.0535712 0.113708)
          socket_coordinate=/jointset/L5_S1_IVDjnt/L5_S1_FE range=(-99999.9 99999.9)
      ConditionalPathPoint ConditionalPathPoint_rib10_R: rib10_R (-0.010122 -0.051315 0.102564)
          socket_coordinate=/jointset/L5_S1_IVDjnt/L5_S1_FE range=(-99999.9 99999.9)
      ConditionalPathPoint ConditionalPathPoint_rib11_R: rib11_R (-0.0186739 -0.0370903 0.0808004)
          socket_coordinate=/jointset/L5_S1_IVDjnt/L5_S1_FE range=(-99999.9 99999.9)
      ConditionalPathPoint ConditionalPathPoint_rib12_R: rib12_R (-0.0155428 -0.0262145 0.0584114)
          socket_coordinate=/jointset/L5_S1_IVDjnt/L5_S1_FE range=(-99999.9 99999.9)
      PathPoint PathPoint_lumbar1: lumbar1 (-0.042301 0.0090415 0.0043316)
    Thelen2003Muscle LD_L2_r: max_isometric_force=80.99887 optimal_fiber_length=0.3558019
        tendon_slack_length=0.07769092 pennation_angle_at_optimal=0
      PathPoint PathPoint_humerus_r: humerus_r (-0.00949 -0.01525 0.00269)
      ConditionalPathPoint ConditionalPathPoint_rib5_R: rib5_R (0.0236476 -0.055228 0.141765)
          socket_coordinate=/jointset/L5_S1_IVDjnt/L5_S1_FE range=(-99999.9 99999.9)
      ConditionalPathPoint ConditionalPathPoint_rib6_R: rib6_R (0.0215965 -0.0558873 0.141891)
          socket_coordinate=/jointset/L5_S1_IVDjnt/L5_S1_FE range=(-99999.9 99999.9)
      ConditionalPathPoint ConditionalPathPoint_rib7_R: rib7_R (0.0161265 -0.0562347 0.131498)
          socket_coordinate=/jointset/L5_S1_IVDjnt/L5_S1_FE range=(-99999.9 99999.9)
      ConditionalPathPoint ConditionalPathPoint_rib8_R: rib8_R (0.0125693 -0.0580882 0.126455)
          socket_coordinate=/jointset/L5_S1_IVDjnt/L5_S1_FE range=(-99999.9 99999.9)
      ConditionalPathPoint ConditionalPathPoint_rib9_R: rib9_R (0.0080771 -0.0595383 0.120091)
          socket_coordinate=/jointset/L5_S1_IVDjnt/L5_S1_FE range=(-99999.9 99999.9)
      ConditionalPathPoint ConditionalPathPoint_rib10_R: rib10_R (-0.000750239 -0.058987 0.110789)
          socket_coordinate=/jointset/L5_S1_IVDjnt/L5_S1_FE range=(-99999.9 99999.9)
      ConditionalPathPoint ConditionalPathPoint_rib11_R: rib11_R (-0.0103616 -0.0480793 0.0966424)
          socket_coordinate=/jointset/L5_S1_IVDjnt/L5_S1_FE range=(-99999.9 99999.9)
      ConditionalPathPoint ConditionalPathPoint_rib12_R: rib12_R (-0.0126737 -0.0401454 0.0768876)
          socket_coordinate=/jointset/L5_S1_IVDjnt/L5_S1_FE range=(-99999.9 99999.9)
      PathPoint PathPoint_lumbar2: lumbar2 (-0.040987 0.0018544 0.0041458)
    Thelen2003Muscle LD_L3_r: max_isometric_force=66.76496 optimal_fiber_length=0.3777588 tendon_slack_length=0.0824853
        pennation_angle_at_optimal=0
      PathPoint PathPoint_humerus_r: humerus_r (-0.00949 -0.01525 0.00433)
      ConditionalPathPoint ConditionalPathPoint_rib5_R: rib5_R (0.0266826 -0.056635 0.143313)
          socket_coordinate=/jointset/L5_S1_IVDjnt/L5_S1_FE range=(-99999.9 99999.9)
      ConditionalPathPoint ConditionalPathPoint_rib6_R: rib6_R (0.0247335 -0.0579883 0.142179)
          socket_coordinate=/jointset/L5_S1_IVDjnt/L5_S1_FE range=(-99999.9 99999.9)
      ConditionalPathPoint ConditionalPathPoint_rib7_R: rib7_R (0.0205841 -0.0588857 0.133098)
          socket_coordinate=/jointset/L5_S1_IVDjnt/L5_S1_FE range=(-99999.9 99999.9)
      ConditionalPathPoint ConditionalPathPoint_rib8_R: rib8_R (0.0187824 -0.0615022 0.12931)
          socket_coordinate=/jointset/L5_S1_IVDjnt/L5_S1_FE range=(-99999.9 99999.9)
      ConditionalPathPoint ConditionalPathPoint_rib9_R: rib9_R (0.0149087 -0.0637103 0.124268)
          socket_coordinate=/jointset/L5_S1_IVDjnt/L5_S1_FE range=(-99999.9 99999.9)
      ConditionalPathPoint ConditionalPathPoint_rib10_R: rib10_R (0.00606583 -0.064327 0.116169)
          socket_coordinate=/jointset/L5_S1_IVDjnt/L5_S1_FE range=(-99999.9 99999.9)
      ConditionalPathPoint ConditionalPathPoint_rib11_R: rib11_R (-0.00362006 -0.0556653 0.106919)
          socket_coordinate=/jointset/L5_S1_IVDjnt/L5_S1_FE range=(-99999.9 99999.9)
      ConditionalPathPoint ConditionalPathPoint_rib12_R: rib12_R (-0.00809887 -0.0499384 0.0882553)
          socket_coordinate=/jointset/L5_S1_IVDjnt/L5_S1_FE range=(-99999.9 99999.9)
      PathPoint PathPoint_lumbar3: lumbar3 (-0.040433 0.0043131 0.0038597)
    Thelen2003Muscle LD_L4_r: max_isometric_force=47.57305 optimal_fiber_length=0.3970584
        tendon_slack_length=0.08669945 pennation_angle_at_optimal=0
      PathPoint PathPoint_humerus_r: humerus_r (-0.00949 -0.01525 0.00269)
      ConditionalPathPoint ConditionalPathPoint_rib5_R: rib5_R (0.0271132 -0.056836 0.143524)
          socket_coordinate=/jointset/L5_S1_IVDjnt/L5_S1_FE range=(-99999.9 99999.9)
      ConditionalPathPoint ConditionalPathPoint_rib6_R: rib6_R (0.0256758 -0.0586253 0.142239)
          socket_coordinate=/jointset/L5_S1_IVDjnt/L5_S1_FE range=(-99999.9 99999.9)
      ConditionalPathPoint ConditionalPathPoint_rib7_R: rib7_R (0.0224508 -0.0600037 0.133727)
          socket_coordinate=/jointset/L5_S1_IVDjnt/L5_S1_FE range=(-99999.9 99999.9)
      ConditionalPathPoint ConditionalPathPoint_rib8_R: rib8_R (0.0221214 -0.0633322 0.130762)
          socket_coordinate=/jointset/L5_S1_IVDjnt/L5_S1_FE range=(-99999.9 99999.9)
      ConditionalPathPoint ConditionalPathPoint_rib9_R: rib9_R (0.0191317 -0.0662673 0.126717)
          socket_coordinate=/jointset/L5_S1_IVDjnt/L5_S1_FE range=(-99999.9 99999.9)
      ConditionalPathPoint ConditionalPathPoint_rib10_R: rib10_R (0.0105093 -0.0677271 0.119451)
          socket_coordinate=/jointset/L5_S1_IVDjnt/L5_S1_FE range=(-99999.9 99999.9)
      ConditionalPathPoint ConditionalPathPoint_rib11_R: rib11_R (0.00109075 -0.0606283 0.113441)
          socket_coordinate=/jointset/L5_S1_IVDjnt/L5_S1_FE range=(-99999.9 99999.9)
      ConditionalPathPoint ConditionalPathPoint_rib12_R: rib12_R (-0.00420783 -0.0568864 0.0960362)
          socket_coordinate=/jointset/L5_S1_IVDjnt/L5_S1_FE range=(-99999.9 99999.9)
      PathPoint PathPoint_lumbar4: lumbar4 (-0.042453 0.0040036 0.0046228)
    Thelen2003Muscle LD_L5_r: max_isometric_force=51.99744 optimal_fiber_length=0.4196271
        tendon_slack_length=0.08617343 pennation_angle_at_optimal=0
      PathPoint PathPoint_humerus_r: humerus_r (-0.00949 -0.01525 0.00269)
      ConditionalPathPoint ConditionalPathPoint_rib5_R: rib5_R (0.0275519 -0.057039 0.143744)
          socket_coordinate=/jointset/L5_S1_IVDjnt/L5_S1_FE range=(-99999.9 99999.9)
      ConditionalPathPoint ConditionalPathPoint_rib6_R: rib6_R (0.0259905 -0.0588383 0.142258)
          socket_coordinate=/jointset/L5_S1_IVDjnt/L5_S1_FE range=(-99999.9 99999.9)
      ConditionalPathPoint ConditionalPathPoint_rib7_R: rib7_R (0.0228265 -0.0602267 0.133853)
          socket_coordinate=/jointset/L5_S1_IVDjnt/L5_S1_FE range=(-99999.9 99999.9)
      ConditionalPathPoint ConditionalPathPoint_rib8_R: rib8_R (0.0229362 -0.0637912 0.131147)
          socket_coordinate=/jointset/L5_S1_IVDjnt/L5_S1_FE range=(-99999.9 99999.9)
      ConditionalPathPoint ConditionalPathPoint_rib9_R: rib9_R (0.0201646 -0.0669663 0.12739)
          socket_coordinate=/jointset/L5_S1_IVDjnt/L5_S1_FE range=(-99999.9 99999.9)
      ConditionalPathPoint ConditionalPathPoint_rib10_R: rib10_R (0.0121086 -0.0689401 0.120585)
          socket_coordinate=/jointset/L5_S1_IVDjnt/L5_S1_FE range=(-99999.9 99999.9)
      ConditionalPathPoint ConditionalPathPoint_rib11_R: rib11_R (0.00282896 -0.0624663 0.115736)
          socket_coordinate=/jointset/L5_S1_IVDjnt/L5_S1_FE range=(-99999.9 99999.9)
      ConditionalPathPoint ConditionalPathPoint_rib12_R: rib12_R (-0.00251294 -0.0597694 0.0992289)
          socket_coordinate=/jointset/L5_S1_IVDjnt/L5_S1_FE range=(-99999.9 99999.9)
      PathPoint PathPoint_lumbar5: lumbar5 (-0.038798 0.0048562 0.0041107)
    Thelen2003Muscle LD_T12_r: max_isometric_force=71.14044 optimal_fiber_length=0.3194133
        tendon_slack_length=0.0655938 pennation_angle_at_optimal=0
      PathPoint PathPoint_humerus_r: humerus_r (-0.00949 -0.01525 0.00269)
      ConditionalPathPoint ConditionalPathPoint_rib6_R: rib6_R (0.0166028 -0.0525933 0.141147)
          socket_coordinate=/jointset/L5_S1_IVDjnt/L5_S1_FE range=(-99999.9 99999.9)
      ConditionalPathPoint ConditionalPathPoint_rib7_R: rib7_R (0.00842203 -0.0516927 0.128382)
          socket_coordinate=/jointset/L5_S1_IVDjnt/L5_S1_FE range=(-99999.9 99999.9)
      ConditionalPathPoint ConditionalPathPoint_rib8_R: rib8_R (0.00120941 -0.0518082 0.120676)
          socket_coordinate=/jointset/L5_S1_IVDjnt/L5_S1_FE range=(-99999.9 99999.9)
      ConditionalPathPoint ConditionalPathPoint_rib9_R: rib9_R (-0.0046956 -0.0515322 0.111416)
          socket_coordinate=/jointset/L5_S1_IVDjnt/L5_S1_FE range=(-99999.9 99999.9)
      ConditionalPathPoint ConditionalPathPoint_rib10_R: rib10_R (-0.013417 -0.048494 0.0993869)
          socket_coordinate=/jointset/L5_S1_IVDjnt/L5_S1_FE range=(-99999.9 99999.9)
      ConditionalPathPoint ConditionalPathPoint_rib11_R: rib11_R (-0.0216287 -0.0320183 0.0729058)
          socket_coordinate=/jointset/L5_S1_IVDjnt/L5_S1_FE range=(-99999.9 99999.9)
      ConditionalPathPoint ConditionalPathPoint_rib12_R: rib12_R (-0.013796 -0.0190065 0.0463174)
          socket_coordinate=/jointset/L5_S1_IVDjnt/L5_S1_FE range=(-99999.9 99999.9)
      PathPoint PathPoint_thoracic12: thoracic12 (-0.046297 0.010487 0.0047994)
    Thelen2003Muscle LD_T11_r: max_isometric_force=85.64963 optimal_fiber_length=0.2969715
        tendon_slack_length=0.06098523 pennation_angle_at_optimal=0
      PathPoint PathPoint_humerus_r: humerus_r (-0.00949 -0.01525 0.00269)
      ConditionalPathPoint ConditionalPathPoint_rib6_R: rib6_R (0.0119775 -0.0495873 0.140169)
          socket_coordinate=/jointset/L5_S1_IVDjnt/L5_S1_FE range=(-99999.9 99999.9)
      ConditionalPathPoint ConditionalPathPoint_rib7_R: rib7_R (0.00124961 -0.0474936 0.125071)
          socket_coordinate=/jointset/L5_S1_IVDjnt/L5_S1_FE range=(-99999.9 99999.9)
      ConditionalPathPoint ConditionalPathPoint_rib8_R: rib8_R (-0.00854271 -0.0463411 0.115103)
          socket_coordinate=/jointset/L5_S1_IVDjnt/L5_S1_FE range=(-99999.9 99999.9)
      ConditionalPathPoint ConditionalPathPoint_rib9_R: rib9_R (-0.0158407 -0.0442242 0.102723)
          socket_coordinate=/jointset/L5_S1_IVDjnt/L5_S1_FE range=(-99999.9 99999.9)
      ConditionalPathPoint ConditionalPathPoint_rib10_R: rib10_R (-0.0241192 -0.038781 0.0877796)
          socket_coordinate=/jointset/L5_S1_IVDjnt/L5_S1_FE range=(-99999.9 99999.9)
      ConditionalPathPoint ConditionalPathPoint_rib11_R: rib11_R (-0.024343 -0.0180293 0.0517496)
          socket_coordinate=/jointset/L5_S1_IVDjnt/L5_S1_FE range=(-99999.9 99999.9)
      PathPoint PathPoint_thoracic11: thoracic11 (-0.046688 0.010744 0.0038035)
    Thelen2003Muscle LD_T10_r: max_isometric_force=95.40681 optimal_fiber_length=0.2950492
        tendon_slack_length=0.04616417 pennation_angle_at_optimal=0
      PathPoint PathPoint_humerus_r: humerus_r (-0.00949 -0.01525 0.00269)
      ConditionalPathPoint ConditionalPathPoint_rib6_R: rib6_R (0.00711563 -0.0464653 0.138827)
          socket_coordinate=/jointset/L5_S1_IVDjnt/L5_S1_FE range=(-99999.9 99999.9)
      ConditionalPathPoint ConditionalPathPoint_rib7_R: rib7_R (-0.00604078 -0.0432306 0.121281)
          socket_coordinate=/jointset/L5_S1_IVDjnt/L5_S1_FE range=(-99999.9 99999.9)
      ConditionalPathPoint ConditionalPathPoint_rib8_R: rib8_R (-0.0188663 -0.0404291 0.108473)
          socket_coordinate=/jointset/L5_S1_IVDjnt/L5_S1_FE range=(-99999.9 99999.9)
      ConditionalPathPoint ConditionalPathPoint_rib9_R: rib9_R (-0.0269964 -0.0364562 0.0927048)
          socket_coordinate=/jointset/L5_S1_IVDjnt/L5_S1_FE range=(-99999.9 99999.9)
      ConditionalPathPoint ConditionalPathPoint_rib10_R: rib10_R (-0.0362015 -0.027158 0.0723446)
          socket_coordinate=/jointset/L5_S1_IVDjnt/L5_S1_FE range=(-99999.9 99999.9)
      PathPoint PathPoint_thoracic10: thoracic10 (-0.043221 0.011944 0.0042125)
    Thelen2003Muscle LD_T9_r: max_isometric_force=75.349 optimal_fiber_length=0.2672907 tendon_slack_length=0.041821
        pennation_angle_at_optimal=0
      PathPoint PathPoint_humerus_r: humerus_r (-0.00949 -0.01525 0.00269)
      ConditionalPathPoint ConditionalPathPoint_rib6_R: rib6_R (-0.00112145 -0.0412272 0.135826)
          socket_coordinate=/jointset/L5_S1_IVDjnt/L5_S1_FE range=(-99999.9 99999.9)
      ConditionalPathPoint ConditionalPathPoint_rib7_R: rib7_R (-0.0173557 -0.0361136 0.114766)
          socket_coordinate=/jointset/L5_S1_IVDjnt/L5_S1_FE range=(-99999.9 99999.9)
      ConditionalPathPoint ConditionalPathPoint_rib8_R: rib8_R (-0.0339398 -0.030223 0.0960744)
          socket_coordinate=/jointset/L5_S1_IVDjnt/L5_S1_FE range=(-99999.9 99999.9)
      PathPoint PathPoint_thoracic9: thoracic9 (-0.04708 0.018194 0.0044837)
    Thelen2003Muscle LD_T8_r: max_isometric_force=63.01257 optimal_fiber_length=0.2508189
        tendon_slack_length=0.05150745 pennation_angle_at_optimal=0
      PathPoint PathPoint_humerus_r: humerus_r (-0.00949 -0.01525 0.00269)
      ConditionalPathPoint ConditionalPathPoint_rib6_R: rib6_R (-0.00799397 -0.0376632 0.130888)
          socket_coordinate=/jointset/L5_S1_IVDjnt/L5_S1_FE range=(-99999.9 99999.9)
      ConditionalPathPoint ConditionalPathPoint_rib7_R: rib7_R (-0.0238089 -0.0314436 0.110602)
          socket_coordinate=/jointset/L5_S1_IVDjnt/L5_S1_FE range=(-99999.9 99999.9)
      ConditionalPathPoint ConditionalPathPoint_rib8_R: rib8_R (-0.0423596 -0.023248 0.0863895)
          socket_coordinate=/jointset/L5_S1_IVDjnt/L5_S1_FE range=(-99999.9 99999.9)
      PathPoint PathPoint_thoracic8: thoracic8 (-0.04691 0.012692 0.0047025)
    Thelen2003Muscle LD_T7_r: max_isometric_force=33.50204 optimal_fiber_length=0.2365315
        tendon_slack_length=0.04857342 pennation_angle_at_optimal=0
      PathPoint PathPoint_humerus_r: humerus_r (-0.00949 -0.01525 0.00269)
      ConditionalPathPoint ConditionalPathPoint_rib6_R: rib6_R (-0.018918 -0.0326092 0.120723)
          socket_coordinate=/jointset/L5_S1_IVDjnt/L5_S1_FE range=(-99999.9 99999.9)
      ConditionalPathPoint ConditionalPathPoint_rib7_R: rib7_R (-0.033316 -0.0240785 0.102566)
          socket_coordinate=/jointset/L5_S1_IVDjnt/L5_S1_FE range=(-99999.9 99999.9)
      PathPoint PathPoint_thoracic7: thoracic7 (-0.055703 0.0081141 0.0044805)
    Thelen2003Muscle LD_R12_r: max_isometric_force=61.34512 optimal_fiber_length=0.2732426
        tendon_slack_length=0.05611231 pennation_angle_at_optimal=0
      PathPoint PathPoint_humerus_r: humerus_r (-0.00949 -0.01525 0.00269)
      ConditionalPathPoint ConditionalPathPoint_rib5_R: rib5_R (0.0223477 -0.054628 0.141079)
          socket_coordinate=/jointset/L5_S1_IVDjnt/L5_S1_FE range=(-99999.9 99999.9)
      ConditionalPathPoint ConditionalPathPoint_rib6_R: rib6_R (0.0203445 -0.0550553 0.141737)
          socket_coordinate=/jointset/L5_S1_IVDjnt/L5_S1_FE range=(-99999.9 99999.9)
      ConditionalPathPoint ConditionalPathPoint_rib7_R: rib7_R (0.0139129 -0.0549237 0.130652)
          socket_coordinate=/jointset/L5_S1_IVDjnt/L5_S1_FE range=(-99999.9 99999.9)
      ConditionalPathPoint ConditionalPathPoint_rib8_R: rib8_R (0.00928796 -0.0562802 0.124862)
          socket_coordinate=/jointset/L5_S1_IVDjnt/L5_S1_FE range=(-99999.9 99999.9)
      ConditionalPathPoint ConditionalPathPoint_rib9_R: rib9_R (0.00435068 -0.0572313 0.117686)
          socket_coordinate=/jointset/L5_S1_IVDjnt/L5_S1_FE range=(-99999.9 99999.9)
      ConditionalPathPoint ConditionalPathPoint_rib10_R: rib10_R (-0.00464859 -0.05585 0.107498)
          socket_coordinate=/jointset/L5_S1_IVDjnt/L5_S1_FE range=(-99999.9 99999.9)
      ConditionalPathPoint ConditionalPathPoint_rib11_R: rib11_R (-0.0152774 -0.0419283 0.0879497)
          socket_coordinate=/jointset/L5_S1_IVDjnt/L5_S1_FE range=(-99999.9 99999.9)
      PathPoint PathPoint_rib12_R: rib12_R (-0.0250967 -0.0246502 0.0381059)
    Thelen2003Muscle LD_R11_r: max_isometric_force=84.8772 optimal_fiber_length=0.2387278
        tendon_slack_length=0.04902445 pennation_angle_at_optimal=0
      PathPoint PathPoint_humerus_r: humerus_r (-0.00949 -0.01525 0.00433)
      ConditionalPathPoint ConditionalPathPoint_rib5_R: rib5_R (0.0167511 -0.0520539 0.137987)
          socket_coordinate=/jointset/L5_S1_IVDjnt/L5_S1_FE range=(-99999.9 99999.9)
      ConditionalPathPoint ConditionalPathPoint_rib6_R: rib6_R (0.0141255 -0.0509793 0.140656)
          socket_coordinate=/jointset/L5_S1_IVDjnt/L5_S1_FE range=(-99999.9 99999.9)
      ConditionalPathPoint ConditionalPathPoint_rib7_R: rib7_R (0.00481249 -0.0495777 0.126765)
          socket_coordinate=/jointset/L5_S1_IVDjnt/L5_S1_FE range=(-99999.9 99999.9)
      ConditionalPathPoint ConditionalPathPoint_rib8_R: rib8_R (-0.00313216 -0.0493841 0.118274)
          socket_coordinate=/jointset/L5_S1_IVDjnt/L5_S1_FE range=(-99999.9 99999.9)
      ConditionalPathPoint ConditionalPathPoint_rib9_R: rib9_R (-0.00920814 -0.0486182 0.108041)
          socket_coordinate=/jointset/L5_S1_IVDjnt/L5_S1_FE range=(-99999.9 99999.9)
      ConditionalPathPoint ConditionalPathPoint_rib10_R: rib10_R (-0.0173307 -0.045027 0.0953624)
          socket_coordinate=/jointset/L5_S1_IVDjnt/L5_S1_FE range=(-99999.9 99999.9)
      PathPoint PathPoint_rib11_R: rib11_R (-0.0321079 -0.0233985 0.0552416)
    Thelen2003Muscle LD_Il_r: max_isometric_force=35.70124 optimal_fiber_length=0.468767 tendon_slack_length=0.02026624
        pennation_angle_at_optimal=0
      PathPoint PathPoint_humerus_r: humerus_r (-0.00949 -0.01525 0.00269)
      ConditionalPathPoint ConditionalPathPoint_rib5_R: rib5_R (0.0297302 -0.058053 0.144799)
          socket_coordinate=/jointset/L5_S1_IVDjnt/L5_S1_FE range=(-99999.9 99999.9)
      ConditionalPathPoint ConditionalPathPoint_rib6_R: rib6_R (0.0291359 -0.0609854 0.142354)
          socket_coordinate=/jointset/L5_S1_IVDjnt/L5_S1_FE range=(-99999.9 99999.9)
      ConditionalPathPoint ConditionalPathPoint_rib7_R: rib7_R (0.0284452 -0.0636198 0.135568)
          socket_coordinate=/jointset/L5_S1_IVDjnt/L5_S1_FE range=(-99999.9 99999.9)
      ConditionalPathPoint ConditionalPathPoint_rib8_R: rib8_R (0.0318434 -0.0688533 0.135172)
          socket_coordinate=/jointset/L5_S1_IVDjnt/L5_S1_FE range=(-99999.9 99999.9)
      ConditionalPathPoint ConditionalPathPoint_rib9_R: rib9_R (0.0305647 -0.0739243 0.133691)
          socket_coordinate=/jointset/L5_S1_IVDjnt/L5_S1_FE range=(-99999.9 99999.9)
      ConditionalPathPoint ConditionalPathPoint_rib10_R: rib10_R (0.024294 -0.0782781 0.132167)
          socket_coordinate=/jointset/L5_S1_IVDjnt/L5_S1_FE range=(-99999.9 99999.9)
      ConditionalPathPoint ConditionalPathPoint_rib11_R: rib11_R (0.0147979 -0.0754693 0.130141)
          socket_coordinate=/jointset/L5_S1_IVDjnt/L5_S1_FE range=(-99999.9 99999.9)
      PathPoint PathPoint_pelvis: pelvis (-0.12623 0.043479 0.048683)
    Thelen2003Muscle LD_L1_l: max_isometric_force=114.7199 optimal_fiber_length=0.3303033
        tendon_slack_length=0.07212318 pennation_angle_at_optimal=0
      PathPoint PathPoint_humerus_l: humerus_l (-0.0094874 -0.01525 -0.00269)
      ConditionalPathPoint ConditionalPathPoint_rib5_L: rib5_L (0.0201887 -0.0536329 -0.139913)
          socket_coordinate=/jointset/L5_S1_IVDjnt/L5_S1_FE range=(-99999.9 99999.9)
      ConditionalPathPoint ConditionalPathPoint_rib6_L: rib6_L (0.0178471 -0.0534093 -0.141365)
          socket_coordinate=/jointset/L5_S1_IVDjnt/L5_S1_FE range=(-99999.9 99999.9)
      ConditionalPathPoint ConditionalPathPoint_rib7_L: rib7_L (0.0102433 -0.0527626 -0.12916)
          socket_coordinate=/jointset/L5_S1_IVDjnt/L5_S1_FE range=(-99999.9 99999.9)
      ConditionalPathPoint ConditionalPathPoint_rib8_L: rib8_L (0.00401158 -0.0533641 -0.12217)
          socket_coordinate=/jointset/L5_S1_IVDjnt/L5_S1_FE range=(-99999.9 99999.9)
      ConditionalPathPoint ConditionalPathPoint_rib9_L: rib9_L (-0.00149087 -0.0535711 -0.113707)
          socket_coordinate=/jointset/L5_S1_IVDjnt/L5_S1_FE range=(-99999.9 99999.9)
      ConditionalPathPoint ConditionalPathPoint_rib10_L: rib10_L (-0.0101221 -0.0513158 -0.102565)
          socket_coordinate=/jointset/L5_S1_IVDjnt/L5_S1_FE range=(-99999.9 99999.9)
      ConditionalPathPoint ConditionalPathPoint_rib11_L: rib11_L (-0.0186739 -0.0370909 -0.0808005)
          socket_coordinate=/jointset/L5_S1_IVDjnt/L5_S1_FE range=(-99999.9 99999.9)
      ConditionalPathPoint ConditionalPathPoint_rib12_L: rib12_L (-0.0155427 -0.0262149 -0.0584114)
          socket_coordinate=/jointset/L5_S1_IVDjnt/L5_S1_FE range=(-99999.9 99999.9)
      PathPoint PathPoint_lumbar1: lumbar1 (-0.0423 0.0090443 -0.00433)
    Thelen2003Muscle LD_L2_l: max_isometric_force=81.00141 optimal_fiber_length=0.3557936
        tendon_slack_length=0.07768911 pennation_angle_at_optimal=0
      PathPoint PathPoint_humerus_l: humerus_l (-0.00949 -0.01525 -0.00269)
      ConditionalPathPoint ConditionalPathPoint_rib5_L: rib5_L (0.0236473 -0.055228 -0.141764)
          socket_coordinate=/jointset/L5_S1_IVDjnt/L5_S1_FE range=(-99999.9 99999.9)
      ConditionalPathPoint ConditionalPathPoint_rib6_L: rib6_L (0.0215967 -0.0558873 -0.141891)
          socket_coordinate=/jointset/L5_S1_IVDjnt/L5_S1_FE range=(-99999.9 99999.9)
      ConditionalPathPoint ConditionalPathPoint_rib7_L: rib7_L (0.0161264 -0.0562347 -0.131498)
          socket_coordinate=/jointset/L5_S1_IVDjnt/L5_S1_FE range=(-99999.9 99999.9)
      ConditionalPathPoint ConditionalPathPoint_rib8_L: rib8_L (0.0125689 -0.0580881 -0.126455)
          socket_coordinate=/jointset/L5_S1_IVDjnt/L5_S1_FE range=(-99999.9 99999.9)
      ConditionalPathPoint ConditionalPathPoint_rib9_L: rib9_L (0.00807682 -0.0595381 -0.12009)
          socket_coordinate=/jointset/L5_S1_IVDjnt/L5_S1_FE range=(-99999.9 99999.9)
      ConditionalPathPoint ConditionalPathPoint_rib10_L: rib10_L (-0.00075029 -0.0589868 -0.110789)
          socket_coordinate=/jointset/L5_S1_IVDjnt/L5_S1_FE range=(-99999.9 99999.9)
      ConditionalPathPoint ConditionalPathPoint_rib11_L: rib11_L (-0.0103617 -0.048079 -0.0966419)
          socket_coordinate=/jointset/L5_S1_IVDjnt/L5_S1_FE range=(-99999.9 99999.9)
      ConditionalPathPoint ConditionalPathPoint_rib12_L: rib12_L (-0.0126736 -0.040145 -0.0768872)
          socket_coordinate=/jointset/L5_S1_IVDjnt/L5_S1_FE range=(-99999.9 99999.9)
      PathPoint PathPoint_lumbar2: lumbar2 (-0.040985 0.001859 -0.00415)
    Thelen2003Muscle LD_L3_l: max_isometric_force=66.76531 optimal_fiber_length=0.3777551 tendon_slack_length=0.0824845
        pennation_angle_at_optimal=0
      PathPoint PathPoint_humerus_l: humerus_l (-0.00949 -0.01525 -0.00433)
      ConditionalPathPoint ConditionalPathPoint_rib5_L: rib5_L (0.0266822 -0.056635 -0.143312)
          socket_coordinate=/jointset/L5_S1_IVDjnt/L5_S1_FE range=(-99999.9 99999.9)
      ConditionalPathPoint ConditionalPathPoint_rib6_L: rib6_L (0.0247336 -0.0579884 -0.142179)
          socket_coordinate=/jointset/L5_S1_IVDjnt/L5_S1_FE range=(-99999.9 99999.9)
      ConditionalPathPoint ConditionalPathPoint_rib7_L: rib7_L (0.0205841 -0.0588867 -0.133098)
          socket_coordinate=/jointset/L5_S1_IVDjnt/L5_S1_FE range=(-99999.9 99999.9)
      ConditionalPathPoint ConditionalPathPoint_rib8_L: rib8_L (0.018782 -0.0615022 -0.12931)
          socket_coordinate=/jointset/L5_S1_IVDjnt/L5_S1_FE range=(-99999.9 99999.9)
      ConditionalPathPoint ConditionalPathPoint_rib9_L: rib9_L (0.0149084 -0.0637102 -0.124267)
          socket_coordinate=/jointset/L5_S1_IVDjnt/L5_S1_FE range=(-99999.9 99999.9)
      ConditionalPathPoint ConditionalPathPoint_rib10_L: rib10_L (0.00606568 -0.0643269 -0.116168)
          socket_coordinate=/jointset/L5_S1_IVDjnt/L5_S1_FE range=(-99999.9 99999.9)
      ConditionalPathPoint ConditionalPathPoint_rib11_L: rib11_L (-0.00362004 -0.0556661 -0.106919)
          socket_coordinate=/jointset/L5_S1_IVDjnt/L5_S1_FE range=(-99999.9 99999.9)
      ConditionalPathPoint ConditionalPathPoint_rib12_L: rib12_L (-0.00809871 -0.049938 -0.088255)
          socket_coordinate=/jointset/L5_S1_IVDjnt/L5_S1_FE range=(-99999.9 99999.9)
      PathPoint PathPoint_lumbar3: lumbar3 (-0.040433 0.0043131 -0.00386)
    Thelen2003Muscle LD_L4_l: max_isometric_force=47.57254 optimal_fiber_length=0.3970572 tendon_slack_length=0.0866992
        pennation_angle_at_optimal=0
      PathPoint PathPoint_humerus_l: humerus_l (-0.00949 -0.01525 -0.00269)
      ConditionalPathPoint ConditionalPathPoint_rib5_L: rib5_L (0.0271128 -0.056836 -0.143523)
          socket_coordinate=/jointset/L5_S1_IVDjnt/L5_S1_FE range=(-99999.9 99999.9)
      ConditionalPathPoint ConditionalPathPoint_rib6_L: rib6_L (0.0256759 -0.0586254 -0.142239)
          socket_coordinate=/jointset/L5_S1_IVDjnt/L5_S1_FE range=(-99999.9 99999.9)
      ConditionalPathPoint ConditionalPathPoint_rib7_L: rib7_L (0.0224507 -0.0600037 -0.133726)
          socket_coordinate=/jointset/L5_S1_IVDjnt/L5_S1_FE range=(-99999.9 99999.9)
      ConditionalPathPoint ConditionalPathPoint_rib8_L: rib8_L (0.022121 -0.0633322 -0.130761)
          socket_coordinate=/jointset/L5_S1_IVDjnt/L5_S1_FE range=(-99999.9 99999.9)
      ConditionalPathPoint ConditionalPathPoint_rib9_L: rib9_L (0.0191316 -0.0662672 -0.126717)
          socket_coordinate=/jointset/L5_S1_IVDjnt/L5_S1_FE range=(-99999.9 99999.9)
      ConditionalPathPoint ConditionalPathPoint_rib10_L: rib10_L (0.0105092 -0.0677269 -0.11945)
          socket_coordinate=/jointset/L5_S1_IVDjnt/L5_S1_FE range=(-99999.9 99999.9)
      ConditionalPathPoint ConditionalPathPoint_rib11_L: rib11_L (0.00109078 -0.0606291 -0.113442)
          socket_coordinate=/jointset/L5_S1_IVDjnt/L5_S1_FE range=(-99999.9 99999.9)
      ConditionalPathPoint ConditionalPathPoint_rib12_L: rib12_L (-0.00420775 -0.0568861 -0.096036)
          socket_coordinate=/jointset/L5_S1_IVDjnt/L5_S1_FE range=(-99999.9 99999.9)
      PathPoint PathPoint_lumbar4: lumbar4 (-0.042453 0.0040036 -0.00462)
    Thelen2003Muscle LD_L5_l: max_isometric_force=51.99744 optimal_fiber_length=0.4196239
        tendon_slack_length=0.08617277 pennation_angle_at_optimal=0
      PathPoint PathPoint_humerus_l: humerus_l (-0.00949 -0.01525 -0.00269)
      ConditionalPathPoint ConditionalPathPoint_rib5_L: rib5_L (0.0275515 -0.057039 -0.143743)
          socket_coordinate=/jointset/L5_S1_IVDjnt/L5_S1_FE range=(-99999.9 99999.9)
      ConditionalPathPoint ConditionalPathPoint_rib6_L: rib6_L (0.0259906 -0.0588384 -0.142258)
          socket_coordinate=/jointset/L5_S1_IVDjnt/L5_S1_FE range=(-99999.9 99999.9)
      ConditionalPathPoint ConditionalPathPoint_rib7_L: rib7_L (0.0228263 -0.0602267 -0.133853)
          socket_coordinate=/jointset/L5_S1_IVDjnt/L5_S1_FE range=(-99999.9 99999.9)
      ConditionalPathPoint ConditionalPathPoint_rib8_L: rib8_L (0.0229358 -0.0637912 -0.131147)
          socket_coordinate=/jointset/L5_S1_IVDjnt/L5_S1_FE range=(-99999.9 99999.9)
      ConditionalPathPoint ConditionalPathPoint_rib9_L: rib9_L (0.0201645 -0.0669662 -0.127389)
          socket_coordinate=/jointset/L5_S1_IVDjnt/L5_S1_FE range=(-99999.9 99999.9)
      ConditionalPathPoint ConditionalPathPoint_rib10_L: rib10_L (0.0121084 -0.0689399 -0.120585)
          socket_coordinate=/jointset/L5_S1_IVDjnt/L5_S1_FE range=(-99999.9 99999.9)
      ConditionalPathPoint ConditionalPathPoint_rib11_L: rib11_L (0.00282903 -0.0624661 -0.115736)
          socket_coordinate=/jointset/L5_S1_IVDjnt/L5_S1_FE range=(-99999.9 99999.9)
      ConditionalPathPoint ConditionalPathPoint_rib12_L: rib12_L (-0.00251285 -0.0597691 -0.0992286)
          socket_coordinate=/jointset/L5_S1_IVDjnt/L5_S1_FE range=(-99999.9 99999.9)
      PathPoint PathPoint_lumbar5: lumbar5 (-0.038798 0.0048562 -0.00411)
    Thelen2003Muscle LD_T12_l: max_isometric_force=71.13996 optimal_fiber_length=0.3194157
        tendon_slack_length=0.0655943 pennation_angle_at_optimal=0
      PathPoint PathPoint_humerus_l: humerus_l (-0.00949 -0.01525 -0.00269)
      ConditionalPathPoint ConditionalPathPoint_rib6_L: rib6_L (0.016603 -0.0525933 -0.141147)
          socket_coordinate=/jointset/L5_S1_IVDjnt/L5_S1_FE range=(-99999.9 99999.9)
      ConditionalPathPoint ConditionalPathPoint_rib7_L: rib7_L (0.00842199 -0.0516926 -0.128381)
          socket_coordinate=/jointset/L5_S1_IVDjnt/L5_S1_FE range=(-99999.9 99999.9)
      ConditionalPathPoint ConditionalPathPoint_rib8_L: rib8_L (0.00120899 -0.051808 -0.120676)
          socket_coordinate=/jointset/L5_S1_IVDjnt/L5_S1_FE range=(-99999.9 99999.9)
      ConditionalPathPoint ConditionalPathPoint_rib9_L: rib9_L (-0.00469589 -0.051532 -0.111415)
          socket_coordinate=/jointset/L5_S1_IVDjnt/L5_S1_FE range=(-99999.9 99999.9)
      ConditionalPathPoint ConditionalPathPoint_rib10_L: rib10_L (-0.0134171 -0.0484937 -0.0993865)
          socket_coordinate=/jointset/L5_S1_IVDjnt/L5_S1_FE range=(-99999.9 99999.9)
      ConditionalPathPoint ConditionalPathPoint_rib11_L: rib11_L (-0.0216286 -0.0320188 -0.0729057)
          socket_coordinate=/jointset/L5_S1_IVDjnt/L5_S1_FE range=(-99999.9 99999.9)
      ConditionalPathPoint ConditionalPathPoint_rib12_L: rib12_L (-0.0137959 -0.0190068 -0.0463174)
          socket_coordinate=/jointset/L5_S1_IVDjnt/L5_S1_FE range=(-99999.9 99999.9)
      PathPoint PathPoint_thoracic12: thoracic12 (-0.046297 0.010487 -0.0047956)
    Thelen2003Muscle LD_T11_l: max_isometric_force=85.64954 optimal_fiber_length=0.2969694
        tendon_slack_length=0.06098479 pennation_angle_at_optimal=0
      PathPoint PathPoint_humerus_l: humerus_l (-0.00949 -0.01525 -0.00269)
      ConditionalPathPoint ConditionalPathPoint_rib6_L: rib6_L (0.0119777 -0.0495873 -0.140169)
          socket_coordinate=/jointset/L5_S1_IVDjnt/L5_S1_FE range=(-99999.9 99999.9)
      ConditionalPathPoint ConditionalPathPoint_rib7_L: rib7_L (0.00124947 -0.0474936 -0.125071)
          socket_coordinate=/jointset/L5_S1_IVDjnt/L5_S1_FE range=(-99999.9 99999.9)
      ConditionalPathPoint ConditionalPathPoint_rib8_L: rib8_L (-0.00854313 -0.046341 -0.115103)
          socket_coordinate=/jointset/L5_S1_IVDjnt/L5_S1_FE range=(-99999.9 99999.9)
      ConditionalPathPoint ConditionalPathPoint_rib9_L: rib9_L (-0.015841 -0.044224 -0.102724)
          socket_coordinate=/jointset/L5_S1_IVDjnt/L5_S1_FE range=(-99999.9 99999.9)
      ConditionalPathPoint ConditionalPathPoint_rib10_L: rib10_L (-0.0241195 -0.0387806 -0.0877794)
          socket_coordinate=/jointset/L5_S1_IVDjnt/L5_S1_FE range=(-99999.9 99999.9)
      ConditionalPathPoint ConditionalPathPoint_rib11_L: rib11_L (-0.024343 -0.0180297 -0.0517496)
          socket_coordinate=/jointset/L5_S1_IVDjnt/L5_S1_FE range=(-99999.9 99999.9)
      PathPoint PathPoint_thoracic11: thoracic11 (-0.046688 0.010744 -0.0038056)
    Thelen2003Muscle LD_T10_l: max_isometric_force=95.40742 optimal_fiber_length=0.2950498
        tendon_slack_length=0.04616425 pennation_angle_at_optimal=0
      PathPoint PathPoint_humerus_l: humerus_l (-0.00949 -0.01525 -0.00269)
      ConditionalPathPoint ConditionalPathPoint_rib6_L: rib6_L (0.00711556 -0.0464663 -0.138827)
          socket_coordinate=/jointset/L5_S1_IVDjnt/L5_S1_FE range=(-99999.9 99999.9)
      ConditionalPathPoint ConditionalPathPoint_rib7_L: rib7_L (-0.00604081 -0.0432305 -0.121281)
          socket_coordinate=/jointset/L5_S1_IVDjnt/L5_S1_FE range=(-99999.9 99999.9)
      ConditionalPathPoint ConditionalPathPoint_rib8_L: rib8_L (-0.0188666 -0.0404289 -0.108472)
          socket_coordinate=/jointset/L5_S1_IVDjnt/L5_S1_FE range=(-99999.9 99999.9)
      ConditionalPathPoint ConditionalPathPoint_rib9_L: rib9_L (-0.0269968 -0.0364559 -0.0927046)
          socket_coordinate=/jointset/L5_S1_IVDjnt/L5_S1_FE range=(-99999.9 99999.9)
      ConditionalPathPoint ConditionalPathPoint_rib10_L: rib10_L (-0.0362017 -0.0271575 -0.0723446)
          socket_coordinate=/jointset/L5_S1_IVDjnt/L5_S1_FE range=(-99999.9 99999.9)
      PathPoint PathPoint_thoracic10: thoracic10 (-0.043221 0.011944 -0.0042126)
    Thelen2003Muscle LD_T9_l: max_isometric_force=75.34822 optimal_fiber_length=0.2672896
        tendon_slack_length=0.04182083 pennation_angle_at_optimal=0
      PathPoint PathPoint_humerus_l: humerus_l (-0.00949 -0.01525 -0.00269)
      ConditionalPathPoint ConditionalPathPoint_rib6_L: rib6_L (-0.00112122 -0.0412272 -0.135826)
          socket_coordinate=/jointset/L5_S1_IVDjnt/L5_S1_FE range=(-99999.9 99999.9)
      ConditionalPathPoint ConditionalPathPoint_rib7_L: rib7_L (-0.0173555 -0.0361134 -0.114766)
          socket_coordinate=/jointset/L5_S1_IVDjnt/L5_S1_FE range=(-99999.9 99999.9)
      ConditionalPathPoint ConditionalPathPoint_rib8_L: rib8_L (-0.0339399 -0.0302227 -0.0960743)
          socket_coordinate=/jointset/L5_S1_IVDjnt/L5_S1_FE range=(-99999.9 99999.9)
      PathPoint PathPoint_thoracic9: thoracic9 (-0.04708 0.018194 -0.0044876)
    Thelen2003Muscle LD_T8_l: max_isometric_force=63.01198 optimal_fiber_length=0.250818 tendon_slack_length=0.05150726
        pennation_angle_at_optimal=0
      PathPoint PathPoint_humerus_l: humerus_l (-0.00949 -0.01525 -0.00269)
      ConditionalPathPoint ConditionalPathPoint_rib6_L: rib6_L (-0.00799394 -0.0376642 -0.130888)
          socket_coordinate=/jointset/L5_S1_IVDjnt/L5_S1_FE range=(-99999.9 99999.9)
      ConditionalPathPoint ConditionalPathPoint_rib7_L: rib7_L (-0.0238088 -0.0314434 -0.110603)
          socket_coordinate=/jointset/L5_S1_IVDjnt/L5_S1_FE range=(-99999.9 99999.9)
      ConditionalPathPoint ConditionalPathPoint_rib8_L: rib8_L (-0.0423597 -0.0232477 -0.0863897)
          socket_coordinate=/jointset/L5_S1_IVDjnt/L5_S1_FE range=(-99999.9 99999.9)
      PathPoint PathPoint_thoracic8: thoracic8 (-0.04691 0.012692 -0.0047076)
    Thelen2003Muscle LD_T7_l: max_isometric_force=33.502 optimal_fiber_length=0.2365408 tendon_slack_length=0.04857533
        pennation_angle_at_optimal=0
      PathPoint PathPoint_humerus_l: humerus_l (-0.00949 -0.01525 -0.00269)
      ConditionalPathPoint ConditionalPathPoint_rib6_L: rib6_L (-0.018918 -0.0326101 -0.120722)
          socket_coordinate=/jointset/L5_S1_IVDjnt/L5_S1_FE range=(-99999.9 99999.9)
      ConditionalPathPoint ConditionalPathPoint_rib7_L: rib7_L (-0.0333158 -0.0240783 -0.102567)
          socket_coordinate=/jointset/L5_S1_IVDjnt/L5_S1_FE range=(-99999.9 99999.9)
      PathPoint PathPoint_thoracic7: thoracic7 (-0.055703 0.0081141 -0.0044766)
    Thelen2003Muscle LD_R12_l: max_isometric_force=61.34568 optimal_fiber_length=0.2732397
        tendon_slack_length=0.05611173 pennation_angle_at_optimal=0
      PathPoint PathPoint_humerus_l: humerus_l (-0.00949 -0.01525 -0.00269)
      ConditionalPathPoint ConditionalPathPoint_rib5_L: rib5_L (0.0223472 -0.054628 -0.141079)
          socket_coordinate=/jointset/L5_S1_IVDjnt/L5_S1_FE range=(-99999.9 99999.9)
      ConditionalPathPoint ConditionalPathPoint_rib6_L: rib6_L (0.0203447 -0.0550553 -0.141737)
          socket_coordinate=/jointset/L5_S1_IVDjnt/L5_S1_FE range=(-99999.9 99999.9)
      ConditionalPathPoint ConditionalPathPoint_rib7_L: rib7_L (0.0139128 -0.0549237 -0.130652)
          socket_coordinate=/jointset/L5_S1_IVDjnt/L5_S1_FE range=(-99999.9 99999.9)
      ConditionalPathPoint ConditionalPathPoint_rib8_L: rib8_L (0.00928754 -0.0562801 -0.124862)
          socket_coordinate=/jointset/L5_S1_IVDjnt/L5_S1_FE range=(-99999.9 99999.9)
      ConditionalPathPoint ConditionalPathPoint_rib9_L: rib9_L (0.0043504 -0.0572311 -0.117685)
          socket_coordinate=/jointset/L5_S1_IVDjnt/L5_S1_FE range=(-99999.9 99999.9)
      ConditionalPathPoint ConditionalPathPoint_rib10_L: rib10_L (-0.00464865 -0.0558498 -0.107497)
          socket_coordinate=/jointset/L5_S1_IVDjnt/L5_S1_FE range=(-99999.9 99999.9)
      ConditionalPathPoint ConditionalPathPoint_rib11_L: rib11_L (-0.0152774 -0.0419279 -0.0879493)
          socket_coordinate=/jointset/L5_S1_IVDjnt/L5_S1_FE range=(-99999.9 99999.9)
      PathPoint PathPoint_rib12_L: rib12_L (-0.0250967 -0.0246502 -0.0381059)
    Thelen2003Muscle LD_R11_l: max_isometric_force=84.87767 optimal_fiber_length=0.2387263
        tendon_slack_length=0.04902415 pennation_angle_at_optimal=0
      PathPoint PathPoint_humerus_l: humerus_l (-0.00949 -0.01525 -0.00433)
      ConditionalPathPoint ConditionalPathPoint_rib5_L: rib5_L (0.016751 -0.0520549 -0.137987)
          socket_coordinate=/jointset/L5_S1_IVDjnt/L5_S1_FE range=(-99999.9 99999.9)
      ConditionalPathPoint ConditionalPathPoint_rib6_L: rib6_L (0.0141255 -0.0509803 -0.140656)
          socket_coordinate=/jointset/L5_S1_IVDjnt/L5_S1_FE range=(-99999.9 99999.9)
      ConditionalPathPoint ConditionalPathPoint_rib7_L: rib7_L (0.00481235 -0.0495776 -0.126765)
          socket_coordinate=/jointset/L5_S1_IVDjnt/L5_S1_FE range=(-99999.9 99999.9)
      ConditionalPathPoint ConditionalPathPoint_rib8_L: rib8_L (-0.00313258 -0.049384 -0.118274)
          socket_coordinate=/jointset/L5_S1_IVDjnt/L5_S1_FE range=(-99999.9 99999.9)
      ConditionalPathPoint ConditionalPathPoint_rib9_L: rib9_L (-0.00920843 -0.048618 -0.108041)
          socket_coordinate=/jointset/L5_S1_IVDjnt/L5_S1_FE range=(-99999.9 99999.9)
      ConditionalPathPoint ConditionalPathPoint_rib10_L: rib10_L (-0.0173308 -0.0450267 -0.0953621)
          socket_coordinate=/jointset/L5_S1_IVDjnt/L5_S1_FE range=(-99999.9 99999.9)
      PathPoint PathPoint_rib11_L: rib11_L (-0.0321079 -0.0233985 -0.0552416)
    Thelen2003Muscle LD_Il_l: max_isometric_force=35.7011 optimal_fiber_length=0.4687639 tendon_slack_length=0.02026611
        pennation_angle_at_optimal=0
      PathPoint PathPoint_humerus_l: humerus_l (-0.00949 -0.01525 -0.00269)
      ConditionalPathPoint ConditionalPathPoint_rib5_L: rib5_L (0.0297298 -0.058053 -0.144798)
          socket_coordinate=/jointset/L5_S1_IVDjnt/L5_S1_FE range=(-99999.9 99999.9)
      ConditionalPathPoint ConditionalPathPoint_rib6_L: rib6_L (0.0291362 -0.0609854 -0.142354)
          socket_coordinate=/jointset/L5_S1_IVDjnt/L5_S1_FE range=(-99999.9 99999.9)
      ConditionalPathPoint ConditionalPathPoint_rib7_L: rib7_L (0.0284451 -0.0636198 -0.135568)
          socket_coordinate=/jointset/L5_S1_IVDjnt/L5_S1_FE range=(-99999.9 99999.9)
      ConditionalPathPoint ConditionalPathPoint_rib8_L: rib8_L (0.0318432 -0.0688533 -0.135171)
          socket_coordinate=/jointset/L5_S1_IVDjnt/L5_S1_FE range=(-99999.9 99999.9)
      ConditionalPathPoint ConditionalPathPoint_rib9_L: rib9_L (0.0305646 -0.0739243 -0.13369)
          socket_coordinate=/jointset/L5_S1_IVDjnt/L5_S1_FE range=(-99999.9 99999.9)
      ConditionalPathPoint ConditionalPathPoint_rib10_L: rib10_L (0.0242939 -0.078278 -0.132165)
          socket_coordinate=/jointset/L5_S1_IVDjnt/L5_S1_FE range=(-99999.9 99999.9)
      ConditionalPathPoint ConditionalPathPoint_rib11_L: rib11_L (0.014798 -0.0754693 -0.13014)
          socket_coordinate=/jointset/L5_S1_IVDjnt/L5_S1_FE range=(-99999.9 99999.9)
      PathPoint PathPoint_pelvis: pelvis (-0.12623 0.043479 -0.04868)
    Thelen2003Muscle stern_mast: max_isometric_force=197 optimal_fiber_length=0.108 tendon_slack_length=0.056123
        pennation_angle_at_optimal=0.2618
      PathPoint P1: sternum (0 0 0)
      PathPoint P2: head_neck (0.016547 0.12482 0.0643)
    Thelen2003Muscle cleid_mast: max_isometric_force=98.5 optimal_fiber_length=0.108 tendon_slack_length=0.035198
        pennation_angle_at_optimal=0.2618
      PathPoint P1: clavicle_R (0.00388 0.00542 0.0352)
      PathPoint P2: head_neck (0.016547 0.12482 0.0643)
    Thelen2003Muscle cleid_occ: max_isometric_force=98.5 optimal_fiber_length=0.108 tendon_slack_length=0.069467
        pennation_angle_at_optimal=0.2618
      PathPoint P1: clavicle_R (0.00388 0.00542 0.0352)
      PathPoint P2: head_neck (-0.013353 0.14089 0.0664)
    Thelen2003Muscle scalenus_ant: max_isometric_force=147 optimal_fiber_length=0.042 tendon_slack_length=0.053421
        pennation_angle_at_optimal=0.17453
      PathPoint P1: rib1_R (0.0486076 -0.0443102 0.0386395)
      PathPoint P2: head_neck (0.018557 0.061415 0.02323)
    Thelen2003Muscle scalenus_med: max_isometric_force=206 optimal_fiber_length=0.05 tendon_slack_length=0.061508
        pennation_angle_at_optimal=0.17453
      PathPoint P1: rib1_R (0.0135069 -0.0305909 0.0620104)
      PathPoint P2: head_neck (0.005017 0.078725 0.02119)
    Thelen2003Muscle scalenus_post: max_isometric_force=157 optimal_fiber_length=0.062 tendon_slack_length=0.072845
        pennation_angle_at_optimal=0.17453
      PathPoint P1: rib2_R (0.0198629 -0.035494 0.0922567)
      PathPoint P2: head_neck (0.004817 0.048055 0.0257)
    Thelen2003Muscle long_col_c1thx: max_isometric_force=27.34286 optimal_fiber_length=0.08913
        tendon_slack_length=0.087519 pennation_angle_at_optimal=0.087266
      PathPoint P1: thoracic3 (0.018446 0.0083677 0.0037)
      PathPoint P2: head_neck (0.0232 0.0011 0.004)
      PathPoint P3: head_neck (0.026977 0.018755 0.00402)
      PathPoint P4: head_neck (0.030297 0.036625 0.0039)
      PathPoint P5: head_neck (0.033477 0.056825 0.00379)
      PathPoint P6: head_neck (0.036157 0.074945 0.00368)
      PathPoint P7: head_neck (0.035077 0.094935 0.00356)
      PathPoint P8: head_neck (0.036547 0.10779 0.0031)
    Thelen2003Muscle long_col_c5thx: max_isometric_force=27.34286 optimal_fiber_length=0.05758
        tendon_slack_length=0.054794 pennation_angle_at_optimal=0.087266
      PathPoint P1: thoracic3 (0.017777 0.0076185 0.0068)
      PathPoint P2: thoracic2 (0.016475 0.0027786 0.01022)
      PathPoint P3: thoracic2 (0.016778 0.016594 0.01337)
      PathPoint P4: thoracic1 (0.013221 0.0048847 0.01508)
      PathPoint P5: thoracic1 (0.0080715 0.018343 0.01778)
      PathPoint P6: head_neck (0.01111 0.00731 0.01979)
      PathPoint P7: head_neck (0.013447 0.023575 0.02216)
      PathPoint P8: head_neck (0.014707 0.043235 0.0238)
    Thelen2003Muscle trap_cl: max_isometric_force=100.0788 optimal_fiber_length=0.084 tendon_slack_length=0.11922
        pennation_angle_at_optimal=0.5236
      PathPoint P1: clavicle_R (-0.0477879 0.0231999 0.0758706)
      PathPoint P2: head_neck (-0.0735696 0.14393 -0.00217311)
    Thelen2003Muscle trap_acr_scap: max_isometric_force=121.5358 optimal_fiber_length=0.1234 tendon_slack_length=0.0456
        pennation_angle_at_optimal=0
      PathPoint trap_acr-P1: scapula_R (-0.0372966 1.82234e-7 -0.0236535)
      PathPoint trap_acr-P2: head_neck (-0.0477 0.019 0)
    Thelen2003Muscle trap_acr_T1: max_isometric_force=121.5358 optimal_fiber_length=0.1339358
        tendon_slack_length=0.04941538 pennation_angle_at_optimal=0
      PathPoint PathPoint_scapula_R: scapula_R (-0.0372966 1.82234e-7 -0.0236535)
      ConditionalPathPoint default: scapula_R (-0.0823451 0.0150001 -0.128007)
          socket_coordinate=/jointset/Abdjnt/Abs_FE range=(-1.57 1.57)
      PathPoint PathPoint_thoracic1: thoracic1 (-0.035 -0.015 0)
    Thelen2003Muscle trap_acr_T2: max_isometric_force=121.5358 optimal_fiber_length=0.1417812
        tendon_slack_length=0.05239241 pennation_angle_at_optimal=0
      PathPoint PathPoint_scapula_R: scapula_R (-0.0372966 1.82234e-7 -0.0236535)
      ConditionalPathPoint default: scapula_R (-0.0968946 0.0130001 -0.138249)
          socket_coordinate=/jointset/Abdjnt/Abs_FE range=(-1.57 1.57)
      PathPoint PathPoint_thoracic2: thoracic2 (-0.036 -0.016 0)
    Thelen2003Muscle trap_acr_T3: max_isometric_force=121.5358 optimal_fiber_length=0.1417256
        tendon_slack_length=0.05238885 pennation_angle_at_optimal=0
      PathPoint PathPoint_scapula_R: scapula_R (-0.0372966 1.82234e-7 -0.0236535)
      ConditionalPathPoint default: scapula_R (-0.1005 0.00200014 -0.143386) socket_coordinate=/jointset/Abdjnt/Abs_FE
          range=(-1.57 1.57)
      PathPoint PathPoint_thoracic3: thoracic3 (-0.04 -0.017 0)
    Thelen2003Muscle trap_inf_T4: max_isometric_force=11.94605 optimal_fiber_length=0.1015952
        tendon_slack_length=0.01817149 pennation_angle_at_optimal=0
      PathPoint PathPoint_thoracic4: thoracic4 (-0.042 -0.017 0)
      ConditionalPathPoint default: scapula_R (-0.100584 -0.0189998 -0.131472)
          socket_coordinate=/jointset/Abdjnt/Abs_FE range=(-1.57 1.57)
      PathPoint PathPoint_scapula_R: scapula_R (-0.0885066 -0.00599971 -0.0766536)
    Thelen2003Muscle trap_inf_T5: max_isometric_force=42.76439 optimal_fiber_length=0.1162474
        tendon_slack_length=0.02082199 pennation_angle_at_optimal=0
      PathPoint PathPoint_thoracic5: thoracic5 (-0.043 -0.016 0)
      ConditionalPathPoint default: scapula_R (-0.105902 -0.0279998 -0.135714)
          socket_coordinate=/jointset/Abdjnt/Abs_FE range=(-1.57 1.57)
      PathPoint PathPoint_scapula_R: scapula_R (-0.0885066 -0.00599971 -0.0766536)
    Thelen2003Muscle trap_inf_T6: max_isometric_force=105.1186 optimal_fiber_length=0.1294967
        tendon_slack_length=0.02321654 pennation_angle_at_optimal=0
      PathPoint PathPoint_thoracic6: thoracic6 (-0.047 -0.015 0)
      ConditionalPathPoint default: scapula_R (-0.106681 -0.0399998 -0.133214)
          socket_coordinate=/jointset/Abdjnt/Abs_FE range=(-1.57 1.57)
      PathPoint PathPoint_scapula_R: scapula_R (-0.0885066 -0.00599971 -0.0766536)
    Thelen2003Muscle trap_inf_T7: max_isometric_force=130.0368 optimal_fiber_length=0.14759
        tendon_slack_length=0.02634447 pennation_angle_at_optimal=0
      PathPoint PathPoint_thoracic7: thoracic7 (-0.047 -0.015 0)
      ConditionalPathPoint default: scapula_R (-0.110013 -0.0519998 -0.127368)
          socket_coordinate=/jointset/Abdjnt/Abs_FE range=(-1.57 1.57)
      PathPoint PathPoint_scapula_R: scapula_R (-0.0885066 -0.00599971 -0.0766536)
    Thelen2003Muscle trap_inf_T8: max_isometric_force=106.2079 optimal_fiber_length=0.1632088
        tendon_slack_length=0.02921639 pennation_angle_at_optimal=0
      PathPoint PathPoint_thoracic8: thoracic8 (-0.043 -0.011 0)
      ConditionalPathPoint default: scapula_R (-0.113826 -0.0699997 -0.12325) socket_coordinate=/jointset/Abdjnt/Abs_FE
          range=(-1.57 1.57)
      PathPoint PathPoint_scapula_R: scapula_R (-0.0885066 -0.00599971 -0.0766536)
    Thelen2003Muscle trap_inf_T9: max_isometric_force=79.76889 optimal_fiber_length=0.1778939
        tendon_slack_length=0.03180618 pennation_angle_at_optimal=0
      PathPoint PathPoint_thoracic9: thoracic9 (-0.046 -0.002 0)
      ConditionalPathPoint default: scapula_R (-0.118963 -0.0869997 -0.121467)
          socket_coordinate=/jointset/Abdjnt/Abs_FE range=(-1.57 1.57)
      PathPoint PathPoint_scapula_R: scapula_R (-0.0885066 -0.00599971 -0.0766536)
    Thelen2003Muscle trap_inf_T10: max_isometric_force=41.23003 optimal_fiber_length=0.2039106
        tendon_slack_length=0.0365168 pennation_angle_at_optimal=0
      PathPoint PathPoint_thoracic10: thoracic10 (-0.047 -0.005 0)
      ConditionalPathPoint default: rib8_R (-0.0490459 -0.00613725 0.0174656) socket_coordinate=/jointset/Abdjnt/Abs_FE
          range=(-1.57 1.57)
      ConditionalPathPoint default_0: scapula_R (-0.118417 -0.0999997 -0.119344)
          socket_coordinate=/jointset/Abdjnt/Abs_FE range=(-1.57 1.57)
      PathPoint PathPoint_scapula_R: scapula_R (-0.0885066 -0.00599971 -0.0766536)
    Thelen2003Muscle trap_inf_T11: max_isometric_force=36.84367 optimal_fiber_length=0.2290656
        tendon_slack_length=0.04095476 pennation_angle_at_optimal=0
      PathPoint PathPoint_thoracic11: thoracic11 (-0.05 -0.002 0)
      ConditionalPathPoint default: rib9_R (-0.0512192 -0.00838534 0.0162056) socket_coordinate=/jointset/Abdjnt/Abs_FE
          range=(-1.57 1.57)
      ConditionalPathPoint default_0: rib8_R (-0.0530739 -0.00727919 0.0287679)
          socket_coordinate=/jointset/Abdjnt/Abs_FE range=(-1.57 1.57)
      ConditionalPathPoint default_1: scapula_R (-0.117963 -0.112 -0.11612) socket_coordinate=/jointset/Abdjnt/Abs_FE
          range=(-1.57 1.57)
      PathPoint PathPoint_scapula_R: scapula_R (-0.0885066 -0.00599971 -0.0766536)
    Thelen2003Muscle trap_inf_T12: max_isometric_force=36.95678 optimal_fiber_length=0.2568967
        tendon_slack_length=0.04592455 pennation_angle_at_optimal=0
      PathPoint PathPoint_thoracic12: thoracic12 (-0.05 0 0)
      ConditionalPathPoint default: rib10_R (-0.0515588 -0.00993911 0.0202933)
          socket_coordinate=/jointset/Abdjnt/Abs_FE range=(-1.57 1.57)
      ConditionalPathPoint default_0: rib9_R (-0.0530331 -0.0126443 0.0280396)
          socket_coordinate=/jointset/Abdjnt/Abs_FE range=(-1.57 1.57)
      ConditionalPathPoint default_1: rib8_R (-0.0531343 -0.0142921 0.0405187)
          socket_coordinate=/jointset/Abdjnt/Abs_FE range=(-1.57 1.57)
      ConditionalPathPoint default_2: scapula_R (-0.117725 -0.12 -0.110244) socket_coordinate=/jointset/Abdjnt/Abs_FE
          range=(-1.57 1.57)
      PathPoint PathPoint_scapula_R: scapula_R (-0.0885066 -0.00599971 -0.0766536)
    Thelen2003Muscle splen_cap_skl_T1: max_isometric_force=70.72857 optimal_fiber_length=0.1359
        tendon_slack_length=0.0401 pennation_angle_at_optimal=0
      PathPoint splen_cap_sklthx-P1: thoracic1 (-0.035 -0.015 0)
      PathPoint splen_cap_sklthx-P2: head_neck (-0.018513 0.12889 0.05423)
    Thelen2003Muscle splen_cap_skl_T2: max_isometric_force=70.72857 optimal_fiber_length=0.1213
        tendon_slack_length=0.0357 pennation_angle_at_optimal=0
      PathPoint PathPoint_thoracic2: thoracic2 (-0.0375 -0.0162 0)
      PathPoint PathPoint_head_neck: head_neck (-0.018513 0.12889 0.05423)
    Thelen2003Muscle splen_cerv_c3_T3: max_isometric_force=35.36429 optimal_fiber_length=0.1015
        tendon_slack_length=0.0555 pennation_angle_at_optimal=0
      PathPoint PathPoint_thoracic3: thoracic3 (-0.0395 -0.018 0)
      PathPoint PathPoint_head_neck: head_neck (0.006167 0.078965 0.02365)
    Thelen2003Muscle splen_cerv_c3_T4: max_isometric_force=35.36429 optimal_fiber_length=0.1183
        tendon_slack_length=0.0647 pennation_angle_at_optimal=0
      PathPoint splen_cerv_c3thx-P1: thoracic4 (-0.042 -0.017 0)
      PathPoint splen_cerv_c3thx-P2: head_neck (0.006167 0.078965 0.02365)
    Thelen2003Muscle splen_cerv_c3_T5: max_isometric_force=35.36429 optimal_fiber_length=0.137
        tendon_slack_length=0.075 pennation_angle_at_optimal=0
      PathPoint PathPoint_thoracic5: thoracic5 (-0.0431 -0.0161 0)
      PathPoint PathPoint_head_neck: head_neck (0.006167 0.078965 0.02365)
    Thelen2003Muscle splen_cerv_c3_T6: max_isometric_force=35.36429 optimal_fiber_length=0.1558
        tendon_slack_length=0.0852 pennation_angle_at_optimal=0
      PathPoint PathPoint_thoracic6: thoracic6 (-0.0474 -0.0159 0)
      PathPoint PathPoint_head_neck: head_neck (0.006167 0.078965 0.02365)
    Thelen2003Muscle semi_cap_sklthx: max_isometric_force=183 optimal_fiber_length=0.068 tendon_slack_length=0.06889
        pennation_angle_at_optimal=0.087266
      PathPoint P1: thoracic1 (-0.036 0.019 0.035)
      PathPoint P2: head_neck (-0.055063 0.13789 0.0111)
    Thelen2003Muscle semi_cerv_c3thx: max_isometric_force=183 optimal_fiber_length=0.068 tendon_slack_length=0.027374
        pennation_angle_at_optimal=0.087266
      PathPoint P1: thoracic2 (-0.031 0.017 0.027)
      PathPoint P2: head_neck (-0.026603 0.065695 0.0024)
    Thelen2003Muscle levator_scap: max_isometric_force=218 optimal_fiber_length=0.113 tendon_slack_length=0.021875
        pennation_angle_at_optimal=0
      PathPoint P1: scapula_R (-0.066 0.005 -0.091)
      PathPoint P2: head_neck (0.001997 0.092455 0.02121)
    Thelen2003Muscle longissi_cerv_c4thx: max_isometric_force=57.28571 optimal_fiber_length=0.13181
        tendon_slack_length=0.042329 pennation_angle_at_optimal=0
      PathPoint P1: thoracic5 (-0.033 0.019 0.028)
      PathPoint P2: thoracic4 (-0.037 0.017 0.029)
      PathPoint P3: thoracic3 (-0.035 0.016 0.029)
      PathPoint P4: thoracic1 (-0.036 0.019 0.035)
      PathPoint P5: head_neck (0.004337 0.065085 0.0261)
    Thelen2003Muscle iliocost_cerv_c5rib: max_isometric_force=57.28571 optimal_fiber_length=0.080895
        tendon_slack_length=0.025706 pennation_angle_at_optimal=0
      PathPoint P1: rib3_R (-0.0289126 0.00186297 0.0396322)
      PathPoint P2: thoracic1 (-0.036 0.019 0.035)
      PathPoint P3: head_neck (-0.001383 0.046925 0.026)
    Thelen2003Muscle supmult-T1-C4: max_isometric_force=317.7823 optimal_fiber_length=0.03174944
        tendon_slack_length=0.01134908 pennation_angle_at_optimal=0
      PathPoint P1: head_neck (-0.0270311 0.0543253 0.00242289)
      PathPoint P2: thoracic1 (-0.0425599 0.0149758 0.0329328)
    Thelen2003Muscle supmult-T1-C5: max_isometric_force=211.8548 optimal_fiber_length=0.02360618
        tendon_slack_length=0.01300051 pennation_angle_at_optimal=0
      PathPoint P1: head_neck (-0.0355211 0.0441753 0.00300289)
      PathPoint P2: thoracic1 (-0.0429701 0.0149758 0.0329328)
    Thelen2003Muscle supmult-T2-C6: max_isometric_force=199.3928 optimal_fiber_length=0.02790068
        tendon_slack_length=0.007223074 pennation_angle_at_optimal=0
      PathPoint P1: head_neck (-0.0412515 0.0275752 0.00284289)
      PathPoint P2: thoracic2 (-0.0380392 0.0130983 0.0249328)
    Thelen2003Muscle deepmult-T1-C5: max_isometric_force=37.38615 optimal_fiber_length=0.03795519
        tendon_slack_length=0.0004302441 pennation_angle_at_optimal=0
      PathPoint P1: head_neck (-0.0278411 0.0444653 0.00371289)
      PathPoint P2: thoracic1 (-0.0429701 0.0149758 0.0329328)
    Thelen2003Muscle deepmult-T1-C6: max_isometric_force=37.38615 optimal_fiber_length=0.02855437
        tendon_slack_length=0.0003236803 pennation_angle_at_optimal=0
      PathPoint P1: head_neck (-0.0317715 0.0272553 0.00372289)
      PathPoint P2: thoracic1 (-0.0429701 0.0149758 0.0329328)
    Thelen2003Muscle deepmult-T2-C7: max_isometric_force=99.6964 optimal_fiber_length=0.02687568
        tendon_slack_length=0.0003046513 pennation_angle_at_optimal=0
      PathPoint P1: head_neck (-0.0350183 0.0122403 0.00372289)
      PathPoint P2: thoracic2 (-0.0380392 0.0130983 0.0249328)
    Thelen2003Muscle deepmult-T2-T1: max_isometric_force=43.61717 optimal_fiber_length=0.02559691
        tendon_slack_length=0.0002901558 pennation_angle_at_optimal=0
      PathPoint P1: thoracic2 (-0.0380392 0.0130983 0.02631)
      PathPoint P2: thoracic1 (-0.03197 0.000976203 -0.000689893)
    Thelen2003Muscle multifidus_L4_T12: max_isometric_force=87.01318 optimal_fiber_length=0.05564457
        tendon_slack_length=0.02888653 pennation_angle_at_optimal=0
      PathPoint PathPoint_lumbar4: lumbar4 (-0.0483037 0.0324114 0.0246001)
      PathPoint PathPoint_thoracic12: thoracic12 (-0.0463208 0.00557357 0.00134084)
    Thelen2003Muscle multifidus_L3_T11: max_isometric_force=126.3573 optimal_fiber_length=0.08165546
        tendon_slack_length=0.005630873 pennation_angle_at_optimal=0
      PathPoint PathPoint_lumbar3: lumbar3 (-0.0448492 0.0339038 0.0220369)
      PathPoint PathPoint_thoracic11: thoracic11 (-0.0531552 0.00530024 -0.000271638)
    Thelen2003Muscle multifidus_T12_T10: max_isometric_force=64.64667 optimal_fiber_length=0.05159872
        tendon_slack_length=0.0005849013 pennation_angle_at_optimal=0
      PathPoint PathPoint_thoracic12: thoracic12 (-0.0337333 0.0224428 0.0210954)
      PathPoint PathPoint_thoracic10: thoracic10 (-0.0519386 0.00451211 0.00251015)
    Thelen2003Muscle multifidus_L2_T10: max_isometric_force=78.41597 optimal_fiber_length=0.07402888
        tendon_slack_length=0.03009035 pennation_angle_at_optimal=0
      PathPoint PathPoint_lumbar2: lumbar2 (-0.0325796 0.023618 0.0305553)
      PathPoint PathPoint_thoracic10: thoracic10 (-0.0519386 0.00451211 0.00251015)
    Thelen2003Muscle multifidus_T11_T9: max_isometric_force=37.62984 optimal_fiber_length=0.04855632
        tendon_slack_length=0.000550414 pennation_angle_at_optimal=0
      PathPoint PathPoint_thoracic11: thoracic11 (-0.0363306 0.0220788 0.0237236)
      PathPoint PathPoint_thoracic9: thoracic9 (-0.0528229 0.00584673 0.00538359)
    Thelen2003Muscle multifidus_L1_T9: max_isometric_force=82.36334 optimal_fiber_length=0.06929035
        tendon_slack_length=0.03401895 pennation_angle_at_optimal=0
      PathPoint PathPoint_lumbar1: lumbar1 (-0.0257234 0.0279106 0.0294115)
      PathPoint PathPoint_thoracic9: thoracic9 (-0.0528229 0.00584673 0.00538359)
    Thelen2003Muscle multifidus_T10_T8: max_isometric_force=47.95222 optimal_fiber_length=0.03545826
        tendon_slack_length=0.0004019399 pennation_angle_at_optimal=0
      PathPoint PathPoint_thoracic10: thoracic10 (-0.0371905 0.0212394 0.0223356)
      PathPoint PathPoint_thoracic8: thoracic8 (-0.0485661 -0.00408251 0.00829069)
    Thelen2003Muscle multifidus_T12_T8: max_isometric_force=160.0581 optimal_fiber_length=0.03418792
        tendon_slack_length=0.06260745 pennation_angle_at_optimal=0
      PathPoint PathPoint_thoracic12: thoracic12 (-0.0337333 0.0224428 0.0210954)
      PathPoint PathPoint_thoracic8: thoracic8 (-0.0485661 -0.00408251 0.00829069)
    Thelen2003Muscle multifidus_T9_T7: max_isometric_force=40.50477 optimal_fiber_length=0.02981881
        tendon_slack_length=0.0003380135 pennation_angle_at_optimal=0
      PathPoint PathPoint_thoracic9: thoracic9 (-0.0462229 0.0292801 0.031427)
      PathPoint PathPoint_thoracic7: thoracic7 (-0.045452 -0.00870475 0.00463624)
    Thelen2003Muscle multifidus_T11_T7: max_isometric_force=104.6425 optimal_fiber_length=0.0391126
        tendon_slack_length=0.04488704 pennation_angle_at_optimal=0
      PathPoint PathPoint_thoracic11: thoracic11 (-0.0363306 0.0220788 0.0237236)
      PathPoint PathPoint_thoracic7: thoracic7 (-0.045452 -0.00870475 0.00463624)
    Thelen2003Muscle multifidus_T8_T6: max_isometric_force=34.78717 optimal_fiber_length=0.0371868
        tendon_slack_length=0.0004215339 pennation_angle_at_optimal=0
      PathPoint PathPoint_thoracic8: thoracic8 (-0.0450205 0.0188647 0.0327196)
      PathPoint PathPoint_thoracic6: thoracic6 (-0.0421722 -0.00911237 0.00496896)
    Thelen2003Muscle multifidus_T10_T6: max_isometric_force=133.7225 optimal_fiber_length=0.03644102
        tendon_slack_length=0.0445867 pennation_angle_at_optimal=0
      PathPoint PathPoint_thoracic10: thoracic10 (-0.0371905 0.0212394 0.0223356)
      PathPoint PathPoint_thoracic6: thoracic6 (-0.0421722 -0.00911237 0.00496896)
    Thelen2003Muscle multifidus_T7_T5: max_isometric_force=32.38774 optimal_fiber_length=0.03775495
        tendon_slack_length=0.0004279742 pennation_angle_at_optimal=0
      PathPoint PathPoint_thoracic7: thoracic7 (-0.0403525 0.0189915 0.0322563)
      PathPoint PathPoint_thoracic5: thoracic5 (-0.0377049 -0.0083314 0.00437179)
    Thelen2003Muscle multifidus_T9_T5: max_isometric_force=155.0865 optimal_fiber_length=0.03647082
        tendon_slack_length=0.03896611 pennation_angle_at_optimal=0
      PathPoint PathPoint_thoracic9: thoracic9 (-0.0462229 0.0292801 0.031427)
      PathPoint PathPoint_thoracic5: thoracic5 (-0.0377049 -0.0083314 0.00437179)
    Thelen2003Muscle multifidus_T6_T4: max_isometric_force=32.42842 optimal_fiber_length=0.03837358
        tendon_slack_length=0.0004349867 pennation_angle_at_optimal=0
      PathPoint PathPoint_thoracic6: thoracic6 (-0.0404846 0.0179854 0.0329007)
      PathPoint PathPoint_thoracic4: thoracic4 (-0.0426195 -0.0125874 0.00176662)
    Thelen2003Muscle multifidus_T8_T4: max_isometric_force=128.012 optimal_fiber_length=0.03913203
        tendon_slack_length=0.04478664 pennation_angle_at_optimal=0
      PathPoint PathPoint_thoracic8: thoracic8 (-0.0450205 0.0188647 0.0327196)
      PathPoint PathPoint_thoracic4: thoracic4 (-0.0426195 -0.0125874 0.00176662)
    Thelen2003Muscle multifidus_T5_T3: max_isometric_force=35.53311 optimal_fiber_length=0.0322806
        tendon_slack_length=0.0003659192 pennation_angle_at_optimal=0
      PathPoint PathPoint_thoracic5: thoracic5 (-0.0376108 0.0176063 0.0303068)
      PathPoint PathPoint_thoracic3: thoracic3 (-0.0411511 -0.0114047 0.00800491)
    Thelen2003Muscle multifidus_T7_T3: max_isometric_force=119.5732 optimal_fiber_length=0.04217513
        tendon_slack_length=0.03723774 pennation_angle_at_optimal=0
      PathPoint PathPoint_thoracic7: thoracic7 (-0.0403525 0.0189915 0.0322563)
      PathPoint PathPoint_thoracic3: thoracic3 (-0.0411511 -0.0114047 0.00800491)
    Thelen2003Muscle multifidus_T4_T2: max_isometric_force=12.46205 optimal_fiber_length=0.03826523
        tendon_slack_length=0.0004337586 pennation_angle_at_optimal=0
      PathPoint PathPoint_thoracic4: thoracic4 (-0.0432773 0.0141847 0.0326198)
      PathPoint PathPoint_thoracic2: thoracic2 (-0.0332611 -0.00894506 0.000941123)
    Thelen2003Muscle multifidus_T6_T2: max_isometric_force=137.6908 optimal_fiber_length=0.03900925
        tendon_slack_length=0.04017082 pennation_angle_at_optimal=0
      PathPoint PathPoint_thoracic6: thoracic6 (-0.0404846 0.0179854 0.0323159)
      PathPoint PathPoint_thoracic2: thoracic2 (-0.0332611 -0.00894506 0.000941123)
    Thelen2003Muscle multifidus_T3_T1: max_isometric_force=87.23435 optimal_fiber_length=0.0314488
        tendon_slack_length=0.0003564903 pennation_angle_at_optimal=0
      PathPoint PathPoint_thoracic3: thoracic3 (-0.0352669 0.0159725 0.0296768)
      PathPoint PathPoint_thoracic1: thoracic1 (-0.038278 -0.0106135 -0.000646721)
    Thelen2003Muscle multifidus_T5_T1: max_isometric_force=93.46537 optimal_fiber_length=0.03969762
        tendon_slack_length=0.03023554 pennation_angle_at_optimal=0
      PathPoint PathPoint_thoracic5: thoracic5 (-0.0376108 0.0176063 0.0308078)
      PathPoint PathPoint_thoracic1: thoracic1 (-0.038278 -0.0106135 -0.000646721)
    Thelen2003Muscle multifidus_T4_C7: max_isometric_force=130.8515 optimal_fiber_length=0.04828907
        tendon_slack_length=0.0181554 pennation_angle_at_optimal=0
      PathPoint PathPoint_thoracic4: thoracic4 (-0.0432773 0.0141847 0.0367964)
      PathPoint PathPoint_Cervical7: head_neck (-0.0350183 0.0122403 0.00372289)
    Thelen2003Muscle stern_mast_L: max_isometric_force=197 optimal_fiber_length=0.108 tendon_slack_length=0.056123
        pennation_angle_at_optimal=0.2618
      PathPoint stern_mast-P1: sternum (0 0 -0.0670986)
      PathPoint stern_mast-P2: head_neck (0.016547 0.12482 -0.0643)
    Thelen2003Muscle cleid_mast_L: max_isometric_force=98.5 optimal_fiber_length=0.108 tendon_slack_length=0.035198
        pennation_angle_at_optimal=0.2618
      PathPoint cleid_mast-P1: clavicle_L (0.00388 0.00542 -0.0352)
      PathPoint cleid_mast-P2: head_neck (0.016547 0.12482 -0.0643)
    Thelen2003Muscle cleid_occ_L: max_isometric_force=98.5 optimal_fiber_length=0.108 tendon_slack_length=0.069467
        pennation_angle_at_optimal=0.2618
      PathPoint cleid_occ-P1: clavicle_L (0.00388 0.00542 -0.0352)
      PathPoint cleid_occ-P2: head_neck (-0.013353 0.14089 -0.0664)
    Thelen2003Muscle scalenus_ant_L: max_isometric_force=147 optimal_fiber_length=0.042 tendon_slack_length=0.053421
        pennation_angle_at_optimal=0.17453
      PathPoint scalenus_ant-P1: rib1_L (0.0486076 -0.0443102 -0.0386395)
      PathPoint scalenus_ant-P2: head_neck (0.018557 0.061415 -0.02323)
    Thelen2003Muscle scalenus_med_L: max_isometric_force=206 optimal_fiber_length=0.05 tendon_slack_length=0.061508
        pennation_angle_at_optimal=0.17453
      PathPoint scalenus_med-P1: rib1_L (0.0135069 -0.0305909 -0.0620104)
      PathPoint scalenus_med-P2: head_neck (0.005017 0.078725 -0.02119)
    Thelen2003Muscle scalenus_post_L: max_isometric_force=157 optimal_fiber_length=0.062 tendon_slack_length=0.072845
        pennation_angle_at_optimal=0.17453
      PathPoint scalenus_post-P1: rib2_L (0.0198629 -0.035494 -0.0922567)
      PathPoint scalenus_post-P2: head_neck (0.004817 0.048055 -0.0257)
    Thelen2003Muscle long_col_c1thx_L: max_isometric_force=27.34286 optimal_fiber_length=0.08913
        tendon_slack_length=0.087519 pennation_angle_at_optimal=0.087266
      PathPoint long_col_c1thx-P1: thoracic3 (0.018446 0.0083677 -0.0037)
      PathPoint long_col_c1thx-P2: head_neck (0.0232 0.0011 -0.004)
      PathPoint long_col_c1thx-P3: head_neck (0.026977 0.018755 -0.00402)
      PathPoint long_col_c1thx-P4: head_neck (0.030297 0.036625 -0.0039)
      PathPoint long_col_c1thx-P5: head_neck (0.033477 0.056825 -0.00379)
      PathPoint long_col_c1thx-P6: head_neck (0.036157 0.074945 -0.00368)
      PathPoint long_col_c1thx-P7: head_neck (0.035077 0.094935 -0.00356)
      PathPoint long_col_c1thx-P8: head_neck (0.036547 0.10779 -0.0031)
    Thelen2003Muscle long_col_c5thx_L: max_isometric_force=27.34286 optimal_fiber_length=0.05758
        tendon_slack_length=0.054794 pennation_angle_at_optimal=0.087266
      PathPoint long_col_c5thx-P1: thoracic3 (0.017777 0.0076185 -0.0068)
      PathPoint long_col_c5thx-P2: thoracic2 (0.016475 0.0027786 -0.01022)
      PathPoint long_col_c5thx-P3: thoracic2 (0.016778 0.016594 -0.01337)
      PathPoint long_col_c5thx-P4: thoracic1 (0.013221 0.0048847 -0.01508)
      PathPoint long_col_c5thx-P5: thoracic1 (0.0080715 0.018343 -0.01778)
      PathPoint long_col_c5thx-P6: head_neck (0.01111 0.00731 -0.01979)
      PathPoint long_col_c5thx-P7: head_neck (0.013447 0.023575 -0.02216)
      PathPoint long_col_c5thx-P8: head_neck (0.014707 0.043235 -0.0238)
    Thelen2003Muscle trap_cl_L: max_isometric_force=100.0788 optimal_fiber_length=0.084 tendon_slack_length=0.11922
        pennation_angle_at_optimal=0.5236
      PathPoint trap_cl-P1: clavicle_L (-0.047788 0.0232002 -0.07587)
      PathPoint trap_cl-P2: head_neck (-0.0735696 0.14393 0.00217311)
    Thelen2003Muscle trap_acr_scap_L: max_isometric_force=121.5358 optimal_fiber_length=0.1234
        tendon_slack_length=0.0456 pennation_angle_at_optimal=0
      PathPoint trap_acr-P1: scapula_L (-0.0372966 1.61533e-7 0.0240135)
      PathPoint trap_acr-P2: head_neck (-0.0477 0.019 0)
    Thelen2003Muscle trap_acr_T1_L: max_isometric_force=121.5358 optimal_fiber_length=0.1339357
        tendon_slack_length=0.04941536 pennation_angle_at_optimal=0
      PathPoint PathPoint_scapula_L: scapula_L (-0.0372965 1.60069e-7 0.0236542)
      ConditionalPathPoint default: scapula_L (-0.0823453 0.0150008 0.128006) socket_coordinate=/jointset/Abdjnt/Abs_FE
          range=(-1.57 1.57)
      PathPoint PathPoint_thoracic1: thoracic1 (-0.035 -0.015 0)
    Thelen2003Muscle trap_acr_T2_L: max_isometric_force=121.5358 optimal_fiber_length=0.141781
        tendon_slack_length=0.05239234 pennation_angle_at_optimal=0
      PathPoint PathPoint_scapula_R: scapula_L (-0.0372965 1.60069e-7 0.0236542)
      ConditionalPathPoint default: scapula_L (-0.0968945 0.0129999 0.138249) socket_coordinate=/jointset/Abdjnt/Abs_FE
          range=(-1.57 1.57)
      PathPoint PathPoint_thoracic2: thoracic2 (-0.036 -0.016 0)
    Thelen2003Muscle trap_acr_T3_L: max_isometric_force=121.5358 optimal_fiber_length=0.1417253
        tendon_slack_length=0.05238874 pennation_angle_at_optimal=0
      PathPoint PathPoint_scapula_L: scapula_L (-0.0372965 1.60069e-7 0.0236542)
      ConditionalPathPoint default: scapula_L (-0.1005 0.00199995 0.143386) socket_coordinate=/jointset/Abdjnt/Abs_FE
          range=(-1.57 1.57)
      PathPoint PathPoint_thoracic3: thoracic3 (-0.04 -0.017 0)
    Thelen2003Muscle trap_inf_T4_L: max_isometric_force=11.94605 optimal_fiber_length=0.1015949
        tendon_slack_length=0.01817145 pennation_angle_at_optimal=0
      PathPoint PathPoint_thoracic4: thoracic4 (-0.042 -0.017 0)
      ConditionalPathPoint default: scapula_L (-0.100583 -0.0190001 0.131472) socket_coordinate=/jointset/Abdjnt/Abs_FE
          range=(-1.57 1.57)
      PathPoint PathPoint_scapula_L: scapula_L (-0.0885066 -0.00599938 0.0766534)
    Thelen2003Muscle trap_inf_T5_L: max_isometric_force=42.76528 optimal_fiber_length=0.1162471
        tendon_slack_length=0.02082195 pennation_angle_at_optimal=0
      PathPoint PathPoint_thoracic5: thoracic5 (-0.043 -0.016 0)
      ConditionalPathPoint default: scapula_L (-0.105902 -0.0280001 0.135714) socket_coordinate=/jointset/Abdjnt/Abs_FE
          range=(-1.57 1.57)
      PathPoint PathPoint_scapula_L: scapula_L (-0.0885066 -0.00599938 0.0766534)
    Thelen2003Muscle trap_inf_T6_L: max_isometric_force=105.1213 optimal_fiber_length=0.1294964
        tendon_slack_length=0.02321648 pennation_angle_at_optimal=0
      PathPoint PathPoint_thoracic6: thoracic6 (-0.047 -0.015 0)
      ConditionalPathPoint default: scapula_L (-0.10668 -0.0400001 0.133214) socket_coordinate=/jointset/Abdjnt/Abs_FE
          range=(-1.57 1.57)
      PathPoint PathPoint_scapula_L: scapula_L (-0.0885066 -0.00599938 0.0766534)
    Thelen2003Muscle trap_inf_T7_L: max_isometric_force=130.038 optimal_fiber_length=0.1475899
        tendon_slack_length=0.02634444 pennation_angle_at_optimal=0
      PathPoint PathPoint_thoracic7: thoracic7 (-0.047 -0.015 0)
      ConditionalPathPoint default: scapula_L (-0.110014 -0.0520001 0.127368) socket_coordinate=/jointset/Abdjnt/Abs_FE
          range=(-1.57 1.57)
      PathPoint PathPoint_scapula_L: scapula_L (-0.0885066 -0.00599938 0.0766534)
    Thelen2003Muscle trap_inf_T8_L: max_isometric_force=106.2082 optimal_fiber_length=0.1632087
        tendon_slack_length=0.02921638 pennation_angle_at_optimal=0
      PathPoint PathPoint_thoracic8: thoracic8 (-0.043 -0.011 0)
      ConditionalPathPoint default: scapula_L (-0.113825 -0.0700001 0.12325) socket_coordinate=/jointset/Abdjnt/Abs_FE
          range=(-1.57 1.57)
      PathPoint PathPoint_scapula_L: scapula_L (-0.0885066 -0.00599938 0.0766534)
    Thelen2003Muscle trap_inf_T9_L: max_isometric_force=79.76861 optimal_fiber_length=0.1778939
        tendon_slack_length=0.03180618 pennation_angle_at_optimal=0
      PathPoint PathPoint_thoracic9: thoracic9 (-0.046 -0.002 0)
      ConditionalPathPoint default: scapula_L (-0.118963 -0.0870001 0.121467) socket_coordinate=/jointset/Abdjnt/Abs_FE
          range=(-1.57 1.57)
      PathPoint PathPoint_scapula_L: scapula_L (-0.0885066 -0.00599938 0.0766534)
    Thelen2003Muscle trap_inf_T10_L: max_isometric_force=41.22994 optimal_fiber_length=0.2039106
        tendon_slack_length=0.0365168 pennation_angle_at_optimal=0
      PathPoint PathPoint_thoracic10: thoracic10 (-0.047 -0.005 0)
      ConditionalPathPoint default: rib8_L (-0.0490459 -0.00613638 -0.0174657)
          socket_coordinate=/jointset/Abdjnt/Abs_FE range=(-1.57 1.57)
      ConditionalPathPoint default_0: scapula_L (-0.118416 -0.1 0.119344) socket_coordinate=/jointset/Abdjnt/Abs_FE
          range=(-1.57 1.57)
      PathPoint PathPoint_scapula_L: scapula_L (-0.0885066 -0.00599938 0.0766534)
    Thelen2003Muscle trap_inf_T11_L: max_isometric_force=36.84338 optimal_fiber_length=0.2290656
        tendon_slack_length=0.04095477 pennation_angle_at_optimal=0
      PathPoint PathPoint_thoracic11: thoracic11 (-0.05 -0.002 0)
      ConditionalPathPoint default: rib9_L (-0.0512192 -0.00838546 -0.0162056)
          socket_coordinate=/jointset/Abdjnt/Abs_FE range=(-1.57 1.57)
      ConditionalPathPoint default_0: rib8_L (-0.0530739 -0.0072794 -0.0287679)
          socket_coordinate=/jointset/Abdjnt/Abs_FE range=(-1.57 1.57)
      ConditionalPathPoint default_1: scapula_L (-0.117962 -0.112 0.11612) socket_coordinate=/jointset/Abdjnt/Abs_FE
          range=(-1.57 1.57)
      PathPoint PathPoint_scapula_L: scapula_L (-0.0885066 -0.00599938 0.0766534)
    Thelen2003Muscle trap_inf_T12_L: max_isometric_force=36.9564 optimal_fiber_length=0.2568967
        tendon_slack_length=0.04592454 pennation_angle_at_optimal=0
      PathPoint PathPoint_thoracic12: thoracic12 (-0.05 0 0)
      ConditionalPathPoint default: rib10_L (-0.0515588 -0.00993926 -0.0202934)
          socket_coordinate=/jointset/Abdjnt/Abs_FE range=(-1.57 1.57)
      ConditionalPathPoint default_0: rib9_L (-0.0530331 -0.0126445 -0.0280398)
          socket_coordinate=/jointset/Abdjnt/Abs_FE range=(-1.57 1.57)
      ConditionalPathPoint default_1: rib8_L (-0.0531343 -0.0142924 -0.0405187)
          socket_coordinate=/jointset/Abdjnt/Abs_FE range=(-1.57 1.57)
      ConditionalPathPoint default_2: scapula_L (-0.117725 -0.12 0.110244) socket_coordinate=/jointset/Abdjnt/Abs_FE
          range=(-1.57 1.57)
      PathPoint PathPoint_scapula_L: scapula_L (-0.0885066 -0.00599938 0.0766534)
    Thelen2003Muscle splen_cap_skl_T1_L: max_isometric_force=70.72857 optimal_fiber_length=0.1359
        tendon_slack_length=0.0401 pennation_angle_at_optimal=0
      PathPoint splen_cap_sklthx-P1: thoracic1 (-0.035 -0.015 0)
      PathPoint splen_cap_sklthx-P2: head_neck (-0.018513 0.12889 -0.05423)
    Thelen2003Muscle splen_cap_skl_T2_L: max_isometric_force=70.72857 optimal_fiber_length=0.1213
        tendon_slack_length=0.0357 pennation_angle_at_optimal=0
      PathPoint PathPoint_thoracic2: thoracic2 (-0.0375 -0.0162 0)
      PathPoint PathPoint_head_neck: head_neck (-0.018513 0.12889 -0.05423)
    Thelen2003Muscle splen_cerv_c3_T3_L: max_isometric_force=35.36429 optimal_fiber_length=0.1015
        tendon_slack_length=0.0555 pennation_angle_at_optimal=0
      PathPoint PathPoint_thoracic3: thoracic3 (-0.0395 -0.018 0)
      PathPoint PathPoint_head_neck: head_neck (0.006167 0.078965 -0.02365)
    Thelen2003Muscle splen_cerv_c3_T4_L: max_isometric_force=35.36429 optimal_fiber_length=0.1183
        tendon_slack_length=0.0647 pennation_angle_at_optimal=0
      PathPoint splen_cerv_c3thx-P1: thoracic4 (-0.042 -0.017 0)
      PathPoint splen_cerv_c3thx-P2: head_neck (0.006167 0.078965 -0.02365)
    Thelen2003Muscle splen_cerv_c3_T5_L: max_isometric_force=35.36429 optimal_fiber_length=0.137
        tendon_slack_length=0.075 pennation_angle_at_optimal=0
      PathPoint PathPoint_thoracic5: thoracic5 (-0.0431 -0.0161 0)
      PathPoint PathPoint_head_neck: head_neck (0.006167 0.078965 -0.02365)
    Thelen2003Muscle splen_cerv_c3_T6_L: max_isometric_force=35.36429 optimal_fiber_length=0.1558
        tendon_slack_length=0.0852 pennation_angle_at_optimal=0
      PathPoint PathPoint_thoracic6: thoracic6 (-0.0474 -0.0159 0)
      PathPoint PathPoint_head_neck: head_neck (0.006167 0.078965 -0.02365)
    Thelen2003Muscle semi_cap_sklthx_L: max_isometric_force=183 optimal_fiber_length=0.068 tendon_slack_length=0.06889
        pennation_angle_at_optimal=0.087266
      PathPoint semi_cap_sklthx-P1: thoracic1 (-0.036 0.019 -0.035)
      PathPoint semi_cap_sklthx-P2: head_neck (-0.055063 0.13789 -0.0111)
    Thelen2003Muscle semi_cerv_c3thx_L: max_isometric_force=183 optimal_fiber_length=0.068 tendon_slack_length=0.027374
        pennation_angle_at_optimal=0.087266
      PathPoint semi_cerv_c3thx-P1: thoracic2 (-0.031 0.017 -0.027)
      PathPoint semi_cerv_c3thx-P2: head_neck (-0.026603 0.065695 -0.0024)
    Thelen2003Muscle levator_scap_L: max_isometric_force=218 optimal_fiber_length=0.113 tendon_slack_length=0.021875
        pennation_angle_at_optimal=0
      PathPoint levator_scap-P1: scapula_L (-0.066 0.005 0.091)
      PathPoint levator_scap-P2: head_neck (0.001997 0.092455 -0.02121)
    Thelen2003Muscle longissi_cerv_c4thx_L: max_isometric_force=57.28571 optimal_fiber_length=0.13181
        tendon_slack_length=0.042329 pennation_angle_at_optimal=0
      PathPoint longissi_cerv_c4thx-P1: thoracic5 (-0.033 0.019 -0.028)
      PathPoint longissi_cerv_c4thx-P2: thoracic4 (-0.037 0.017 -0.029)
      PathPoint longissi_cerv_c4thx-P3: thoracic3 (-0.035 0.016 -0.029)
      PathPoint longissi_cerv_c4thx-P4: thoracic1 (-0.036 0.019 -0.035)
      PathPoint longissi_cerv_c4thx-P5: head_neck (0.004337 0.065085 -0.0261)
    Thelen2003Muscle iliocost_cerv_c5rib_L: max_isometric_force=57.28571 optimal_fiber_length=0.080895
        tendon_slack_length=0.025706 pennation_angle_at_optimal=0
      PathPoint iliocost_cerv_c5rib-P1: rib3_L (-0.0289126 0.00186297 -0.0396322)
      PathPoint iliocost_cerv_c5rib-P2: thoracic1 (-0.036 0.019 -0.035)
      PathPoint iliocost_cerv_c5rib-P3: head_neck (-0.001383 0.046925 -0.026)
    Thelen2003Muscle supmult-T1-C4_L: max_isometric_force=317.7823 optimal_fiber_length=0.03174944
        tendon_slack_length=0.01134908 pennation_angle_at_optimal=0
      PathPoint supmult-T1-C4-P1: head_neck (-0.0270311 0.0543253 -0.00242289)
      PathPoint supmult-T1-C4-P2: thoracic1 (-0.0425599 0.0149758 -0.0329328)
    Thelen2003Muscle supmult-T1-C5_L: max_isometric_force=211.8548 optimal_fiber_length=0.02360618
        tendon_slack_length=0.01300051 pennation_angle_at_optimal=0
      PathPoint supmult-T1-C5-P1: head_neck (-0.0355211 0.0441753 -0.00300289)
      PathPoint supmult-T1-C5-P2: thoracic1 (-0.0429701 0.0149758 -0.0329328)
    Thelen2003Muscle supmult-T2-C6_L: max_isometric_force=199.3928 optimal_fiber_length=0.02790068
        tendon_slack_length=0.007223074 pennation_angle_at_optimal=0
      PathPoint supmult-T2-C6-P1: head_neck (-0.0412515 0.0275752 -0.00284289)
      PathPoint supmult-T2-C6-P2: thoracic2 (-0.0380392 0.0130983 -0.0249328)
    Thelen2003Muscle deepmult-T1-C5_L: max_isometric_force=37.38615 optimal_fiber_length=0.03795519
        tendon_slack_length=0.0004302441 pennation_angle_at_optimal=0
      PathPoint deepmult-T1-C5-P1: head_neck (-0.0278411 0.0444653 -0.00371289)
      PathPoint deepmult-T1-C5-P2: thoracic1 (-0.0429701 0.0149758 -0.0329328)
    Thelen2003Muscle deepmult-T1-C6_L: max_isometric_force=37.38615 optimal_fiber_length=0.02855437
        tendon_slack_length=0.0003236803 pennation_angle_at_optimal=0
      PathPoint deepmult-T1-C6-P1: head_neck (-0.0317715 0.0272553 -0.00372289)
      PathPoint deepmult-T1-C6-P2: thoracic1 (-0.0429701 0.0149758 -0.0329328)
    Thelen2003Muscle deepmult-T2-C7_L: max_isometric_force=99.6964 optimal_fiber_length=0.02687568
        tendon_slack_length=0.0003046513 pennation_angle_at_optimal=0
      PathPoint deepmult-T2-C7-P1: head_neck (-0.0350183 0.0122403 -0.00372289)
      PathPoint deepmult-T2-C7-P2: thoracic2 (-0.0380392 0.0130983 -0.0249328)
    Thelen2003Muscle deepmult-T2-T1_L: max_isometric_force=43.61717 optimal_fiber_length=0.02559691
        tendon_slack_length=0.0002901558 pennation_angle_at_optimal=0
      PathPoint deepmult-T2-T1-P1: thoracic2 (-0.0380392 0.0130983 -0.0249328)
      PathPoint deepmult-T2-T1-P2: thoracic1 (-0.03197 0.000976203 0.00206711)
    Thelen2003Muscle multifidus_L4_T12_L: max_isometric_force=87.01318 optimal_fiber_length=0.05564405
        tendon_slack_length=0.02888626 pennation_angle_at_optimal=0
      PathPoint PathPoint_lumbar4: lumbar4 (-0.0483037 0.0324114 -0.0245961)
      PathPoint PathPoint_thoracic12: thoracic12 (-0.0463208 0.00557357 -0.00134084)
    Thelen2003Muscle multifidus_L3_T11_L: max_isometric_force=126.3573 optimal_fiber_length=0.08165546
        tendon_slack_length=0.005630873 pennation_angle_at_optimal=0
      PathPoint PathPoint_lumbar3: lumbar3 (-0.0448492 0.0339038 -0.0220369)
      PathPoint PathPoint_thoracic11: thoracic11 (-0.0531552 0.00530024 0.000271638)
    Thelen2003Muscle multifidus_T12_T10_L: max_isometric_force=64.64667 optimal_fiber_length=0.05159872
        tendon_slack_length=0.0005849013 pennation_angle_at_optimal=0
      PathPoint PathPoint_thoracic12: thoracic12 (-0.0337333 0.0224428 -0.0210954)
      PathPoint PathPoint_thoracic10: thoracic10 (-0.0519386 0.00451211 -0.00251015)
    Thelen2003Muscle multifidus_L2_T10_L: max_isometric_force=78.41597 optimal_fiber_length=0.07402888
        tendon_slack_length=0.03009035 pennation_angle_at_optimal=0
      PathPoint PathPoint_lumbar2: lumbar2 (-0.0325796 0.023618 -0.0305553)
      PathPoint PathPoint_thoracic10: thoracic10 (-0.0519386 0.00451211 -0.00251015)
    Thelen2003Muscle multifidus_T11_T9_L: max_isometric_force=37.62984 optimal_fiber_length=0.04855632
        tendon_slack_length=0.000550414 pennation_angle_at_optimal=0
      PathPoint PathPoint_thoracic11: thoracic11 (-0.0363306 0.0220788 -0.0237236)
      PathPoint PathPoint_thoracic9: thoracic9 (-0.0528229 0.00584673 -0.00538359)
    Thelen2003Muscle multifidus_L1_T9_L: max_isometric_force=82.36334 optimal_fiber_length=0.06929035
        tendon_slack_length=0.03401895 pennation_angle_at_optimal=0
      PathPoint PathPoint_lumbar1: lumbar1 (-0.0257234 0.0279106 -0.0294115)
      PathPoint PathPoint_thoracic9: thoracic9 (-0.0528229 0.00584673 -0.00538359)
    Thelen2003Muscle multifidus_T10_T8_L: max_isometric_force=47.95222 optimal_fiber_length=0.03545826
        tendon_slack_length=0.0004019399 pennation_angle_at_optimal=0
      PathPoint PathPoint_thoracic10: thoracic10 (-0.0371905 0.0212394 -0.0223356)
      PathPoint PathPoint_thoracic8: thoracic8 (-0.0485661 -0.00408251 -0.00829069)
    Thelen2003Muscle multifidus_T12_T8_L: max_isometric_force=160.0581 optimal_fiber_length=0.03418792
        tendon_slack_length=0.06260745 pennation_angle_at_optimal=0
      PathPoint PathPoint_thoracic12: thoracic12 (-0.0337333 0.0224428 -0.0210954)
      PathPoint PathPoint_thoracic8: thoracic8 (-0.0485661 -0.00408251 -0.00829069)
    Thelen2003Muscle multifidus_T9_T7_L: max_isometric_force=40.50477 optimal_fiber_length=0.02981881
        tendon_slack_length=0.0003380135 pennation_angle_at_optimal=0
      PathPoint PathPoint_thoracic9: thoracic9 (-0.0462229 0.0292801 -0.031427)
      PathPoint PathPoint_thoracic7: thoracic7 (-0.045452 -0.00870475 -0.00463624)
    Thelen2003Muscle multifidus_T11_T7_L: max_isometric_force=104.6425 optimal_fiber_length=0.0391126
        tendon_slack_length=0.04488704 pennation_angle_at_optimal=0
      PathPoint PathPoint_thoracic11: thoracic11 (-0.0363306 0.0220788 -0.0237236)
      PathPoint PathPoint_thoracic7: thoracic7 (-0.045452 -0.00870475 -0.00463624)
    Thelen2003Muscle multifidus_T8_T6_L: max_isometric_force=34.78717 optimal_fiber_length=0.0371868
        tendon_slack_length=0.0004215339 pennation_angle_at_optimal=0
      PathPoint PathPoint_thoracic8: thoracic8 (-0.0450205 0.0188647 -0.0327196)
      PathPoint PathPoint_thoracic6: thoracic6 (-0.0421722 -0.00911237 -0.00496896)
    Thelen2003Muscle multifidus_T10_T6_L: max_isometric_force=133.7225 optimal_fiber_length=0.03644102
        tendon_slack_length=0.0445867 pennation_angle_at_optimal=0
      PathPoint PathPoint_thoracic10: thoracic10 (-0.0371905 0.0212394 -0.0223356)
      PathPoint PathPoint_thoracic6: thoracic6 (-0.0421722 -0.00911237 -0.00496896)
    Thelen2003Muscle multifidus_T7_T5_L: max_isometric_force=32.38774 optimal_fiber_length=0.03775495
        tendon_slack_length=0.0004279742 pennation_angle_at_optimal=0
      PathPoint PathPoint_thoracic7: thoracic7 (-0.0403525 0.0189915 -0.0322563)
      PathPoint PathPoint_thoracic5: thoracic5 (-0.0377049 -0.0083314 -0.00437179)
    Thelen2003Muscle multifidus_T9_T5_L: max_isometric_force=155.0865 optimal_fiber_length=0.03647082
        tendon_slack_length=0.03896611 pennation_angle_at_optimal=0
      PathPoint PathPoint_thoracic9: thoracic9 (-0.0462229 0.0292801 -0.031427)
      PathPoint PathPoint_thoracic5: thoracic5 (-0.0377049 -0.0083314 -0.00437179)
    Thelen2003Muscle multifidus_T6_T4_L: max_isometric_force=32.42842 optimal_fiber_length=0.03837358
        tendon_slack_length=0.0004349867 pennation_angle_at_optimal=0
      PathPoint PathPoint_thoracic6: thoracic6 (-0.0404846 0.0179854 -0.0329007)
      PathPoint PathPoint_thoracic4: thoracic4 (-0.0426195 -0.0125874 -0.00176662)
    Thelen2003Muscle multifidus_T8_T4_L: max_isometric_force=128.012 optimal_fiber_length=0.03913203
        tendon_slack_length=0.04478664 pennation_angle_at_optimal=0
      PathPoint PathPoint_thoracic8: thoracic8 (-0.0450205 0.0188647 -0.0327196)
      PathPoint PathPoint_thoracic4: thoracic4 (-0.0426195 -0.0125874 -0.00176662)
    Thelen2003Muscle multifidus_T5_T3_L: max_isometric_force=35.53311 optimal_fiber_length=0.0322806
        tendon_slack_length=0.0003659192 pennation_angle_at_optimal=0
      PathPoint PathPoint_thoracic5: thoracic5 (-0.0376108 0.0176063 -0.0303068)
      PathPoint PathPoint_thoracic3: thoracic3 (-0.0411511 -0.0114047 -0.00800491)
    Thelen2003Muscle multifidus_T7_T3_L: max_isometric_force=119.5732 optimal_fiber_length=0.04217513
        tendon_slack_length=0.03723774 pennation_angle_at_optimal=0
      PathPoint PathPoint_thoracic7: thoracic7 (-0.0403525 0.0189915 -0.0322563)
      PathPoint PathPoint_thoracic3: thoracic3 (-0.0411511 -0.0114047 -0.00800491)
    Thelen2003Muscle multifidus_T4_T2_L: max_isometric_force=12.46205 optimal_fiber_length=0.04352397
        tendon_slack_length=0.0004933694 pennation_angle_at_optimal=0
      PathPoint PathPoint_thoracic4: thoracic4 (-0.0432773 0.0141847 -0.0367964)
      PathPoint PathPoint_thoracic2: thoracic2 (-0.0332611 -0.00894506 0.00265228)
    Thelen2003Muscle multifidus_T6_T2_L: max_isometric_force=137.6908 optimal_fiber_length=0.03968308
        tendon_slack_length=0.04086472 pennation_angle_at_optimal=0
      PathPoint PathPoint_thoracic6: thoracic6 (-0.0404846 0.0179854 -0.0329007)
      PathPoint PathPoint_thoracic2: thoracic2 (-0.0332611 -0.00894506 0.00265228)
    Thelen2003Muscle multifidus_T3_T1_L: max_isometric_force=87.23435 optimal_fiber_length=0.02975126
        tendon_slack_length=0.0003372477 pennation_angle_at_optimal=0
      PathPoint PathPoint_thoracic3: thoracic3 (-0.0352669 0.0159725 -0.0259428)
      PathPoint PathPoint_thoracic1: thoracic1 (-0.038278 -0.0106135 0.00209331)
    Thelen2003Muscle multifidus_T5_T1_L: max_isometric_force=93.46537 optimal_fiber_length=0.03988204
        tendon_slack_length=0.030376 pennation_angle_at_optimal=0
      PathPoint PathPoint_thoracic5: thoracic5 (-0.0376108 0.0176063 -0.0303068)
      PathPoint PathPoint_thoracic1: thoracic1 (-0.038278 -0.0106135 0.00209331)
    Thelen2003Muscle multifidus_T4_C7_L: max_isometric_force=130.8515 optimal_fiber_length=0.04828907
        tendon_slack_length=0.0181554 pennation_angle_at_optimal=0
      PathPoint PathPoint_thoracic4: thoracic4 (-0.0432773 0.0141847 -0.0367964)
      PathPoint PathPoint_cervical7: head_neck (-0.0350183 0.0122403 -0.00372289)
    Thelen2003Muscle SerrAnt1_1_R: max_isometric_force=96.29378 optimal_fiber_length=0.1135 tendon_slack_length=0.00277
        pennation_angle_at_optimal=0
      PathPoint PathPoint_rib1_R: rib1_R (0.0321008 -0.0397453 0.0541799)
      ConditionalPathPoint ConditionalPathPoint_rib1_R_1: rib1_R (0.0214077 -0.0332194 0.0579584)
          socket_coordinate=/jointset/L5_S1_IVDjnt/L5_S1_FE range=(-99999.9 99999.9)
      ConditionalPathPoint ConditionalPathPoint_rib1_R_2: rib1_R (0.0064078 -0.0272196 0.0635251)
          socket_coordinate=/jointset/L5_S1_IVDjnt/L5_S1_FE range=(-99999.9 99999.9)
      ConditionalPathPoint ConditionalPathPoint_rib1_R_3: rib1_R (-0.0115923 -0.0242197 0.0667108)
          socket_coordinate=/jointset/L5_S1_IVDjnt/L5_S1_FE range=(-99999.9 99999.9)
      ConditionalPathPoint ConditionalPathPoint_rib1_R_4: rib1_R (-0.0285919 -0.0252199 0.0625753)
          socket_coordinate=/jointset/L5_S1_IVDjnt/L5_S1_FE range=(-99999.9 99999.9)
      PathPoint PathPoint_scapula_R: scapula_R (-0.055 0.01 -0.085)
    Thelen2003Muscle SerrAnt2_1_R: max_isometric_force=127.7644 optimal_fiber_length=0.1135 tendon_slack_length=0.00277
        pennation_angle_at_optimal=0
      PathPoint PathPoint_rib2_R: rib2_R (0.0627096 -0.0568981 0.0723727)
      ConditionalPathPoint ConditionalPathPoint_rib2_R_1: rib2_R (0.0479397 -0.0471458 0.0802024)
          socket_coordinate=/jointset/L5_S1_IVDjnt/L5_S1_FE range=(-99999.9 99999.9)
      ConditionalPathPoint ConditionalPathPoint_rib2_R_2: rib2_R (0.0259417 -0.0351476 0.0882784)
          socket_coordinate=/jointset/L5_S1_IVDjnt/L5_S1_FE range=(-99999.9 99999.9)
      ConditionalPathPoint ConditionalPathPoint_rib2_R_3: rib2_R (-0.0270576 -0.0351481 0.0896288)
          socket_coordinate=/jointset/L5_S1_IVDjnt/L5_S1_FE range=(-99999.9 99999.9)
      ConditionalPathPoint ConditionalPathPoint_rib2_R_4: rib2_R (-0.0530577 -0.0411472 0.0700055)
          socket_coordinate=/jointset/L5_S1_IVDjnt/L5_S1_FE range=(-99999.9 99999.9)
      PathPoint PathPoint_scapula_R: scapula_R (-0.088 -0.032 -0.096)
    Thelen2003Muscle SerrAnt2_2_R: max_isometric_force=117.5866 optimal_fiber_length=0.1135 tendon_slack_length=0.00277
        pennation_angle_at_optimal=0
      PathPoint PathPoint_rib2_R: rib2_R (0.0415288 -0.0471332 0.0865049)
      ConditionalPathPoint ConditionalPathPoint_rib2_R_1: rib2_R (0.0299424 -0.0361475 0.0863216)
          socket_coordinate=/jointset/L5_S1_IVDjnt/L5_S1_FE range=(-99999.9 99999.9)
      ConditionalPathPoint ConditionalPathPoint_rib2_R_2: rib2_R (0.0159419 -0.0261471 0.0856348)
          socket_coordinate=/jointset/L5_S1_IVDjnt/L5_S1_FE range=(-99999.9 99999.9)
      ConditionalPathPoint ConditionalPathPoint_rib2_R_3: rib2_R (-0.00305793 -0.0181479 0.0832112)
          socket_coordinate=/jointset/L5_S1_IVDjnt/L5_S1_FE range=(-99999.9 99999.9)
      ConditionalPathPoint ConditionalPathPoint_rib2_R_4: rib2_R (-0.0180577 -0.0131479 0.0750721)
          socket_coordinate=/jointset/L5_S1_IVDjnt/L5_S1_FE range=(-99999.9 99999.9)
      PathPoint PathPoint_scapula_R: scapula_R (-0.055 0.01 -0.085)
    Thelen2003Muscle SerrAnt3_1_R: max_isometric_force=240.7039 optimal_fiber_length=0.1791 tendon_slack_length=0.0075
        pennation_angle_at_optimal=0
      PathPoint PathPoint_rib3_R: rib3_R (0.083857 -0.0742244 0.0910903)
      ConditionalPathPoint ConditionalPathPoint_rib3_R_1: rib3_R (0.0760815 -0.0698791 0.0966527)
          socket_coordinate=/jointset/L5_S1_IVDjnt/L5_S1_FE range=(-99999.9 99999.9)
      ConditionalPathPoint ConditionalPathPoint_rib3_R_2: rib3_R (0.0640802 -0.0638788 0.103963)
          socket_coordinate=/jointset/L5_S1_IVDjnt/L5_S1_FE range=(-99999.9 99999.9)
      ConditionalPathPoint ConditionalPathPoint_rib3_R_3: rib3_R (0.0450792 -0.0618789 0.11552)
          socket_coordinate=/jointset/L5_S1_IVDjnt/L5_S1_FE range=(-99999.9 99999.9)
      ConditionalPathPoint ConditionalPathPoint_rib3_R_4: rib3_R (-0.00691661 -0.06888 0.117676)
          socket_coordinate=/jointset/L5_S1_IVDjnt/L5_S1_FE range=(-99999.9 99999.9)
      ConditionalPathPoint ConditionalPathPoint_rib3_R_5: rib3_R (-0.033919 -0.0748791 0.104447)
          socket_coordinate=/jointset/L5_S1_IVDjnt/L5_S1_FE range=(-99999.9 99999.9)
      ConditionalPathPoint ConditionalPathPoint_rib3_R_6: rib3_R (-0.0529184 -0.0798794 0.0884957)
          socket_coordinate=/jointset/L5_S1_IVDjnt/L5_S1_FE range=(-99999.9 99999.9)
      ConditionalPathPoint ConditionalPathPoint_rib3_R_7: rib3_R (-0.0639187 -0.0828776 0.0735343)
          socket_coordinate=/jointset/L5_S1_IVDjnt/L5_S1_FE range=(-99999.9 99999.9)
      PathPoint PathPoint_scapula_R: scapula_R (-0.1 -0.09 -0.096)
    Thelen2003Muscle SerrAnt4_1_R: max_isometric_force=214.8566 optimal_fiber_length=0.1791 tendon_slack_length=0.0075
        pennation_angle_at_optimal=0
      PathPoint PathPoint_rib4_R: rib4_R (0.100646 -0.0896388 0.103201)
      ConditionalPathPoint ConditionalPathPoint_rib4_R_1: rib4_R (0.0914997 -0.0862627 0.11036)
          socket_coordinate=/jointset/L5_S1_IVDjnt/L5_S1_FE range=(-99999.9 99999.9)
      ConditionalPathPoint ConditionalPathPoint_rib4_R_2: rib4_R (0.0785002 -0.0852632 0.119668)
          socket_coordinate=/jointset/L5_S1_IVDjnt/L5_S1_FE range=(-99999.9 99999.9)
      ConditionalPathPoint ConditionalPathPoint_rib4_R_3: rib4_R (0.0515002 -0.0852628 0.130795)
          socket_coordinate=/jointset/L5_S1_IVDjnt/L5_S1_FE range=(-99999.9 99999.9)
      ConditionalPathPoint ConditionalPathPoint_rib4_R_4: rib4_R (0.0124961 -0.0902616 0.127604)
          socket_coordinate=/jointset/L5_S1_IVDjnt/L5_S1_FE range=(-99999.9 99999.9)
      ConditionalPathPoint ConditionalPathPoint_rib4_R_5: rib4_R (-0.0115031 -0.0942616 0.116709)
          socket_coordinate=/jointset/L5_S1_IVDjnt/L5_S1_FE range=(-99999.9 99999.9)
      ConditionalPathPoint ConditionalPathPoint_rib4_R_6: rib4_R (-0.0285007 -0.0962629 0.104961)
          socket_coordinate=/jointset/L5_S1_IVDjnt/L5_S1_FE range=(-99999.9 99999.9)
      ConditionalPathPoint ConditionalPathPoint_rib4_R_7: rib4_R (-0.0425013 -0.0982639 0.0924245)
          socket_coordinate=/jointset/L5_S1_IVDjnt/L5_S1_FE range=(-99999.9 99999.9)
      PathPoint PathPoint_scapula_R: scapula_R (-0.102 -0.12 -0.078)
    Thelen2003Muscle SerrAnt5_1_R: max_isometric_force=75.24664 optimal_fiber_length=0.1791 tendon_slack_length=0.0075
        pennation_angle_at_optimal=0
      PathPoint PathPoint_rib5_R: rib5_R (0.114086 -0.102913 0.111994)
      ConditionalPathPoint ConditionalPathPoint_rib5_R_1: rib5_R (0.103571 -0.097449 0.119056)
          socket_coordinate=/jointset/L5_S1_IVDjnt/L5_S1_FE range=(-99999.9 99999.9)
      ConditionalPathPoint ConditionalPathPoint_rib5_R_2: rib5_R (0.0855704 -0.0934495 0.128348)
          socket_coordinate=/jointset/L5_S1_IVDjnt/L5_S1_FE range=(-99999.9 99999.9)
      ConditionalPathPoint ConditionalPathPoint_rib5_R_3: rib5_R (0.0545683 -0.0904489 0.134261)
          socket_coordinate=/jointset/L5_S1_IVDjnt/L5_S1_FE range=(-99999.9 99999.9)
      ConditionalPathPoint ConditionalPathPoint_rib5_R_4: rib5_R (0.0215705 -0.0894487 0.127257)
          socket_coordinate=/jointset/L5_S1_IVDjnt/L5_S1_FE range=(-99999.9 99999.9)
      ConditionalPathPoint ConditionalPathPoint_rib5_R_5: rib5_R (-0.00143056 -0.0864486 0.115379)
          socket_coordinate=/jointset/L5_S1_IVDjnt/L5_S1_FE range=(-99999.9 99999.9)
      ConditionalPathPoint ConditionalPathPoint_rib5_R_6: rib5_R (-0.0194312 -0.0834487 0.10253)
          socket_coordinate=/jointset/L5_S1_IVDjnt/L5_S1_FE range=(-99999.9 99999.9)
      ConditionalPathPoint ConditionalPathPoint_rib5_R_7: rib5_R (-0.0344309 -0.0794482 0.0879411)
          socket_coordinate=/jointset/L5_S1_IVDjnt/L5_S1_FE range=(-99999.9 99999.9)
      PathPoint PathPoint_scapula_R: scapula_R (-0.102 -0.12 -0.078)
    Thelen2003Muscle SerrAnt6_1_R: max_isometric_force=195.5573 optimal_fiber_length=0.1791 tendon_slack_length=0.0075
        pennation_angle_at_optimal=0
      PathPoint PathPoint_rib6_R: rib6_R (0.118397 -0.114109 0.119618)
      ConditionalPathPoint ConditionalPathPoint_rib6_R_1: rib6_R (0.106949 -0.105563 0.126325)
          socket_coordinate=/jointset/L5_S1_IVDjnt/L5_S1_FE range=(-99999.9 99999.9)
      ConditionalPathPoint ConditionalPathPoint_rib6_R_2: rib6_R (0.0899459 -0.096563 0.133263)
          socket_coordinate=/jointset/L5_S1_IVDjnt/L5_S1_FE range=(-99999.9 99999.9)
      ConditionalPathPoint ConditionalPathPoint_rib6_R_3: rib6_R (0.0589477 -0.0895628 0.136354)
          socket_coordinate=/jointset/L5_S1_IVDjnt/L5_S1_FE range=(-99999.9 99999.9)
      ConditionalPathPoint ConditionalPathPoint_rib6_R_4: rib6_R (0.0319471 -0.0825629 0.129023)
          socket_coordinate=/jointset/L5_S1_IVDjnt/L5_S1_FE range=(-99999.9 99999.9)
      ConditionalPathPoint ConditionalPathPoint_rib6_R_5: rib6_R (0.00994497 -0.0755629 0.118152)
          socket_coordinate=/jointset/L5_S1_IVDjnt/L5_S1_FE range=(-99999.9 99999.9)
      ConditionalPathPoint ConditionalPathPoint_rib6_R_6: rib6_R (-0.00805265 -0.0675631 0.105959)
          socket_coordinate=/jointset/L5_S1_IVDjnt/L5_S1_FE range=(-99999.9 99999.9)
      ConditionalPathPoint ConditionalPathPoint_rib6_R_7: rib6_R (-0.0230526 -0.060563 0.0925106)
          socket_coordinate=/jointset/L5_S1_IVDjnt/L5_S1_FE range=(-99999.9 99999.9)
      PathPoint PathPoint_scapula_R: scapula_R (-0.102 -0.12 -0.078)
    Thelen2003Muscle SerrAnt7_1_R: max_isometric_force=154.2267 optimal_fiber_length=0.2315 tendon_slack_length=0.0001
        pennation_angle_at_optimal=0
      PathPoint PathPoint_rib7_R: rib7_R (0.119304 -0.122892 0.12838)
      ConditionalPathPoint ConditionalPathPoint_rib7_R_1: rib7_R (0.108734 -0.110444 0.133636)
          socket_coordinate=/jointset/L5_S1_IVDjnt/L5_S1_FE range=(-99999.9 99999.9)
      ConditionalPathPoint ConditionalPathPoint_rib7_R_2: rib7_R (0.0897332 -0.0974468 0.138939)
          socket_coordinate=/jointset/L5_S1_IVDjnt/L5_S1_FE range=(-99999.9 99999.9)
      ConditionalPathPoint ConditionalPathPoint_rib7_R_3: rib7_R (0.0627332 -0.0854462 0.138325)
          socket_coordinate=/jointset/L5_S1_IVDjnt/L5_S1_FE range=(-99999.9 99999.9)
      ConditionalPathPoint ConditionalPathPoint_rib7_R_4: rib7_R (0.0387329 -0.0744462 0.131036)
          socket_coordinate=/jointset/L5_S1_IVDjnt/L5_S1_FE range=(-99999.9 99999.9)
      ConditionalPathPoint ConditionalPathPoint_rib7_R_5: rib7_R (0.0177305 -0.0634464 0.120524)
          socket_coordinate=/jointset/L5_S1_IVDjnt/L5_S1_FE range=(-99999.9 99999.9)
      ConditionalPathPoint ConditionalPathPoint_rib7_R_6: rib7_R (0.000731495 -0.0524468 0.109103)
          socket_coordinate=/jointset/L5_S1_IVDjnt/L5_S1_FE range=(-99999.9 99999.9)
      ConditionalPathPoint ConditionalPathPoint_rib7_R_7: rib7_R (-0.0152686 -0.0414469 0.0953288)
          socket_coordinate=/jointset/L5_S1_IVDjnt/L5_S1_FE range=(-99999.9 99999.9)
      PathPoint PathPoint_scapula_R: scapula_R (-0.102 -0.12 -0.078)
    Thelen2003Muscle SerrAnt8_1_R: max_isometric_force=105.0373 optimal_fiber_length=0.2315 tendon_slack_length=0.0001
        pennation_angle_at_optimal=0
      PathPoint PathPoint_rib8_R: rib8_R (0.105314 -0.12402 0.135383)
      ConditionalPathPoint ConditionalPathPoint_rib8_R_1: rib8_R (0.0939847 -0.110507 0.141062)
          socket_coordinate=/jointset/L5_S1_IVDjnt/L5_S1_FE range=(-99999.9 99999.9)
      ConditionalPathPoint ConditionalPathPoint_rib8_R_2: rib8_R (0.0739856 -0.0945065 0.143647)
          socket_coordinate=/jointset/L5_S1_IVDjnt/L5_S1_FE range=(-99999.9 99999.9)
      ConditionalPathPoint ConditionalPathPoint_rib8_R_3: rib8_R (0.0519858 -0.0775069 0.138947)
          socket_coordinate=/jointset/L5_S1_IVDjnt/L5_S1_FE range=(-99999.9 99999.9)
      ConditionalPathPoint ConditionalPathPoint_rib8_R_4: rib8_R (0.0329852 -0.0635065 0.130835)
          socket_coordinate=/jointset/L5_S1_IVDjnt/L5_S1_FE range=(-99999.9 99999.9)
      ConditionalPathPoint ConditionalPathPoint_rib8_R_5: rib8_R (0.0149835 -0.0485066 0.120207)
          socket_coordinate=/jointset/L5_S1_IVDjnt/L5_S1_FE range=(-99999.9 99999.9)
      ConditionalPathPoint ConditionalPathPoint_rib8_R_6: rib8_R (-1.4e-5 -0.0345065 0.10908)
          socket_coordinate=/jointset/L5_S1_IVDjnt/L5_S1_FE range=(-99999.9 99999.9)
      ConditionalPathPoint ConditionalPathPoint_rib8_R_7: rib8_R (-0.0140142 -0.0205066 0.0962654)
          socket_coordinate=/jointset/L5_S1_IVDjnt/L5_S1_FE range=(-99999.9 99999.9)
      PathPoint PathPoint_scapula_R: scapula_R (-0.102 -0.12 -0.078)
    Thelen2003Muscle SerrAnt9_1_R: max_isometric_force=76.86 optimal_fiber_length=0.2315 tendon_slack_length=0.0001
        pennation_angle_at_optimal=0
      PathPoint PathPoint_rib9_R: rib9_R (0.0902269 -0.12159 0.137843)
      ConditionalPathPoint ConditionalPathPoint_rib9_R_1: rib9_R (0.0782536 -0.104845 0.143552)
          socket_coordinate=/jointset/L5_S1_IVDjnt/L5_S1_FE range=(-99999.9 99999.9)
      ConditionalPathPoint ConditionalPathPoint_rib9_R_2: rib9_R (0.0572517 -0.0848462 0.142346)
          socket_coordinate=/jointset/L5_S1_IVDjnt/L5_S1_FE range=(-99999.9 99999.9)
      ConditionalPathPoint ConditionalPathPoint_rib9_R_3: rib9_R (0.0382527 -0.065846 0.135145)
          socket_coordinate=/jointset/L5_S1_IVDjnt/L5_S1_FE range=(-99999.9 99999.9)
      ConditionalPathPoint ConditionalPathPoint_rib9_R_4: rib9_R (0.0212542 -0.0468459 0.125568)
          socket_coordinate=/jointset/L5_S1_IVDjnt/L5_S1_FE range=(-99999.9 99999.9)
      ConditionalPathPoint ConditionalPathPoint_rib9_R_5: rib9_R (0.00625189 -0.0288461 0.114956)
          socket_coordinate=/jointset/L5_S1_IVDjnt/L5_S1_FE range=(-99999.9 99999.9)
      ConditionalPathPoint ConditionalPathPoint_rib9_R_6: rib9_R (-0.00774685 -0.0098464 0.102823)
          socket_coordinate=/jointset/L5_S1_IVDjnt/L5_S1_FE range=(-99999.9 99999.9)
      ConditionalPathPoint ConditionalPathPoint_rib9_R_7: rib9_R (-0.0187467 0.00815312 0.0906644)
          socket_coordinate=/jointset/L5_S1_IVDjnt/L5_S1_FE range=(-99999.9 99999.9)
      PathPoint PathPoint_scapula_R: scapula_R (-0.102 -0.12 -0.078)
    Thelen2003Muscle SerrAnt1_1_L: max_isometric_force=96.29378 optimal_fiber_length=0.1135 tendon_slack_length=0.00277
        pennation_angle_at_optimal=0
      PathPoint PathPoint_rib1_L: rib1_L (0.0321008 -0.0397453 -0.0541799)
      ConditionalPathPoint ConditionalPathPoint_rib1_L_1: rib1_L (0.0214077 -0.0332194 -0.0579584)
          socket_coordinate=/jointset/L5_S1_IVDjnt/L5_S1_FE range=(-99999.9 99999.9)
      ConditionalPathPoint ConditionalPathPoint_rib1_L_2: rib1_L (0.0064078 -0.0272196 -0.0635251)
          socket_coordinate=/jointset/L5_S1_IVDjnt/L5_S1_FE range=(-99999.9 99999.9)
      ConditionalPathPoint ConditionalPathPoint_rib1_L_3: rib1_L (-0.0115923 -0.0242197 -0.0667108)
          socket_coordinate=/jointset/L5_S1_IVDjnt/L5_S1_FE range=(-99999.9 99999.9)
      ConditionalPathPoint ConditionalPathPoint_rib1_L_4: rib1_L (-0.0285919 -0.0252199 -0.0625753)
          socket_coordinate=/jointset/L5_S1_IVDjnt/L5_S1_FE range=(-99999.9 99999.9)
      PathPoint PathPoint_scapula_L: scapula_L (-0.055 0.01 0.085)
    Thelen2003Muscle SerrAnt2_1_L: max_isometric_force=127.7644 optimal_fiber_length=0.1135 tendon_slack_length=0.00277
        pennation_angle_at_optimal=0
      PathPoint PathPoint_rib2_L: rib2_L (0.0627096 -0.0568981 -0.0723727)
      ConditionalPathPoint ConditionalPathPoint_rib2_L_1: rib2_L (0.0479397 -0.0471458 -0.0802024)
          socket_coordinate=/jointset/L5_S1_IVDjnt/L5_S1_FE range=(-99999.9 99999.9)
      ConditionalPathPoint ConditionalPathPoint_rib2_L_2: rib2_L (0.0259417 -0.0351476 -0.0882784)
          socket_coordinate=/jointset/L5_S1_IVDjnt/L5_S1_FE range=(-99999.9 99999.9)
      ConditionalPathPoint ConditionalPathPoint_rib2_L_3: rib2_L (-0.0270576 -0.0351481 -0.0896288)
          socket_coordinate=/jointset/L5_S1_IVDjnt/L5_S1_FE range=(-99999.9 99999.9)
      ConditionalPathPoint ConditionalPathPoint_rib2_L_4: rib2_L (-0.0530577 -0.0411472 -0.0700055)
          socket_coordinate=/jointset/L5_S1_IVDjnt/L5_S1_FE range=(-99999.9 99999.9)
      PathPoint PathPoint_scapula_L: scapula_L (-0.088 -0.032 0.096)
    Thelen2003Muscle SerrAnt2_2_L: max_isometric_force=117.5866 optimal_fiber_length=0.1135 tendon_slack_length=0.00277
        pennation_angle_at_optimal=0
      PathPoint PathPoint_rib2_L: rib2_L (0.0415288 -0.0471332 -0.0865049)
      ConditionalPathPoint ConditionalPathPoint_rib2_L_1: rib2_L (0.0299424 -0.0361475 -0.0863216)
          socket_coordinate=/jointset/L5_S1_IVDjnt/L5_S1_FE range=(-99999.9 99999.9)
      ConditionalPathPoint ConditionalPathPoint_rib2_L_2: rib2_L (0.0159419 -0.0261471 -0.0856348)
          socket_coordinate=/jointset/L5_S1_IVDjnt/L5_S1_FE range=(-99999.9 99999.9)
      ConditionalPathPoint ConditionalPathPoint_rib2_L_3: rib2_L (-0.00305793 -0.0181479 -0.0832112)
          socket_coordinate=/jointset/L5_S1_IVDjnt/L5_S1_FE range=(-99999.9 99999.9)
      ConditionalPathPoint ConditionalPathPoint_rib2_L_4: rib2_L (-0.0180577 -0.0131479 -0.0750721)
          socket_coordinate=/jointset/L5_S1_IVDjnt/L5_S1_FE range=(-99999.9 99999.9)
      PathPoint PathPoint_scapula_L: scapula_L (-0.055 0.01 0.085)
    Thelen2003Muscle SerrAnt3_1_L: max_isometric_force=240.7039 optimal_fiber_length=0.1791 tendon_slack_length=0.0075
        pennation_angle_at_optimal=0
      PathPoint PathPoint_rib3_L: rib3_L (0.083857 -0.0742244 -0.0910903)
      ConditionalPathPoint ConditionalPathPoint_rib3_L_1: rib3_L (0.0760815 -0.0698791 -0.0966527)
          socket_coordinate=/jointset/L5_S1_IVDjnt/L5_S1_FE range=(-99999.9 99999.9)
      ConditionalPathPoint ConditionalPathPoint_rib3_L_2: rib3_L (0.0640802 -0.0638788 -0.103963)
          socket_coordinate=/jointset/L5_S1_IVDjnt/L5_S1_FE range=(-99999.9 99999.9)
      ConditionalPathPoint ConditionalPathPoint_rib3_L_3: rib3_L (0.0450792 -0.0618789 -0.11552)
          socket_coordinate=/jointset/L5_S1_IVDjnt/L5_S1_FE range=(-99999.9 99999.9)
      ConditionalPathPoint ConditionalPathPoint_rib3_L_4: rib3_L (-0.00691661 -0.06888 -0.117676)
          socket_coordinate=/jointset/L5_S1_IVDjnt/L5_S1_FE range=(-99999.9 99999.9)
      ConditionalPathPoint ConditionalPathPoint_rib3_L_5: rib3_L (-0.033919 -0.0748791 -0.104447)
          socket_coordinate=/jointset/L5_S1_IVDjnt/L5_S1_FE range=(-99999.9 99999.9)
      ConditionalPathPoint ConditionalPathPoint_rib3_L_6: rib3_L (-0.0529184 -0.0798794 -0.0884957)
          socket_coordinate=/jointset/L5_S1_IVDjnt/L5_S1_FE range=(-99999.9 99999.9)
      ConditionalPathPoint ConditionalPathPoint_rib3_L_7: rib3_L (-0.0639187 -0.0828776 -0.0735343)
          socket_coordinate=/jointset/L5_S1_IVDjnt/L5_S1_FE range=(-99999.9 99999.9)
      PathPoint PathPoint_scapula_L: scapula_L (-0.1 -0.09 0.096)
    Thelen2003Muscle SerrAnt4_1_L: max_isometric_force=214.8566 optimal_fiber_length=0.1791 tendon_slack_length=0.0075
        pennation_angle_at_optimal=0
      PathPoint PathPoint_rib4_L: rib4_L (0.100646 -0.0896388 -0.103201)
      ConditionalPathPoint ConditionalPathPoint_rib4_L_1: rib4_L (0.0914997 -0.0862627 -0.11036)
          socket_coordinate=/jointset/L5_S1_IVDjnt/L5_S1_FE range=(-99999.9 99999.9)
      ConditionalPathPoint ConditionalPathPoint_rib4_L_2: rib4_L (0.0785002 -0.0852632 -0.119668)
          socket_coordinate=/jointset/L5_S1_IVDjnt/L5_S1_FE range=(-99999.9 99999.9)
      ConditionalPathPoint ConditionalPathPoint_rib4_L_3: rib4_L (0.0515002 -0.0852628 -0.130795)
          socket_coordinate=/jointset/L5_S1_IVDjnt/L5_S1_FE range=(-99999.9 99999.9)
      ConditionalPathPoint ConditionalPathPoint_rib4_L_4: rib4_L (0.0124961 -0.0902616 -0.127604)
          socket_coordinate=/jointset/L5_S1_IVDjnt/L5_S1_FE range=(-99999.9 99999.9)
      ConditionalPathPoint ConditionalPathPoint_rib4_L_5: rib4_L (-0.0115031 -0.0942616 -0.116709)
          socket_coordinate=/jointset/L5_S1_IVDjnt/L5_S1_FE range=(-99999.9 99999.9)
      ConditionalPathPoint ConditionalPathPoint_rib4_L_6: rib4_L (-0.0285007 -0.0962629 -0.104961)
          socket_coordinate=/jointset/L5_S1_IVDjnt/L5_S1_FE range=(-99999.9 99999.9)
      ConditionalPathPoint ConditionalPathPoint_rib4_L_7: rib4_L (-0.0425013 -0.0982639 -0.0924245)
          socket_coordinate=/jointset/L5_S1_IVDjnt/L5_S1_FE range=(-99999.9 99999.9)
      PathPoint PathPoint_scapula_L: scapula_L (-0.102 -0.12 0.078)
    Thelen2003Muscle SerrAnt5_1_L: max_isometric_force=75.24641 optimal_fiber_length=0.1791 tendon_slack_length=0.0075
        pennation_angle_at_optimal=0
      PathPoint PathPoint_rib5_L: rib5_L (0.114086 -0.102913 -0.111994)
      ConditionalPathPoint ConditionalPathPoint_rib5_L_1: rib5_L (0.103571 -0.097449 -0.119056)
          socket_coordinate=/jointset/L5_S1_IVDjnt/L5_S1_FE range=(-99999.9 99999.9)
      ConditionalPathPoint ConditionalPathPoint_rib5_L_2: rib5_L (0.0855704 -0.0934495 -0.128348)
          socket_coordinate=/jointset/L5_S1_IVDjnt/L5_S1_FE range=(-99999.9 99999.9)
      ConditionalPathPoint ConditionalPathPoint_rib5_L_3: rib5_L (0.0545683 -0.0904489 -0.134261)
          socket_coordinate=/jointset/L5_S1_IVDjnt/L5_S1_FE range=(-99999.9 99999.9)
      ConditionalPathPoint ConditionalPathPoint_rib5_L_4: rib5_L (0.0215705 -0.0894487 -0.127257)
          socket_coordinate=/jointset/L5_S1_IVDjnt/L5_S1_FE range=(-99999.9 99999.9)
      ConditionalPathPoint ConditionalPathPoint_rib5_L_5: rib5_L (-0.00143056 -0.0864486 -0.115379)
          socket_coordinate=/jointset/L5_S1_IVDjnt/L5_S1_FE range=(-99999.9 99999.9)
      ConditionalPathPoint ConditionalPathPoint_rib5_L_6: rib5_L (-0.0194312 -0.0834487 -0.10253)
          socket_coordinate=/jointset/L5_S1_IVDjnt/L5_S1_FE range=(-99999.9 99999.9)
      ConditionalPathPoint ConditionalPathPoint_rib5_L_7: rib5_L (-0.0344309 -0.0794482 -0.0879411)
          socket_coordinate=/jointset/L5_S1_IVDjnt/L5_S1_FE range=(-99999.9 99999.9)
      PathPoint PathPoint_scapula_L: scapula_L (-0.102 -0.12 0.078)
    Thelen2003Muscle SerrAnt6_1_L: max_isometric_force=195.5561 optimal_fiber_length=0.1791 tendon_slack_length=0.0075
        pennation_angle_at_optimal=0
      PathPoint PathPoint_rib6_L: rib6_L (0.118397 -0.114109 -0.119618)
      ConditionalPathPoint ConditionalPathPoint_rib6_L_1: rib6_L (0.106949 -0.105563 -0.126325)
          socket_coordinate=/jointset/L5_S1_IVDjnt/L5_S1_FE range=(-99999.9 99999.9)
      ConditionalPathPoint ConditionalPathPoint_rib6_L_2: rib6_L (0.0899459 -0.096563 -0.133263)
          socket_coordinate=/jointset/L5_S1_IVDjnt/L5_S1_FE range=(-99999.9 99999.9)
      ConditionalPathPoint ConditionalPathPoint_rib6_L_3: rib6_L (0.0589477 -0.0895628 -0.136354)
          socket_coordinate=/jointset/L5_S1_IVDjnt/L5_S1_FE range=(-99999.9 99999.9)
      ConditionalPathPoint ConditionalPathPoint_rib6_L_4: rib6_L (0.0319471 -0.0825629 -0.129023)
          socket_coordinate=/jointset/L5_S1_IVDjnt/L5_S1_FE range=(-99999.9 99999.9)
      ConditionalPathPoint ConditionalPathPoint_rib6_L_5: rib6_L (0.00994497 -0.0755629 -0.118152)
          socket_coordinate=/jointset/L5_S1_IVDjnt/L5_S1_FE range=(-99999.9 99999.9)
      ConditionalPathPoint ConditionalPathPoint_rib6_L_6: rib6_L (-0.00805265 -0.0675631 -0.105959)
          socket_coordinate=/jointset/L5_S1_IVDjnt/L5_S1_FE range=(-99999.9 99999.9)
      ConditionalPathPoint ConditionalPathPoint_rib6_L_7: rib6_L (-0.0230526 -0.060563 -0.0925106)
          socket_coordinate=/jointset/L5_S1_IVDjnt/L5_S1_FE range=(-99999.9 99999.9)
      PathPoint PathPoint_scapula_L: scapula_L (-0.102 -0.12 0.078)
    Thelen2003Muscle SerrAnt7_1_L: max_isometric_force=154.2313 optimal_fiber_length=0.2315 tendon_slack_length=0.0001
        pennation_angle_at_optimal=0
      PathPoint PathPoint_rib7_L: rib7_L (0.119304 -0.122892 -0.12838)
      ConditionalPathPoint ConditionalPathPoint_rib7_L_1: rib7_L (0.108734 -0.110444 -0.133636)
          socket_coordinate=/jointset/L5_S1_IVDjnt/L5_S1_FE range=(-99999.9 99999.9)
      ConditionalPathPoint ConditionalPathPoint_rib7_L_2: rib7_L (0.0897332 -0.0974468 -0.138939)
          socket_coordinate=/jointset/L5_S1_IVDjnt/L5_S1_FE range=(-99999.9 99999.9)
      ConditionalPathPoint ConditionalPathPoint_rib7_L_3: rib7_L (0.0627332 -0.0854462 -0.138325)
          socket_coordinate=/jointset/L5_S1_IVDjnt/L5_S1_FE range=(-99999.9 99999.9)
      ConditionalPathPoint ConditionalPathPoint_rib7_L_4: rib7_L (0.0387329 -0.0744462 -0.131036)
          socket_coordinate=/jointset/L5_S1_IVDjnt/L5_S1_FE range=(-99999.9 99999.9)
      ConditionalPathPoint ConditionalPathPoint_rib7_L_5: rib7_L (0.0177305 -0.0634464 -0.120524)
          socket_coordinate=/jointset/L5_S1_IVDjnt/L5_S1_FE range=(-99999.9 99999.9)
      ConditionalPathPoint ConditionalPathPoint_rib7_L_6: rib7_L (0.000731495 -0.0524468 -0.109103)
          socket_coordinate=/jointset/L5_S1_IVDjnt/L5_S1_FE range=(-99999.9 99999.9)
      ConditionalPathPoint ConditionalPathPoint_rib7_L_7: rib7_L (-0.0152686 -0.0414469 -0.0953288)
          socket_coordinate=/jointset/L5_S1_IVDjnt/L5_S1_FE range=(-99999.9 99999.9)
      PathPoint PathPoint_scapula_L: scapula_L (-0.102 -0.12 0.078)
    Thelen2003Muscle SerrAnt8_1_L: max_isometric_force=105.0379 optimal_fiber_length=0.2315 tendon_slack_length=0.0001
        pennation_angle_at_optimal=0
      PathPoint PathPoint_rib8_L: rib8_L (0.105314 -0.12402 -0.135383)
      ConditionalPathPoint ConditionalPathPoint_rib8_L_1: rib8_L (0.0939847 -0.110507 -0.141062)
          socket_coordinate=/jointset/L5_S1_IVDjnt/L5_S1_FE range=(-99999.9 99999.9)
      ConditionalPathPoint ConditionalPathPoint_rib8_L_2: rib8_L (0.0739856 -0.0945065 -0.143647)
          socket_coordinate=/jointset/L5_S1_IVDjnt/L5_S1_FE range=(-99999.9 99999.9)
      ConditionalPathPoint ConditionalPathPoint_rib8_L_3: rib8_L (0.0519858 -0.0775069 -0.138947)
          socket_coordinate=/jointset/L5_S1_IVDjnt/L5_S1_FE range=(-99999.9 99999.9)
      ConditionalPathPoint ConditionalPathPoint_rib8_L_4: rib8_L (0.0329852 -0.0635065 -0.130835)
          socket_coordinate=/jointset/L5_S1_IVDjnt/L5_S1_FE range=(-99999.9 99999.9)
      ConditionalPathPoint ConditionalPathPoint_rib8_L_5: rib8_L (0.0149835 -0.0485066 -0.120207)
          socket_coordinate=/jointset/L5_S1_IVDjnt/L5_S1_FE range=(-99999.9 99999.9)
      ConditionalPathPoint ConditionalPathPoint_rib8_L_6: rib8_L (-1.4e-5 -0.0345065 -0.10908)
          socket_coordinate=/jointset/L5_S1_IVDjnt/L5_S1_FE range=(-99999.9 99999.9)
      ConditionalPathPoint ConditionalPathPoint_rib8_L_7: rib8_L (-0.0140142 -0.0205066 -0.0962654)
          socket_coordinate=/jointset/L5_S1_IVDjnt/L5_S1_FE range=(-99999.9 99999.9)
      PathPoint PathPoint_scapula_L: scapula_L (-0.102 -0.12 0.078)
    Thelen2003Muscle SerrAnt9_1_L: max_isometric_force=76.8599 optimal_fiber_length=0.2315 tendon_slack_length=0.0001
        pennation_angle_at_optimal=0
      PathPoint PathPoint_rib9_L: rib9_L (0.0902269 -0.12159 -0.137843)
      ConditionalPathPoint ConditionalPathPoint_rib9_L_1: rib9_L (0.0782536 -0.104845 -0.143552)
          socket_coordinate=/jointset/L5_S1_IVDjnt/L5_S1_FE range=(-99999.9 99999.9)
      ConditionalPathPoint ConditionalPathPoint_rib9_L_2: rib9_L (0.0572517 -0.0848462 -0.142346)
          socket_coordinate=/jointset/L5_S1_IVDjnt/L5_S1_FE range=(-99999.9 99999.9)
      ConditionalPathPoint ConditionalPathPoint_rib9_L_3: rib9_L (0.0382527 -0.065846 -0.135145)
          socket_coordinate=/jointset/L5_S1_IVDjnt/L5_S1_FE range=(-99999.9 99999.9)
      ConditionalPathPoint ConditionalPathPoint_rib9_L_4: rib9_L (0.0212542 -0.0468459 -0.125568)
          socket_coordinate=/jointset/L5_S1_IVDjnt/L5_S1_FE range=(-99999.9 99999.9)
      ConditionalPathPoint ConditionalPathPoint_rib9_L_5: rib9_L (0.00625189 -0.0288461 -0.114956)
          socket_coordinate=/jointset/L5_S1_IVDjnt/L5_S1_FE range=(-99999.9 99999.9)
      ConditionalPathPoint ConditionalPathPoint_rib9_L_6: rib9_L (-0.00774685 -0.0098464 -0.102823)
          socket_coordinate=/jointset/L5_S1_IVDjnt/L5_S1_FE range=(-99999.9 99999.9)
      ConditionalPathPoint ConditionalPathPoint_rib9_L_7: rib9_L (-0.0187467 0.00815312 -0.0906644)
          socket_coordinate=/jointset/L5_S1_IVDjnt/L5_S1_FE range=(-99999.9 99999.9)
      PathPoint PathPoint_scapula_L: scapula_L (-0.102 -0.12 0.078)
    Thelen2003Muscle DELT1: optimal_force=1 max_isometric_force=1142.6 optimal_fiber_length=0.0976
        tendon_slack_length=0.093 pennation_angle_at_optimal=0.38397 max_contraction_velocity=10
        default_activation=0.05 default_fiber_length=0.1 FmaxTendonStrain=0.033 FmaxMuscleStrain=0.6 KshapeActive=0.5
        KshapePassive=4 Af=0.3 Flen=1.8 activation_time_constant=0.01 [seconds]
        deactivation_time_constant=0.04 [seconds]
      PathPoint PathPoint_humerus_r: humerus_r (0.00896 -0.11883 0.00585)
      PathPoint PathPoint_humerus_r_0: humerus_r (0.01623 -0.11033 0.00412)
      PathPoint PathPoint_clavicle_R: clavicle_R (0.02914 -0.01245 0.13653)
      PathPoint PathPoint_clavicle_R_0: clavicle_R (-0.014 0.01106 0.08021)
    Thelen2003Muscle DELT2: optimal_force=1 max_isometric_force=1142.6 optimal_fiber_length=0.1078
        tendon_slack_length=0.1095 pennation_angle_at_optimal=0.2618 max_contraction_velocity=10
        default_activation=0.05 default_fiber_length=0.1 FmaxTendonStrain=0.033 FmaxMuscleStrain=0.6 KshapeActive=0.5
        KshapePassive=4 Af=0.3 Flen=1.8 activation_time_constant=0.01 deactivation_time_constant=0.04
      PathPoint PathPoint_humerus_r: humerus_r (0.00461 -0.13611 0.0056)
      PathPoint PathPoint_humerus_r_0: humerus_r (-0.00208 -0.05381 0.01859)
      PathPoint PathPoint_scapula_R: scapula_R (5e-5 0.00294 0.02233)
      PathPoint PathPoint_scapula_R_0: scapula_R (-0.01078 -0.00034 0.0062)
    Thelen2003Muscle DELT3: optimal_force=1 max_isometric_force=259.88 optimal_fiber_length=0.1367
        tendon_slack_length=0.038 pennation_angle_at_optimal=0.31416 max_contraction_velocity=10
        default_activation=0.05 default_fiber_length=0.1 FmaxTendonStrain=0.033 FmaxMuscleStrain=0.6 KshapeActive=0.5
        KshapePassive=4 Af=0.3 Flen=1.8 activation_time_constant=0.01 deactivation_time_constant=0.04
      PathPoint PathPoint_scapula_R: scapula_R (-0.05573 0.00122 -0.02512)
      PathPoint PathPoint_scapula_R_0: scapula_R (-0.07247 -0.03285 0.01233)
      PathPoint PathPoint_humerus_r: humerus_r (0.00206 -0.07602 0.01045)
    Thelen2003Muscle SUPSP: optimal_force=1 max_isometric_force=487.82 optimal_fiber_length=0.0682
        tendon_slack_length=0.0395 pennation_angle_at_optimal=0.12217 max_contraction_velocity=10
        default_activation=0.05 default_fiber_length=0.1 FmaxTendonStrain=0.033 FmaxMuscleStrain=0.6 KshapeActive=0.5
        KshapePassive=4 Af=0.3 Flen=1.8 activation_time_constant=0.01 deactivation_time_constant=0.04
      PathPoint PathPoint_humerus_r: humerus_r (0.00256 0.01063 0.02593)
      PathPoint PathPoint_scapula_R: scapula_R (-0.01918 0.00127 -0.01271)
      PathPoint PathPoint_scapula_R_0: scapula_R (-0.044 -0.01512 -0.05855)
    Thelen2003Muscle INFSP: optimal_force=1 max_isometric_force=1210.84 optimal_fiber_length=0.0755
        tendon_slack_length=0.0308 pennation_angle_at_optimal=0.32289 max_contraction_velocity=10
        default_activation=0.05 default_fiber_length=0.1 FmaxTendonStrain=0.033 FmaxMuscleStrain=0.6 KshapeActive=0.5
        KshapePassive=4 Af=0.3 Flen=1.8 activation_time_constant=0.01 deactivation_time_constant=0.04
      PathPoint PathPoint_humerus_r: humerus_r (-0.00887 0.00484 0.02448)
      PathPoint PathPoint_scapula_R: scapula_R (-0.07382 -0.05476 -0.04781)
    Thelen2003Muscle SUBSC: optimal_force=1 max_isometric_force=1377.81 optimal_fiber_length=0.0873
        tendon_slack_length=0.033 pennation_angle_at_optimal=0.34907 max_contraction_velocity=10
        default_activation=0.05 default_fiber_length=0.1 FmaxTendonStrain=0.033 FmaxMuscleStrain=0.6 KshapeActive=0.5
        KshapePassive=4 Af=0.3 Flen=1.8 activation_time_constant=0.01 deactivation_time_constant=0.04
      PathPoint PathPoint_humerus_r: humerus_r (0.01403 0.0084 -0.01331)
      PathPoint PathPoint_scapula_R: scapula_R (-0.01831 -0.05223 -0.02457)
      PathPoint PathPoint_scapula_R_0: scapula_R (-0.07246 -0.03943 -0.06475)
    Thelen2003Muscle TMIN: optimal_force=1 max_isometric_force=354.25 optimal_fiber_length=0.0741
        tendon_slack_length=0.0713 pennation_angle_at_optimal=0.41888 max_contraction_velocity=10
        default_activation=0.05 default_fiber_length=0.1 FmaxTendonStrain=0.033 FmaxMuscleStrain=0.6 KshapeActive=0.5
        KshapePassive=4 Af=0.3 Flen=1.8 activation_time_constant=0.01 deactivation_time_constant=0.04
      PathPoint PathPoint_humerus_r: humerus_r (-0.0011 -0.01264 0.02156)
      PathPoint PathPoint_scapula_R: scapula_R (-0.09473 -0.07991 -0.04737)
      PathPoint PathPoint_scapula_R_0: scapula_R (-0.09643 -0.08121 -0.05298)
    Thelen2003Muscle TMAJ: optimal_force=1 max_isometric_force=425.39 optimal_fiber_length=0.1624
        tendon_slack_length=0.02 pennation_angle_at_optimal=0.27925 max_contraction_velocity=10 default_activation=0.05
        default_fiber_length=0.1 FmaxTendonStrain=0.033 FmaxMuscleStrain=0.6 KshapeActive=0.5 KshapePassive=4 Af=0.3
        Flen=1.8 activation_time_constant=0.01 deactivation_time_constant=0.04
      PathPoint PathPoint_humerus_r: humerus_r (0.00998 -0.05419 -0.00568)
      PathPoint PathPoint_scapula_R: scapula_R (-0.10264 -0.10319 -0.05829)
      PathPoint PathPoint_scapula_R_0: scapula_R (-0.10489 -0.10895 -0.07117)
    Thelen2003Muscle PECM1: optimal_force=1 max_isometric_force=720.3597 optimal_fiber_length=0.144
        tendon_slack_length=0.003 pennation_angle_at_optimal=0.29671 max_contraction_velocity=10
        default_activation=0.05 default_fiber_length=0.1 FmaxTendonStrain=0.033 FmaxMuscleStrain=0.6 KshapeActive=0.5
        KshapePassive=4 Af=0.3 Flen=1.8 activation_time_constant=0.01 deactivation_time_constant=0.04
      PathPoint PathPoint_humerus_r: humerus_r (0.01169 -0.04191 0.0078)
      PathPoint PathPoint_humerus_r_0: humerus_r (0.01615 -0.04045 -0.00577)
      PathPoint PathPoint_clavicle_R: clavicle_R (0.003255 -0.02202 0.10118)
      PathPoint PathPoint_clavicle_R_0: clavicle_R (0.00321 -0.00013 0.05113)
    Thelen2003Muscle PECM2: optimal_force=1 max_isometric_force=190.2102 optimal_fiber_length=0.138
        tendon_slack_length=0.089 pennation_angle_at_optimal=0.43633 max_contraction_velocity=10
        default_activation=0.05 default_fiber_length=0.1 FmaxTendonStrain=0.033 FmaxMuscleStrain=0.6 KshapeActive=0.5
        KshapePassive=4 Af=0.3 Flen=1.8 activation_time_constant=0.01 deactivation_time_constant=0.04
      PathPoint PathPoint_humerus_r: humerus_r (0.01274 -0.04289 0.00785)
      PathPoint PathPoint_humerus_r_0: humerus_r (0.01453 -0.04568 -0.00687)
      ConditionalPathPoint ConditionalPathPoint_sternum_1: sternum (-0.011 -0.047 0.075)
          socket_coordinate=/jointset/L5_S1_IVDjnt/L5_S1_FE range=(-99999.9 99999.9)
      ConditionalPathPoint ConditionalPathPoint_sternum_2: sternum (0.015 -0.041 0.027)
          socket_coordinate=/jointset/L5_S1_IVDjnt/L5_S1_FE range=(-99999.9 99999.9)
      PathPoint PathPoint_sternum: sternum (0.02204 -0.034771 -0.02169)
    Thelen2003Muscle PECM3: optimal_force=1 max_isometric_force=518.6055 optimal_fiber_length=0.138
        tendon_slack_length=0.132 pennation_angle_at_optimal=0.43633 max_contraction_velocity=10
        default_activation=0.05 default_fiber_length=0.1 FmaxTendonStrain=0.033 FmaxMuscleStrain=0.6 KshapeActive=0.5
        KshapePassive=4 Af=0.3 Flen=1.8 activation_time_constant=0.01 deactivation_time_constant=0.04
      PathPoint PathPoint_humerus_r: humerus_r (0.01269 -0.04375 0.0075)
      PathPoint PathPoint_humerus_r_0: humerus_r (0.01243 -0.05157 -0.01807)
      ConditionalPathPoint ConditionalPathPoint_sternum_1: sternum (0.002 -0.093 0.08)
          socket_coordinate=/jointset/L5_S1_IVDjnt/L5_S1_FE range=(-99999.9 99999.9)
      ConditionalPathPoint ConditionalPathPoint_sternum_2: sternum (0.03 -0.107 0.053)
          socket_coordinate=/jointset/L5_S1_IVDjnt/L5_S1_FE range=(-99999.9 99999.9)
      PathPoint PathPoint_sternum: sternum (0.051281 -0.12028 -0.0143)
    Thelen2003Muscle CORB: optimal_force=1 max_isometric_force=242.46 optimal_fiber_length=0.0932
        tendon_slack_length=0.097 pennation_angle_at_optimal=0 max_contraction_velocity=10 default_activation=0.05
        default_fiber_length=0.1 FmaxTendonStrain=0.033 FmaxMuscleStrain=0.6 KshapeActive=0.5 KshapePassive=4 Af=0.3
        Flen=1.8 activation_time_constant=0.01 deactivation_time_constant=0.04
      PathPoint PathPoint_scapula_R: scapula_R (0.0125 -0.04127 -0.02652)
      PathPoint PathPoint_scapula_R_0: scapula_R (0.00483 -0.06958 -0.01563)
      PathPoint PathPoint_humerus_r: humerus_r (0.00743 -0.15048 -0.00782)
    Thelen2003Muscle DELT1_l: optimal_force=1 max_isometric_force=1142.6 optimal_fiber_length=0.0976
        tendon_slack_length=0.093 pennation_angle_at_optimal=0.38397 max_contraction_velocity=10
        default_activation=0.05 default_fiber_length=0.1 FmaxTendonStrain=0.033 FmaxMuscleStrain=0.6 KshapeActive=0.5
        KshapePassive=4 Af=0.3 Flen=1.8 activation_time_constant=0.01 deactivation_time_constant=0.04
      PathPoint PathPoint_humerus_l: humerus_l (0.00896 -0.11883 -0.00585)
      PathPoint PathPoint_humerus_l_0: humerus_l (0.01623 -0.11033 -0.00412)
      PathPoint PathPoint_clavicle_L: clavicle_L (0.02914 -0.01245 -0.13653)
      PathPoint PathPoint_clavicle_L_0: clavicle_L (-0.014 0.01106 -0.08021)
    Thelen2003Muscle DELT2_l: optimal_force=1 max_isometric_force=1142.6 optimal_fiber_length=0.1078
        tendon_slack_length=0.1095 pennation_angle_at_optimal=0.2618 max_contraction_velocity=10
        default_activation=0.05 default_fiber_length=0.1 FmaxTendonStrain=0.033 FmaxMuscleStrain=0.6 KshapeActive=0.5
        KshapePassive=4 Af=0.3 Flen=1.8 activation_time_constant=0.01 deactivation_time_constant=0.04
      PathPoint PathPoint_humerus_l: humerus_l (0.00461 -0.13611 -0.0056)
      PathPoint PathPoint_humerus_l_0: humerus_l (-0.00208 -0.05381 -0.01859)
      PathPoint PathPoint_scapula_L: scapula_L (5e-5 0.00294 -0.02233)
      PathPoint PathPoint_scapula_L_0: scapula_L (-0.01078 -0.00034 -0.0062)
    Thelen2003Muscle DELT3_l: optimal_force=1 max_isometric_force=259.88 optimal_fiber_length=0.1367
        tendon_slack_length=0.038 pennation_angle_at_optimal=0.31416 max_contraction_velocity=10
        default_activation=0.05 default_fiber_length=0.1 FmaxTendonStrain=0.033 FmaxMuscleStrain=0.6 KshapeActive=0.5
        KshapePassive=4 Af=0.3 Flen=1.8 activation_time_constant=0.01 deactivation_time_constant=0.04
      PathPoint PathPoint_scapula_L: scapula_L (-0.05573 0.00122 0.02512)
      PathPoint PathPoint_scapula_L_0: scapula_L (-0.07247 -0.03285 -0.01233)
      PathPoint PathPoint_humerus_l: humerus_l (0.00206 -0.07602 -0.01045)
    Thelen2003Muscle SUPSP_l: optimal_force=1 max_isometric_force=487.82 optimal_fiber_length=0.0682
        tendon_slack_length=0.0395 pennation_angle_at_optimal=0.12217 max_contraction_velocity=10
        default_activation=0.05 default_fiber_length=0.1 FmaxTendonStrain=0.033 FmaxMuscleStrain=0.6 KshapeActive=0.5
        KshapePassive=4 Af=0.3 Flen=1.8 activation_time_constant=0.01 deactivation_time_constant=0.04
      PathPoint PathPoint_humerus_l: humerus_l (0.00256 0.01063 -0.02593)
      PathPoint PathPoint_scapula_L: scapula_L (-0.01918 0.00127 0.01271)
      PathPoint PathPoint_scapula_L_0: scapula_L (-0.044 -0.01512 0.05855)
    Thelen2003Muscle INFSP_l: optimal_force=1 max_isometric_force=1210.84 optimal_fiber_length=0.0755
        tendon_slack_length=0.0308 pennation_angle_at_optimal=0.32289 max_contraction_velocity=10
        default_activation=0.05 default_fiber_length=0.1 FmaxTendonStrain=0.033 FmaxMuscleStrain=0.6 KshapeActive=0.5
        KshapePassive=4 Af=0.3 Flen=1.8 activation_time_constant=0.01 deactivation_time_constant=0.04
      PathPoint PathPoint_humerus_l: humerus_l (-0.00887 0.00484 -0.02448)
      PathPoint PathPoint_scapula_L: scapula_L (-0.07382 -0.05476 0.04781)
    Thelen2003Muscle SUBSC_l: optimal_force=1 max_isometric_force=1377.81 optimal_fiber_length=0.0873
        tendon_slack_length=0.033 pennation_angle_at_optimal=0.34907 max_contraction_velocity=10
        default_activation=0.05 default_fiber_length=0.1 FmaxTendonStrain=0.033 FmaxMuscleStrain=0.6 KshapeActive=0.5
        KshapePassive=4 Af=0.3 Flen=1.8 activation_time_constant=0.01 deactivation_time_constant=0.04
      PathPoint PathPoint_humerus_l: humerus_l (0.01403 0.0084 0.01331)
      PathPoint PathPoint_scapula_L: scapula_L (-0.01831 -0.05223 0.02457)
      PathPoint PathPoint_scapula_L_0: scapula_L (-0.07246 -0.03943 0.06475)
    Thelen2003Muscle TMIN_l: optimal_force=1 max_isometric_force=354.25 optimal_fiber_length=0.0741
        tendon_slack_length=0.0713 pennation_angle_at_optimal=0.41888 max_contraction_velocity=10
        default_activation=0.05 default_fiber_length=0.1 FmaxTendonStrain=0.033 FmaxMuscleStrain=0.6 KshapeActive=0.5
        KshapePassive=4 Af=0.3 Flen=1.8 activation_time_constant=0.01 deactivation_time_constant=0.04
      PathPoint PathPoint_humerus_l: humerus_l (-0.0011 -0.01264 -0.02156)
      PathPoint PathPoint_scapula_L: scapula_L (-0.09473 -0.07991 0.04737)
      PathPoint PathPoint_scapula_L_0: scapula_L (-0.09643 -0.08121 0.05298)
    Thelen2003Muscle TMAJ_l: optimal_force=1 max_isometric_force=425.39 optimal_fiber_length=0.1624
        tendon_slack_length=0.02 pennation_angle_at_optimal=0.27925 max_contraction_velocity=10 default_activation=0.05
        default_fiber_length=0.1 FmaxTendonStrain=0.033 FmaxMuscleStrain=0.6 KshapeActive=0.5 KshapePassive=4 Af=0.3
        Flen=1.8 activation_time_constant=0.01 deactivation_time_constant=0.04
      PathPoint PathPoint_humerus_l: humerus_l (0.00998 -0.05419 0.00568)
      PathPoint PathPoint_scapula_L: scapula_L (-0.10264 -0.10319 0.05829)
      PathPoint PathPoint_scapula_L_0: scapula_L (-0.10489 -0.10895 0.07117)
    Thelen2003Muscle PECM1_l: optimal_force=1 max_isometric_force=720.3018 optimal_fiber_length=0.144
        tendon_slack_length=0.003 pennation_angle_at_optimal=0.29671 max_contraction_velocity=10
        default_activation=0.05 default_fiber_length=0.1 FmaxTendonStrain=0.033 FmaxMuscleStrain=0.6 KshapeActive=0.5
        KshapePassive=4 Af=0.3 Flen=1.8 activation_time_constant=0.01 deactivation_time_constant=0.04
      PathPoint PathPoint_humerus_l: humerus_l (0.01169 -0.04191 -0.0078)
      PathPoint PathPoint_humerus_l_0: humerus_l (0.01615 -0.04045 0.00577)
      PathPoint PathPoint_clavicle_L: clavicle_L (0.003255 -0.02202 -0.10118)
      PathPoint PathPoint_clavicle_L_0: clavicle_L (0.00321 -0.00013 -0.05113)
    Thelen2003Muscle PECM2_l: optimal_force=1 max_isometric_force=190.0638 optimal_fiber_length=0.138
        tendon_slack_length=0.089 pennation_angle_at_optimal=0.43633 max_contraction_velocity=10
        default_activation=0.05 default_fiber_length=0.1 FmaxTendonStrain=0.033 FmaxMuscleStrain=0.6 KshapeActive=0.5
        KshapePassive=4 Af=0.3 Flen=1.8 activation_time_constant=0.01 deactivation_time_constant=0.04
      PathPoint PathPoint_humerus_l: humerus_l (0.01274 -0.04289 -0.00785)
      PathPoint PathPoint_humerus_l_0: humerus_l (0.01453 -0.04568 0.00687)
      ConditionalPathPoint ConditionalPathPoint_sternum_1: sternum (-0.011 -0.047 -0.1421)
          socket_coordinate=/jointset/L5_S1_IVDjnt/L5_S1_FE range=(-99999.9 99999.9)
      ConditionalPathPoint ConditionalPathPoint_sternum_2: sternum (0.015 -0.041 -0.0941)
          socket_coordinate=/jointset/L5_S1_IVDjnt/L5_S1_FE range=(-99999.9 99999.9)
      PathPoint PathPoint_sternum: sternum (0.02204 -0.034771 -0.0454)
    Thelen2003Muscle PECM3_l: optimal_force=1 max_isometric_force=518.574 optimal_fiber_length=0.138
        tendon_slack_length=0.132 pennation_angle_at_optimal=0.43633 max_contraction_velocity=10
        default_activation=0.05 default_fiber_length=0.1 FmaxTendonStrain=0.033 FmaxMuscleStrain=0.6 KshapeActive=0.5
        KshapePassive=4 Af=0.3 Flen=1.8 activation_time_constant=0.01 deactivation_time_constant=0.04
      PathPoint PathPoint_humerus_l: humerus_l (0.01269 -0.04375 -0.0075)
      PathPoint PathPoint_humerus_l_0: humerus_l (0.01243 -0.05157 0.01807)
      ConditionalPathPoint ConditionalPathPoint_sternum_1: sternum (0.002 -0.093 -0.1471)
          socket_coordinate=/jointset/L5_S1_IVDjnt/L5_S1_FE range=(-99999.9 99999.9)
      ConditionalPathPoint ConditionalPathPoint_sternum_2: sternum (0.03 -0.107 -0.1201)
          socket_coordinate=/jointset/L5_S1_IVDjnt/L5_S1_FE range=(-99999.9 99999.9)
      PathPoint PathPoint_sternum: sternum (0.051281 -0.12028 -0.0528)
    Thelen2003Muscle CORB_l: optimal_force=1 max_isometric_force=242.46 optimal_fiber_length=0.0932
        tendon_slack_length=0.097 pennation_angle_at_optimal=0 max_contraction_velocity=10 default_activation=0.05
        default_fiber_length=0.1 FmaxTendonStrain=0.033 FmaxMuscleStrain=0.6 KshapeActive=0.5 KshapePassive=4 Af=0.3
        Flen=1.8 activation_time_constant=0.01 deactivation_time_constant=0.04
      PathPoint PathPoint_scapula_L: scapula_L (0.0125 -0.04127 0.02652)
      PathPoint PathPoint_scapula_L_0: scapula_L (0.00483 -0.06958 0.01563)
      PathPoint PathPoint_humerus_l: humerus_l (0.00743 -0.15048 0.00782)
    Thelen2003Muscle TR1_l: max_isometric_force=160 optimal_fiber_length=0.073 tendon_slack_length=0.044
        pennation_angle_at_optimal=0
      PathPoint P1: Abdomen (0.00690748 0.058 -0.0325788)
      PathPoint P2: rib9_L (0.110562 -0.138559 -0.119672)
    Thelen2003Muscle TR2_l: max_isometric_force=63 optimal_fiber_length=0.148 tendon_slack_length=0.116
        pennation_angle_at_optimal=0
      PathPoint P1: lumbar2 (-0.023 0.015 -0.023)
      PathPoint P2: Abdomen (0.00762775 0.024 -0.0384435)
      PathWrap: wrap_object=Cylinder9 method=hybrid range=(1 2)
    Thelen2003Muscle TR3_l: max_isometric_force=63 optimal_fiber_length=0.148 tendon_slack_length=0.078
        pennation_angle_at_optimal=0
      PathPoint P1: lumbar3 (-0.026 0.022 -0.03)
      PathPoint P2: Abdomen (0.00714076 -0.005 -0.0439056)
      PathWrap: wrap_object=Cylinder10 method=hybrid range=(1 2)
    Thelen2003Muscle TR4_l: max_isometric_force=63 optimal_fiber_length=0.148 tendon_slack_length=0.081
        pennation_angle_at_optimal=0
      PathPoint P1: lumbar4 (-0.017 0.026 -0.027)
      PathPoint P2: Abdomen (0.005 -0.033 -0.043)
      PathWrap: wrap_object=Cylinder11 method=hybrid range=(1 2)
    Thelen2003Muscle TR5_l: max_isometric_force=190 optimal_fiber_length=0.073 tendon_slack_length=0.033
        pennation_angle_at_optimal=0
      PathPoint P1: Abdomen (0.005 -0.063 -0.043)
      PathPoint P2: pelvis (-0.05 0.053 -0.120024)
      PathWrap: wrap_object=Cylinder12 method=hybrid range=(1 2)
    Thelen2003Muscle TR1_r: max_isometric_force=160 optimal_fiber_length=0.073 tendon_slack_length=0.044
        pennation_angle_at_optimal=0
      PathPoint P1: Abdomen (0.00690748 0.058 0.0325788)
      PathPoint P2: rib9_R (0.110562 -0.138559 0.119672)
    Thelen2003Muscle TR2_r: max_isometric_force=63 optimal_fiber_length=0.148 tendon_slack_length=0.116
        pennation_angle_at_optimal=0
      PathPoint P1: lumbar2 (-0.023 0.015 0.023)
      PathPoint P2: Abdomen (0.00762775 0.024 0.0384435)
      PathWrap: wrap_object=Cylinder4 method=hybrid range=(1 2)
    Thelen2003Muscle TR3_r: max_isometric_force=63 optimal_fiber_length=0.148 tendon_slack_length=0.078
        pennation_angle_at_optimal=0
      PathPoint P1: lumbar3 (-0.026 0.022 0.03)
      PathPoint P2: Abdomen (0.00714076 -0.005 0.0439056)
      PathWrap: wrap_object=Cylinder5 method=hybrid range=(1 2)
    Thelen2003Muscle TR4_r: max_isometric_force=63 optimal_fiber_length=0.148 tendon_slack_length=0.081
        pennation_angle_at_optimal=0
      PathPoint P1: lumbar4 (-0.017 0.026 0.027)
      PathPoint P2: Abdomen (0.005 -0.033 0.04253)
      PathWrap: wrap_object=Cylinder6 method=hybrid range=(1 2)
    Thelen2003Muscle TR5_r: max_isometric_force=190 optimal_fiber_length=0.073 tendon_slack_length=0.033
        pennation_angle_at_optimal=0
      PathPoint P1: Abdomen (0.005 -0.063 0.043)
      PathPoint P2: pelvis (-0.05 0.053 0.120024)
      PathWrap: wrap_object=Cylinder7 method=hybrid range=(1 2)
    Millard2012EquilibriumMuscle TRIlong_r: max_isometric_force=771.8 optimal_fiber_length=0.134
        tendon_slack_length=0.143 pennation_angle_at_optimal=0.2094395 max_contraction_velocity=10 default_activation=1
        minimum_activation=0
      PathPoint TRIlong-P1: scapula_R (-0.04565 -0.04073 -0.01377)
      PathPoint TRIlong-P2: humerus_r (-0.02714 -0.11441 -0.00664)
      PathPoint TRIlong-P3: humerus_r (-0.03184 -0.22637 -0.01217)
      PathPoint TRIlong-P4: humerus_r (-0.01743 -0.26757 -0.01208)
      PathPoint TRIlong-P5: ulna_r (-0.0219 0.01046 -0.00078)
      PathWrap: wrap_object=TRI_r method=hybrid
      PathWrap pathwrap_0: wrap_object=TRIlonghh_r method=hybrid
      PathWrap pathwrap_1: wrap_object=TRIlongglen_r method=hybrid range=(1 2)
      ActiveForceLengthCurve: min_norm_active_fiber_length=0.4327 transition_norm_fiber_length=0.728
          max_norm_active_fiber_length=1.595 shallow_ascending_slope=0.4613 minimum_value=0
      FiberForceLengthCurve: strain_at_zero_force=0 strain_at_one_norm_force=0.6405 stiffness_at_low_force=0.0751
          stiffness_at_one_norm_force=6.3163 curviness=0.6658
      TendonForceLengthCurve: strain_at_one_norm_force=0.033 stiffness_at_one_norm_force=37.393
          norm_force_at_toe_end=0.2255 curviness=0.4504
    Millard2012EquilibriumMuscle TRIlat_r: max_isometric_force=717.5 optimal_fiber_length=0.1138
        tendon_slack_length=0.098 pennation_angle_at_optimal=0.1570796 max_contraction_velocity=10 default_activation=1
        minimum_activation=0
      PathPoint TRIlat-P1: humerus_r (-0.00599 -0.12646 0.00428)
      PathPoint TRIlat-P2: humerus_r (-0.02344 -0.14528 0.00928)
      PathPoint TRIlat-P3: humerus_r (-0.03184 -0.22637 -0.01217)
      PathPoint TRIlat-P4: humerus_r (-0.01743 -0.26757 -0.01208)
      PathPoint TRIlat-P5: ulna_r (-0.0219 0.01046 -0.00078)
      PathWrap: wrap_object=TRI_r method=hybrid
      ActiveForceLengthCurve: min_norm_active_fiber_length=0.4327 transition_norm_fiber_length=0.728
          max_norm_active_fiber_length=1.595 shallow_ascending_slope=0.4613 minimum_value=0
      FiberForceLengthCurve: strain_at_zero_force=0 strain_at_one_norm_force=0.6405 stiffness_at_low_force=0.0751
          stiffness_at_one_norm_force=6.3163 curviness=0.6658
      TendonForceLengthCurve: strain_at_one_norm_force=0.033 stiffness_at_one_norm_force=37.393
          norm_force_at_toe_end=0.2255 curviness=0.4504
    Millard2012EquilibriumMuscle TRImed_r: max_isometric_force=717.5 optimal_fiber_length=0.1138
        tendon_slack_length=0.0908 pennation_angle_at_optimal=0.1570796 max_contraction_velocity=10
        default_activation=1 minimum_activation=0
      PathPoint TRImed-P1: humerus_r (-0.00838 -0.13695 -0.00906)
      PathPoint TRImed-P2: humerus_r (-0.02601 -0.15139 -0.0108)
      PathPoint TRImed-P3: humerus_r (-0.03184 -0.22637 -0.01217)
      PathPoint TRImed-P4: humerus_r (-0.01743 -0.26757 -0.01208)
      PathPoint TRImed-P5: ulna_r (-0.0219 0.01046 -0.00078)
      PathWrap: wrap_object=TRI_r method=hybrid
      ActiveForceLengthCurve: min_norm_active_fiber_length=0.4327 transition_norm_fiber_length=0.728
          max_norm_active_fiber_length=1.595 shallow_ascending_slope=0.4613 minimum_value=0
      FiberForceLengthCurve: strain_at_zero_force=0 strain_at_one_norm_force=0.6405 stiffness_at_low_force=0.0751
          stiffness_at_one_norm_force=6.3163 curviness=0.6658
      TendonForceLengthCurve: strain_at_one_norm_force=0.033 stiffness_at_one_norm_force=37.393
          norm_force_at_toe_end=0.2255 curviness=0.4504
    Millard2012EquilibriumMuscle ANC_r: max_isometric_force=283.2 optimal_fiber_length=0.027 tendon_slack_length=0.018
        pennation_angle_at_optimal=0 max_contraction_velocity=10 default_activation=1 minimum_activation=0
      PathPoint ANC-P1: humerus_r (-0.00744 -0.28359 0.00979)
      PathPoint ANC-P2: ulna_r (-0.02532 -0.00124 0.006)
      PathWrap: wrap_object=ANC_r method=hybrid
      ActiveForceLengthCurve: min_norm_active_fiber_length=0.4327 transition_norm_fiber_length=0.728
          max_norm_active_fiber_length=1.595 shallow_ascending_slope=0.4613 minimum_value=0
      FiberForceLengthCurve: strain_at_zero_force=0 strain_at_one_norm_force=0.6405 stiffness_at_low_force=0.0751
          stiffness_at_one_norm_force=6.3163 curviness=0.6658
      TendonForceLengthCurve: strain_at_one_norm_force=0.033 stiffness_at_one_norm_force=37.393
          norm_force_at_toe_end=0.2255 curviness=0.4504
    Millard2012EquilibriumMuscle SUP_r: max_isometric_force=379.6 optimal_fiber_length=0.033 tendon_slack_length=0.028
        pennation_angle_at_optimal=0 max_contraction_velocity=10 default_activation=1 minimum_activation=0
      PathPoint P1: radius_r (0.00996 -0.06096 0.00075)
      PathPoint P2: radius_r (0.01201 -0.0517 -0.00107)
      PathPoint P3: ulna_r (-0.0136 -0.03384 0.02013)
      PathWrap: wrap_object=SUP_r method=hybrid
      ActiveForceLengthCurve: min_norm_active_fiber_length=0.4327 transition_norm_fiber_length=0.728
          max_norm_active_fiber_length=1.595 shallow_ascending_slope=0.4613 minimum_value=0
      FiberForceLengthCurve: strain_at_zero_force=0 strain_at_one_norm_force=0.6405 stiffness_at_low_force=0.0751
          stiffness_at_one_norm_force=6.3163 curviness=0.6658
      TendonForceLengthCurve: strain_at_one_norm_force=0.033 stiffness_at_one_norm_force=37.393
          norm_force_at_toe_end=0.2255 curviness=0.4504
    Millard2012EquilibriumMuscle BIClong_r: max_isometric_force=525.1 optimal_fiber_length=0.1157
        tendon_slack_length=0.2723 pennation_angle_at_optimal=0 max_contraction_velocity=10 default_activation=1
        minimum_activation=0
      PathPoint BIClong-P1: scapula_R (-0.03123 -0.02353 -0.01305)
      PathPoint BIClong-P2: scapula_R (-0.02094 -0.01309 -0.00461)
      PathPoint BIClong-P3: humerus_r (0.02131 0.01793 0.01028)
      PathPoint BIClong-P4: humerus_r (0.02378 -0.00511 0.01201)
      PathPoint BIClong-P5: humerus_r (0.01345 -0.02827 0.00136)
      PathPoint BIClong-P6: humerus_r (0.01068 -0.07736 -0.00165)
      PathPoint BIClong-P7: humerus_r (0.01703 -0.12125 0.00024)
      PathPoint BIClong-P8: humerus_r (0.0228 -0.1754 -0.0063)
      MovingPathPoint default: radius_r socket_x_coordinate=/jointset/radioulnar_r/pro_sup_r
          socket_y_coordinate=/jointset/radioulnar_r/pro_sup_r socket_z_coordinate=/jointset/radioulnar_r/pro_sup_r
        x_location: SimmSpline: x=(-1.57561 1.57823) y=(-0.0055 0.01096)
        y_location: PiecewiseLinearFunction: x=(-1.57561 0 1.57561) y=(-0.0282 -0.035 -0.0392)
        z_location: SimmSpline: x=(-1.57561 0.0866167 1.57561) y=(-0.01 -0.01358 -0.01083)
      PathPoint BIClong-P11: radius_r (-0.002 -0.0375 -0.002)
      PathWrap: wrap_object=Elbow_BIC_BRD_r method=hybrid
      PathWrap pathwrap_0: wrap_object=BIClong_r method=hybrid range=(2 5)
      ActiveForceLengthCurve: min_norm_active_fiber_length=0.4327 transition_norm_fiber_length=0.728
          max_norm_active_fiber_length=1.595 shallow_ascending_slope=0.4613 minimum_value=0
      FiberForceLengthCurve: strain_at_zero_force=0 strain_at_one_norm_force=0.6405 stiffness_at_low_force=0.0751
          stiffness_at_one_norm_force=6.3163 curviness=0.6658
      TendonForceLengthCurve: strain_at_one_norm_force=0.033 stiffness_at_one_norm_force=37.393
          norm_force_at_toe_end=0.2255 curviness=0.4504
    Millard2012EquilibriumMuscle BICshort_r: max_isometric_force=316.8 optimal_fiber_length=0.1321
        tendon_slack_length=0.1923 pennation_angle_at_optimal=0 max_contraction_velocity=10 default_activation=1
        minimum_activation=0
      PathPoint BICshort-P1: scapula_R (0.01268 -0.03931 -0.02625)
      PathPoint BICshort-P2: scapula_R (0.00093 -0.06704 -0.01593)
      PathPoint BICshort-P3: humerus_r (0.01117 -0.07576 -0.01101)
      PathPoint BICshort-P4: humerus_r (0.01703 -0.12125 -0.01079)
      PathPoint BICshort-P5: humerus_r (0.0228 -0.1754 -0.0063)
      MovingPathPoint default: radius_r socket_x_coordinate=/jointset/radioulnar_r/pro_sup_r
          socket_y_coordinate=/jointset/radioulnar_r/pro_sup_r socket_z_coordinate=/jointset/radioulnar_r/pro_sup_r
        x_location: SimmSpline: x=(-1.57561 1.57823) y=(-0.0055 0.01096)
        y_location: PiecewiseLinearFunction: x=(-1.57561 0 1.57561) y=(-0.0282 -0.035 -0.0392)
        z_location: SimmSpline: x=(-1.57561 0.0866167 1.57561) y=(-0.01 -0.01358 -0.01083)
      PathPoint BICshort-P8: radius_r (-0.002 -0.0375 -0.002)
      PathWrap: wrap_object=Elbow_BIC_BRD_r method=hybrid
      ActiveForceLengthCurve: min_norm_active_fiber_length=0.4327 transition_norm_fiber_length=0.728
          max_norm_active_fiber_length=1.595 shallow_ascending_slope=0.4613 minimum_value=0
      FiberForceLengthCurve: strain_at_zero_force=0 strain_at_one_norm_force=0.6405 stiffness_at_low_force=0.0751
          stiffness_at_one_norm_force=6.3163 curviness=0.6658
      TendonForceLengthCurve: strain_at_one_norm_force=0.033 stiffness_at_one_norm_force=37.393
          norm_force_at_toe_end=0.2255 curviness=0.4504
    Millard2012EquilibriumMuscle BRA_r: max_isometric_force=1177.37 optimal_fiber_length=0.0858
        tendon_slack_length=0.0535 pennation_angle_at_optimal=0 max_contraction_velocity=10 default_activation=1
        minimum_activation=0
      PathPoint BRA-P1: humerus_r (0.0068 -0.1739 -0.0036)
      ConditionalPathPoint BRA-P2: humerus_r (0.01894 -0.28559 -0.01105)
          socket_coordinate=/jointset/elbow_r/elbow_flex_r range=(0 0.813149)
      ConditionalPathPoint BRA-P3: ulna_r (0.00498 -0.01463 0.00128) socket_coordinate=/jointset/elbow_r/elbow_flex_r
          range=(0 0.813149)
      PathPoint BRA-P4: ulna_r (-0.0032 -0.0239 0.0009)
      ActiveForceLengthCurve: min_norm_active_fiber_length=0.4327 transition_norm_fiber_length=0.728
          max_norm_active_fiber_length=1.595 shallow_ascending_slope=0.4613 minimum_value=0
      FiberForceLengthCurve: strain_at_zero_force=0 strain_at_one_norm_force=0.6405 stiffness_at_low_force=0.0751
          stiffness_at_one_norm_force=6.3163 curviness=0.6658
      TendonForceLengthCurve: strain_at_one_norm_force=0.033 stiffness_at_one_norm_force=37.393
          norm_force_at_toe_end=0.2255 curviness=0.4504
    Millard2012EquilibriumMuscle BRD_r: max_isometric_force=276 optimal_fiber_length=0.1726 tendon_slack_length=0.133
        pennation_angle_at_optimal=0 max_contraction_velocity=10 default_activation=1 minimum_activation=0
      PathPoint BRD-P1: humerus_r (-0.0098 -0.19963 0.00223)
      PathPoint BRD-P2: radius_r (0.03577 -0.12742 0.02315)
      PathPoint BRD-P3: radius_r (0.0419 -0.221 0.0224)
      PathWrap: wrap_object=Elbow_BIC_BRD_r method=hybrid
      ActiveForceLengthCurve: min_norm_active_fiber_length=0.4327 transition_norm_fiber_length=0.728
          max_norm_active_fiber_length=1.595 shallow_ascending_slope=0.4613 minimum_value=0
      FiberForceLengthCurve: strain_at_zero_force=0 strain_at_one_norm_force=0.6405 stiffness_at_low_force=0.0751
          stiffness_at_one_norm_force=6.3163 curviness=0.6658
      TendonForceLengthCurve: strain_at_one_norm_force=0.033 stiffness_at_one_norm_force=37.393
          norm_force_at_toe_end=0.2255 curviness=0.4504
    Millard2012EquilibriumMuscle TRIlong_l: max_isometric_force=771.8 optimal_fiber_length=0.134
        tendon_slack_length=0.143 pennation_angle_at_optimal=0.2094395 max_contraction_velocity=10 default_activation=1
        minimum_activation=0
      PathPoint TRIlong-P1: scapula_L (-0.04565 -0.04073 -0.01377)
      PathPoint TRIlong-P2: humerus_l (-0.02714 -0.11441 -0.00664)
      PathPoint TRIlong-P3: humerus_l (-0.03184 -0.22637 -0.01217)
      PathPoint TRIlong-P4: humerus_l (-0.01743 -0.26757 -0.01208)
      PathPoint TRIlong-P5: ulna_l (-0.0219 0.01046 -0.00078)
      PathWrap: wrap_object=TRI_l method=hybrid
      PathWrap pathwrap_0: wrap_object=TRIlonghh_l method=hybrid
      PathWrap pathwrap_1: wrap_object=TRIlongglen_l method=hybrid range=(1 2)
      ActiveForceLengthCurve: min_norm_active_fiber_length=0.4327 transition_norm_fiber_length=0.728
          max_norm_active_fiber_length=1.595 shallow_ascending_slope=0.4613 minimum_value=0
      FiberForceLengthCurve: strain_at_zero_force=0 strain_at_one_norm_force=0.6405 stiffness_at_low_force=0.0751
          stiffness_at_one_norm_force=6.3163 curviness=0.6658
      TendonForceLengthCurve: strain_at_one_norm_force=0.033 stiffness_at_one_norm_force=37.393
          norm_force_at_toe_end=0.2255 curviness=0.4504
    Millard2012EquilibriumMuscle TRIlat_l: max_isometric_force=717.5 optimal_fiber_length=0.1138
        tendon_slack_length=0.098 pennation_angle_at_optimal=0.1570796 max_contraction_velocity=10 default_activation=1
        minimum_activation=0
      PathPoint TRIlat-P1: humerus_l (-0.00599 -0.12646 0.00428)
      PathPoint TRIlat-P2: humerus_l (-0.02344 -0.14528 0.00928)
      PathPoint TRIlat-P3: humerus_l (-0.03184 -0.22637 -0.01217)
      PathPoint TRIlat-P4: humerus_l (-0.01743 -0.26757 -0.01208)
      PathPoint TRIlat-P5: ulna_l (-0.0219 0.01046 -0.00078)
      PathWrap: wrap_object=TRI_l method=hybrid
      ActiveForceLengthCurve: min_norm_active_fiber_length=0.4327 transition_norm_fiber_length=0.728
          max_norm_active_fiber_length=1.595 shallow_ascending_slope=0.4613 minimum_value=0
      FiberForceLengthCurve: strain_at_zero_force=0 strain_at_one_norm_force=0.6405 stiffness_at_low_force=0.0751
          stiffness_at_one_norm_force=6.3163 curviness=0.6658
      TendonForceLengthCurve: strain_at_one_norm_force=0.033 stiffness_at_one_norm_force=37.393
          norm_force_at_toe_end=0.2255 curviness=0.4504
    Millard2012EquilibriumMuscle TRImed_l: max_isometric_force=717.5 optimal_fiber_length=0.1138
        tendon_slack_length=0.0908 pennation_angle_at_optimal=0.1570796 max_contraction_velocity=10
        default_activation=1 minimum_activation=0
      PathPoint TRImed-P1: humerus_l (-0.00838 -0.13695 -0.00906)
      PathPoint TRImed-P2: humerus_l (-0.02601 -0.15139 -0.0108)
      PathPoint TRImed-P3: humerus_l (-0.03184 -0.22637 -0.01217)
      PathPoint TRImed-P4: humerus_l (-0.01743 -0.26757 -0.01208)
      PathPoint TRImed-P5: ulna_l (-0.0219 0.01046 -0.00078)
      PathWrap: wrap_object=TRI_l method=hybrid
      ActiveForceLengthCurve: min_norm_active_fiber_length=0.4327 transition_norm_fiber_length=0.728
          max_norm_active_fiber_length=1.595 shallow_ascending_slope=0.4613 minimum_value=0
      FiberForceLengthCurve: strain_at_zero_force=0 strain_at_one_norm_force=0.6405 stiffness_at_low_force=0.0751
          stiffness_at_one_norm_force=6.3163 curviness=0.6658
      TendonForceLengthCurve: strain_at_one_norm_force=0.033 stiffness_at_one_norm_force=37.393
          norm_force_at_toe_end=0.2255 curviness=0.4504
    Millard2012EquilibriumMuscle ANC_l: max_isometric_force=283.2 optimal_fiber_length=0.027 tendon_slack_length=0.018
        pennation_angle_at_optimal=0 max_contraction_velocity=10 default_activation=1 minimum_activation=0
      PathPoint ANC-P1: humerus_l (-0.00744 -0.28359 0.00979)
      PathPoint ANC-P2: ulna_l (-0.02532 -0.00124 0.006)
      PathWrap: wrap_object=ANC_l method=hybrid
      ActiveForceLengthCurve: min_norm_active_fiber_length=0.4327 transition_norm_fiber_length=0.728
          max_norm_active_fiber_length=1.595 shallow_ascending_slope=0.4613 minimum_value=0
      FiberForceLengthCurve: strain_at_zero_force=0 strain_at_one_norm_force=0.6405 stiffness_at_low_force=0.0751
          stiffness_at_one_norm_force=6.3163 curviness=0.6658
      TendonForceLengthCurve: strain_at_one_norm_force=0.033 stiffness_at_one_norm_force=37.393
          norm_force_at_toe_end=0.2255 curviness=0.4504
    Millard2012EquilibriumMuscle SUP_l: max_isometric_force=379.6 optimal_fiber_length=0.033 tendon_slack_length=0.028
        pennation_angle_at_optimal=0 max_contraction_velocity=10 default_activation=1 minimum_activation=0
      PathPoint P1: radius_l (0.00996 -0.06096 0.00075)
      PathPoint P2: radius_l (0.01201 -0.0517 -0.00107)
      PathPoint P3: ulna_l (-0.0136 -0.03384 0.02013)
      PathWrap: wrap_object=SUP_l method=hybrid
      ActiveForceLengthCurve: min_norm_active_fiber_length=0.4327 transition_norm_fiber_length=0.728
          max_norm_active_fiber_length=1.595 shallow_ascending_slope=0.4613 minimum_value=0
      FiberForceLengthCurve: strain_at_zero_force=0 strain_at_one_norm_force=0.6405 stiffness_at_low_force=0.0751
          stiffness_at_one_norm_force=6.3163 curviness=0.6658
      TendonForceLengthCurve: strain_at_one_norm_force=0.033 stiffness_at_one_norm_force=37.393
          norm_force_at_toe_end=0.2255 curviness=0.4504
    Millard2012EquilibriumMuscle BIClong_l: max_isometric_force=525.1 optimal_fiber_length=0.1157
        tendon_slack_length=0.2723 pennation_angle_at_optimal=0 max_contraction_velocity=10 default_activation=1
        minimum_activation=0
      PathPoint BIClong-P1: scapula_L (-0.03123 -0.02353 -0.01305)
      PathPoint BIClong-P2: scapula_L (-0.02094 -0.01309 -0.00461)
      PathPoint BIClong-P3: humerus_l (0.02131 0.01793 0.01028)
      PathPoint BIClong-P4: humerus_l (0.02378 -0.00511 0.01201)
      PathPoint BIClong-P5: humerus_l (0.01345 -0.02827 0.00136)
      PathPoint BIClong-P6: humerus_l (0.01068 -0.07736 -0.00165)
      PathPoint BIClong-P7: humerus_l (0.01703 -0.12125 0.00024)
      PathPoint BIClong-P8: humerus_l (0.0228 -0.1754 -0.0063)
      MovingPathPoint default: radius_l socket_x_coordinate=/jointset/radioulnar_l/pro_sup_l
          socket_y_coordinate=/jointset/radioulnar_l/pro_sup_l socket_z_coordinate=/jointset/radioulnar_l/pro_sup_l
        x_location: SimmSpline: x=(-1.57561 1.57823) y=(-0.0055 0.01096)
        y_location: PiecewiseLinearFunction: x=(-1.57561 0 1.57561) y=(-0.0282 -0.035 -0.0392)
        z_location: SimmSpline: x=(-1.57561 0.0866167 1.57561) y=(-0.01 -0.01358 -0.01083)
      PathPoint BIClong-P11: radius_l (-0.002 -0.0375 -0.002)
      PathWrap: wrap_object=Elbow_BIC_BRD_l method=hybrid
      PathWrap pathwrap_0: wrap_object=BIClong_l method=hybrid range=(2 5)
      ActiveForceLengthCurve: min_norm_active_fiber_length=0.4327 transition_norm_fiber_length=0.728
          max_norm_active_fiber_length=1.595 shallow_ascending_slope=0.4613 minimum_value=0
      FiberForceLengthCurve: strain_at_zero_force=0 strain_at_one_norm_force=0.6405 stiffness_at_low_force=0.0751
          stiffness_at_one_norm_force=6.3163 curviness=0.6658
      TendonForceLengthCurve: strain_at_one_norm_force=0.033 stiffness_at_one_norm_force=37.393
          norm_force_at_toe_end=0.2255 curviness=0.4504
    Millard2012EquilibriumMuscle BICshort_l: max_isometric_force=316.8 optimal_fiber_length=0.1321
        tendon_slack_length=0.1923 pennation_angle_at_optimal=0 max_contraction_velocity=10 default_activation=1
        minimum_activation=0
      PathPoint BICshort-P1: scapula_L (0.01268 -0.03931 -0.02625)
      PathPoint BICshort-P2: scapula_L (0.00093 -0.06704 -0.01593)
      PathPoint BICshort-P3: humerus_l (0.01117 -0.07576 -0.01101)
      PathPoint BICshort-P4: humerus_l (0.01703 -0.12125 -0.01079)
      PathPoint BICshort-P5: humerus_l (0.0228 -0.1754 -0.0063)
      MovingPathPoint default: radius_l socket_x_coordinate=/jointset/radioulnar_l/pro_sup_l
          socket_y_coordinate=/jointset/radioulnar_l/pro_sup_l socket_z_coordinate=/jointset/radioulnar_l/pro_sup_l
        x_location: SimmSpline: x=(-1.57561 1.57823) y=(-0.0055 0.01096)
        y_location: PiecewiseLinearFunction: x=(-1.57561 0 1.57561) y=(-0.0282 -0.035 -0.0392)
        z_location: SimmSpline: x=(-1.57561 0.0866167 1.57561) y=(-0.01 -0.01358 -0.01083)
      PathPoint BICshort-P8: radius_l (-0.002 -0.0375 -0.002)
      PathWrap: wrap_object=Elbow_BIC_BRD_l method=hybrid
      ActiveForceLengthCurve: min_norm_active_fiber_length=0.4327 transition_norm_fiber_length=0.728
          max_norm_active_fiber_length=1.595 shallow_ascending_slope=0.4613 minimum_value=0
      FiberForceLengthCurve: strain_at_zero_force=0 strain_at_one_norm_force=0.6405 stiffness_at_low_force=0.0751
          stiffness_at_one_norm_force=6.3163 curviness=0.6658
      TendonForceLengthCurve: strain_at_one_norm_force=0.033 stiffness_at_one_norm_force=37.393
          norm_force_at_toe_end=0.2255 curviness=0.4504
    Millard2012EquilibriumMuscle BRA_l: max_isometric_force=1177.37 optimal_fiber_length=0.0858
        tendon_slack_length=0.0535 pennation_angle_at_optimal=0 max_contraction_velocity=10 default_activation=1
        minimum_activation=0
      PathPoint BRA-P1: humerus_l (0.0068 -0.1739 -0.0036)
      ConditionalPathPoint BRA-P2: humerus_l (0.01894 -0.28559 -0.01105)
          socket_coordinate=/jointset/elbow_l/elbow_flex_l range=(0 0.813149)
      ConditionalPathPoint BRA-P3: ulna_l (0.00498 -0.01463 0.00128) socket_coordinate=/jointset/elbow_l/elbow_flex_l
          range=(0 0.813149)
      PathPoint BRA-P4: ulna_l (-0.0032 -0.0239 0.0009)
      ActiveForceLengthCurve: min_norm_active_fiber_length=0.4327 transition_norm_fiber_length=0.728
          max_norm_active_fiber_length=1.595 shallow_ascending_slope=0.4613 minimum_value=0
      FiberForceLengthCurve: strain_at_zero_force=0 strain_at_one_norm_force=0.6405 stiffness_at_low_force=0.0751
          stiffness_at_one_norm_force=6.3163 curviness=0.6658
      TendonForceLengthCurve: strain_at_one_norm_force=0.033 stiffness_at_one_norm_force=37.393
          norm_force_at_toe_end=0.2255 curviness=0.4504
    Millard2012EquilibriumMuscle BRD_l: max_isometric_force=276 optimal_fiber_length=0.1726 tendon_slack_length=0.133
        pennation_angle_at_optimal=0 max_contraction_velocity=10 default_activation=1 minimum_activation=0
      PathPoint BRD-P1: humerus_l (-0.0098 -0.19963 0.00223)
      PathPoint BRD-P2: radius_l (0.03577 -0.12742 0.02315)
      PathPoint BRD-P3: radius_l (0.0419 -0.221 0.0224)
      PathWrap: wrap_object=Elbow_BIC_BRD_l method=hybrid
      ActiveForceLengthCurve: min_norm_active_fiber_length=0.4327 transition_norm_fiber_length=0.728
          max_norm_active_fiber_length=1.595 shallow_ascending_slope=0.4613 minimum_value=0
      FiberForceLengthCurve: strain_at_zero_force=0 strain_at_one_norm_force=0.6405 stiffness_at_low_force=0.0751
          stiffness_at_one_norm_force=6.3163 curviness=0.6658
      TendonForceLengthCurve: strain_at_one_norm_force=0.033 stiffness_at_one_norm_force=37.393
          norm_force_at_toe_end=0.2255 curviness=0.4504
    CoordinateActuator elbow_l_actuator: coordinate=elbow_flex_l optimal_force=300
    CoordinateActuator elbow_r_actuator: coordinate=elbow_flex_r optimal_force=300
    CoordinateActuator shoulder_elv_r_actuator: coordinate=shoulder_elv_r optimal_force=1000
    CoordinateActuator shoulder_rot_r_actuator: coordinate=shoulder_rot_r optimal_force=1000
    CoordinateActuator elv_angle_r_actuator: coordinate=elv_angle_r optimal_force=1000
    CoordinateActuator shoulder_elv_l_actuator: coordinate=shoulder_elv_l optimal_force=1000
    CoordinateActuator shoulder_rot_l_actuator: coordinate=shoulder_rot_l optimal_force=1000
    CoordinateActuator elv_angle_l_actuator: coordinate=elv_angle_l optimal_force=1000
    CoordinateActuator pelvis_tilt_actuator: coordinate=pelvis_tilt optimal_force=300
    PointToPointActuator [values shared by the 20 below unless stated]: min_control=-1 max_control=1 bodyB=sternum
        points_are_global=false optimal_force=1000
    PointToPointActuator rib1Ract: bodyA=rib1_R pointA=(0.04860772 -0.0443099 0.0386399) pointB=(0 0 0)
    PointToPointActuator rib2Ract: bodyA=rib2_R pointA=(0.092961 -0.0697812 0.03507933)
        pointB=(0.0220396 -0.03477063 -0.02168952)
    PointToPointActuator rib3Ract: bodyA=rib3_R pointA=(0.1165631 -0.08787243 0.04809467)
        pointB=(0.03737203 -0.06672585 -0.02008857)
    PointToPointActuator rib4Ract: bodyA=rib4_R pointA=(0.1364458 -0.1074937 0.05863423)
        pointB=(0.04682804 -0.09772983 -0.01534953)
    PointToPointActuator rib5Ract: bodyA=rib5_R pointA=(0.1506818 -0.123359 0.06808561)
        pointB=(0.05128078 -0.1202819 -0.01429997)
    PointToPointActuator rib6Ract: bodyA=rib6_R pointA=(0.1546948 -0.1364165 0.0779441)
        pointB=(0.05435936 -0.1408036 -0.02196418)
    PointToPointActuator rib7Ract: bodyA=rib7_R pointA=(0.1491181 -0.1417718 0.09425189)
        pointB=(0.05692147 -0.1516709 -0.03055664)
    PointToPointActuator rib8Ract: bodyA=rib8_R bodyB=rib7_R pointA=(0.132602 -0.1516935 0.1108272)
        pointB=(0.1491181 -0.1417718 0.09425189)
    PointToPointActuator rib9Ract: bodyA=rib9_R bodyB=rib8_R pointA=(0.1105576 -0.1385323 0.1196321)
        pointB=(0.132602 -0.1516935 0.1108272)
    PointToPointActuator rib10Ract: bodyA=rib10_R bodyB=rib9_R pointA=(0.07498362 -0.1261227 0.1281834)
        pointB=(0.1105576 -0.1385323 0.1196321)
    PointToPointActuator rib1Lact: bodyA=rib1_L pointA=(0.04860772 -0.0443099 -0.0386399) pointB=(0 0 -0.0670986)
    PointToPointActuator rib2Lact: bodyA=rib2_L pointA=(0.092961 -0.0697812 -0.03507933)
        pointB=(0.0220396 -0.03477063 -0.04540907)
    PointToPointActuator rib3Lact: bodyA=rib3_L pointA=(0.1165631 -0.08787243 -0.04809467)
        pointB=(0.03737203 -0.06672585 -0.04701003)
    PointToPointActuator rib4Lact: bodyA=rib4_L pointA=(0.1364458 -0.1074937 -0.05863423)
        pointB=(0.04682804 -0.09772983 -0.05174906)
    PointToPointActuator rib5Lact: bodyA=rib5_L pointA=(0.1506818 -0.123359 -0.06808561)
        pointB=(0.05128078 -0.1202819 -0.05279862)
    PointToPointActuator rib6Lact: bodyA=rib6_L pointA=(0.1546948 -0.1364165 -0.0779441)
        pointB=(0.05435936 -0.1408036 -0.04513442)
    PointToPointActuator rib7Lact: bodyA=rib7_L pointA=(0.1491181 -0.1417718 -0.09425189)
        pointB=(0.05692147 -0.1516709 -0.03654195)
    PointToPointActuator rib8Lact: bodyA=rib8_L bodyB=rib7_L pointA=(0.132602 -0.1516935 -0.1108272)
        pointB=(0.1491181 -0.1417718 -0.09425189)
    PointToPointActuator rib9Lact: bodyA=rib9_L bodyB=rib8_L pointA=(0.1105576 -0.1385323 -0.1196321)
        pointB=(0.132602 -0.1516935 -0.1108272)
    PointToPointActuator rib10Lact: bodyA=rib10_L bodyB=rib9_L pointA=(0.07498362 -0.1261227 -0.1281834)
        pointB=(0.1105576 -0.1385323 -0.1196321)
    ObjectGroup right_leg: members=(addbrev_r addlong_r addmagDist_r addmagIsch_r addmagMid_r addmagProx_r edl_r ehl_r fdl_r fhl_r gasmed_r glmax1_r glmax2_r glmax3_r glmed1_r glmed2_r glmed3_r glmin1_r glmin2_r glmin3_r grac_r iliacus_r perbrev_r perlong_r piri_r psoas_r recfem_r sart_r semimem_r semiten_r soleus_r tfl_r tibant_r tibpost_r vasint_r vasmed_r)
    ObjectGroup left_leg: members=(addbrev_l addlong_l addmagDist_l addmagIsch_l addmagMid_l addmagProx_l edl_l ehl_l fdl_l fhl_l gasmed_l glmax1_l glmax2_l glmax3_l glmed1_l glmed2_l glmed3_l glmin1_l glmin2_l glmin3_l grac_l iliacus_l perbrev_l perlong_l piri_l psoas_l recfem_l sart_l semimem_l semiten_l soleus_l tfl_l tibant_l tibpost_l vasint_l vasmed_l)
    ObjectGroup hip_add_r: members=(addbrev_r addlong_r addmagDist_r addmagIsch_r addmagMid_r addmagProx_r grac_r semimem_r semiten_r)
    ObjectGroup hip_abd_r: members=(glmax1_r glmed1_r glmed2_r glmed3_r glmin1_r glmin2_r glmin3_r piri_r sart_r tfl_r)
    ObjectGroup hip_flex_r: members=(addbrev_r addlong_r glmin1_r grac_r iliacus_r psoas_r recfem_r sart_r tfl_r)
    ObjectGroup hip_ext_r: members=(addlong_r addmagDist_r addmagIsch_r addmagMid_r addmagProx_r glmax1_r glmax2_r glmax3_r glmed1_r glmed2_r glmed3_r glmin3_r semimem_r semiten_r)
    ObjectGroup hip_inrot_r: members=(glmed1_r glmed2_r glmed3_r glmin1_r iliacus_r psoas_r tfl_r)
    ObjectGroup hip_exrot_r: members=(glmin3_r piri_r)
    ObjectGroup knee_flex_r: members=(gasmed_r grac_r sart_r semimem_r semiten_r)
    ObjectGroup knee_ext_r: members=(recfem_r vasint_r vasmed_r)
    ObjectGroup ankle_df_r: members=(edl_r ehl_r tibant_r)
    ObjectGroup ankle_pf_r: members=(fdl_r fhl_r gasmed_r perbrev_r perlong_r soleus_r tibpost_r)
    ObjectGroup everter_r: members=(edl_r perbrev_r perlong_r)
    ObjectGroup inverter_r: members=(ehl_r fdl_r fhl_r tibant_r tibpost_r)
    ObjectGroup hip_add_l: members=(addbrev_l addlong_l addmagDist_l addmagIsch_l addmagMid_l addmagProx_l grac_l semimem_l semiten_l)
    ObjectGroup hip_abd_l: members=(glmax1_l glmed1_l glmed2_l glmed3_l glmin1_l glmin2_l glmin3_l sart_l tfl_l)
    ObjectGroup hip_flex_l: members=(addbrev_l addlong_l glmin1_l grac_l iliacus_l psoas_l recfem_l sart_l tfl_l)
    ObjectGroup hip_ext_l: members=(addlong_l addmagDist_l addmagIsch_l addmagMid_l addmagProx_l glmax1_l glmax2_l glmax3_l glmed1_l glmed2_l glmed3_l glmin3_l semimem_l semiten_l)
    ObjectGroup hip_exrot_l: members=glmin3_l
    ObjectGroup hip_inrot_l: members=(glmed1_l glmed2_l glmed3_l glmin1_l iliacus_l psoas_l tfl_l)
    ObjectGroup knee_flex_l: members=(gasmed_l grac_l sart_l semimem_l semiten_l)
    ObjectGroup knee_ext_l: members=(recfem_l vasint_l vasmed_l)
    ObjectGroup ankle_df_l: members=(edl_l ehl_l tibant_l)
    ObjectGroup ankle_pf_l: members=(fdl_l fhl_l gasmed_l perbrev_l perlong_l soleus_l tibpost_l)
    ObjectGroup everter_l: members=(edl_l perbrev_l perlong_l)
    ObjectGroup inverter_l: members=(ehl_l fdl_l fhl_l tibant_l tibpost_l)
  MarkerSet:
    Marker racr: scapula_R (1.44162e-7 0.025 -1.25115e-7)
    Marker lacr: scapula_L (1.33872e-7 0.025 -1.6505e-7)
    Marker c7: thoracic1 (-0.05689654 0.02879502 0)
    Marker jug: sternum (0.07865714 -0.02166085 -0.03751222)
    Marker rua: humerus_r (0.01 -0.13 0.05)
    Marker rlel: humerus_r (-0.01 -0.29 0.03)
    Marker rmel: humerus_r (0 -0.28 -0.045)
    Marker rfa: radius_r (0 -0.114874 0.05)
    Marker rdr: radius_r (-0.012 -0.237 0.048)
    Marker rdu: ulna_r (-0.04 -0.245 0.016)
    Marker lua: humerus_l (0.01 -0.13 -0.05)
    Marker llel: humerus_l (-0.01 -0.29 -0.03)
    Marker lmel: humerus_l (0 -0.28 0.045)
    Marker lfa: radius_l (0 -0.114874 -0.05)
    Marker ldr: radius_l (-0.012 -0.237 -0.048)
    Marker ldu: ulna_l (-0.04 -0.245 -0.016)
    Marker s2: pelvis (-0.185 0.02 -0.000396304)
    Marker ric: pelvis (-0.07 0.07 0.15)
    Marker lic: pelvis (-0.07 0.07 -0.15)
    Marker rasi: pelvis (0.015 0 0.125)
    Marker lasi: pelvis (0.015 0 -0.125)
    Marker rpsi: pelvis (-0.165 0.04 0.05)
    Marker lpsi: pelvis (-0.165 0.04 -0.05)
    Marker rgt: femur_r (-0.01 -0.02 0.085)
    Marker rth1: femur_r (-0.005 -0.11 0.1)
    Marker rth2: femur_r (0.0177824 -0.19 0.095)
    Marker rth3: femur_r (0.00686701 -0.27 0.085)
    Marker rth4: femur_r (0.0543592 -0.19 0.09)
    Marker rlfc: femur_r (0 -0.42 0.06)
    Marker rmfc: femur_r (0 -0.445 -0.06)
    Marker rsh1: tibia_r (-0.00462888 -0.135299 0.06)
    Marker rsh2: tibia_r (0.00881342 -0.22039 0.06)
    Marker rsh3: tibia_r (-0.00854137 -0.298501 0.06)
    Marker rsh4: tibia_r (0.0434856 -0.222583 0.05)
    Marker rlmal: tibia_r (-0.008350935 -0.3838471 0.0549999)
    Marker rmmal: tibia_r (0.006000008 -0.3876351 -0.04851106)
    Marker rcal: calcn_r (-0.025 0.02 -0.005)
    Marker rtoe: calcn_r (0.2699997 0.02000004 0.03324605)
    Marker rmt5: calcn_r (0.1624171 1.321919e-6 0.07443334)
    Marker rmt1: calcn_r (0.176275 0 -0.0535013)
    Marker lgt: femur_l (-0.01 -0.02 -0.085)
    Marker lth1: femur_l (-0.005 -0.11 -0.1)
    Marker lth2: femur_l (0.0177824 -0.19 -0.095)
    Marker lth3: femur_l (0.00686701 -0.27 -0.085)
    Marker lth4: femur_l (0.0543592 -0.19 -0.09)
    Marker llfc: femur_l (0 -0.42 -0.06)
    Marker lmfc: femur_l (0 -0.445 0.06)
    Marker lsh1: tibia_l (-0.00462888 -0.135299 -0.06)
    Marker lsh2: tibia_l (0.00881342 -0.22039 -0.06)
    Marker lsh3: tibia_l (-0.00854137 -0.298501 -0.06)
    Marker lsh4: tibia_l (0.0434856 -0.222583 -0.05)
    Marker llmal: tibia_l (-0.00835093 -0.383847 -0.0549999)
    Marker lmmal: tibia_l (0.00600001 -0.387635 0.0485111)
    Marker lcal: calcn_l (-0.025 0.02 0.005)
    Marker ltoe: calcn_l (0.27 0.02 -0.033246)
    Marker lmt5: calcn_l (0.162417 1.32192e-6 -0.0744333)
    Marker lmt1: calcn_l (0.173737 0 0.0544933)
