# OpenSim document version 40000
# Marker pairs used for scaling body dimensions.
MeasurementSet generic:
  Measurement torso_x: apply=true
    MarkerPair: markers=(c7 jug)
    MarkerPair: markers=(rpsi rasi)
    MarkerPair: markers=(lpsi lasi)
    BodyScale head_neck: axes=X
    BodyScale sternum: axes=X
    BodyScale Abdomen: axes=X
    BodyScale thoracic1: axes=X
    BodyScale thoracic2: axes=X
    BodyScale thoracic3: axes=X
    BodyScale thoracic4: axes=X
    BodyScale thoracic5: axes=X
    BodyScale thoracic6: axes=X
    BodyScale thoracic7: axes=X
    BodyScale thoracic8: axes=X
    BodyScale thoracic9: axes=X
    BodyScale thoracic10: axes=X
    BodyScale thoracic11: axes=X
    BodyScale thoracic12: axes=X
    BodyScale lumbar1: axes=X
    BodyScale lumbar2: axes=X
    BodyScale lumbar3: axes=X
    BodyScale lumbar4: axes=X
    BodyScale lumbar5: axes=X
    BodyScale scapula_R: axes=X
    BodyScale clavicle_R: axes=X
    BodyScale Abd_R_L1: axes=X
    BodyScale Abd_R_L2: axes=X
    BodyScale Abd_R_L3: axes=X
    BodyScale Abd_R_L4: axes=X
    BodyScale Abd_R_L5: axes=X
    BodyScale rib1_R: axes=X
    BodyScale rib2_R: axes=X
    BodyScale rib3_R: axes=X
    BodyScale rib4_R: axes=X
    BodyScale rib5_R: axes=X
    BodyScale rib6_R: axes=X
    BodyScale rib7_R: axes=X
    BodyScale rib8_R: axes=X
    BodyScale rib9_R: axes=X
    BodyScale rib10_R: axes=X
    BodyScale rib11_R: axes=X
    BodyScale rib12_R: axes=X
    BodyScale scapula_L: axes=X
    BodyScale clavicle_L: axes=X
    BodyScale Abd_L_L1: axes=X
    BodyScale Abd_L_L2: axes=X
    BodyScale Abd_L_L3: axes=X
    BodyScale Abd_L_L4: axes=X
    BodyScale Abd_L_L5: axes=X
    BodyScale rib1_L: axes=X
    BodyScale rib2_L: axes=X
    BodyScale rib3_L: axes=X
    BodyScale rib4_L: axes=X
    BodyScale rib5_L: axes=X
    BodyScale rib6_L: axes=X
    BodyScale rib7_L: axes=X
    BodyScale rib8_L: axes=X
    BodyScale rib9_L: axes=X
    BodyScale rib10_L: axes=X
    BodyScale rib11_L: axes=X
    BodyScale rib12_L: axes=X
  Measurement torso_y: apply=true
    MarkerPair: markers=(racr rasi)
    MarkerPair: markers=(lacr lasi)
    MarkerPair: markers=(c7 s2)
    BodyScale head_neck: axes=Y
    BodyScale sternum: axes=Y
    BodyScale Abdomen: axes=Y
    BodyScale thoracic1: axes=Y
    BodyScale thoracic2: axes=Y
    BodyScale thoracic3: axes=Y
    BodyScale thoracic4: axes=Y
    BodyScale thoracic5: axes=Y
    BodyScale thoracic6: axes=Y
    BodyScale thoracic7: axes=Y
    BodyScale thoracic8: axes=Y
    BodyScale thoracic9: axes=Y
    BodyScale thoracic10: axes=Y
    BodyScale thoracic11: axes=Y
    BodyScale thoracic12: axes=Y
    BodyScale lumbar1: axes=Y
    BodyScale lumbar2: axes=Y
    BodyScale lumbar3: axes=Y
    BodyScale lumbar4: axes=Y
    BodyScale lumbar5: axes=Y
    BodyScale scapula_R: axes=Y
    BodyScale clavicle_R: axes=Y
    BodyScale Abd_R_L1: axes=Y
    BodyScale Abd_R_L2: axes=Y
    BodyScale Abd_R_L3: axes=Y
    BodyScale Abd_R_L4: axes=Y
    BodyScale Abd_R_L5: axes=Y
    BodyScale rib1_R: axes=Y
    BodyScale rib2_R: axes=Y
    BodyScale rib3_R: axes=Y
    BodyScale rib4_R: axes=Y
    BodyScale rib5_R: axes=Y
    BodyScale rib6_R: axes=Y
    BodyScale rib7_R: axes=Y
    BodyScale rib8_R: axes=Y
    BodyScale rib9_R: axes=Y
    BodyScale rib10_R: axes=Y
    BodyScale rib11_R: axes=Y
    BodyScale rib12_R: axes=Y
    BodyScale scapula_L: axes=Y
    BodyScale clavicle_L: axes=Y
    BodyScale Abd_L_L1: axes=Y
    BodyScale Abd_L_L2: axes=Y
    BodyScale Abd_L_L3: axes=Y
    BodyScale Abd_L_L4: axes=Y
    BodyScale Abd_L_L5: axes=Y
    BodyScale rib1_L: axes=Y
    BodyScale rib2_L: axes=Y
    BodyScale rib3_L: axes=Y
    BodyScale rib4_L: axes=Y
    BodyScale rib5_L: axes=Y
    BodyScale rib6_L: axes=Y
    BodyScale rib7_L: axes=Y
    BodyScale rib8_L: axes=Y
    BodyScale rib9_L: axes=Y
    BodyScale rib10_L: axes=Y
    BodyScale rib11_L: axes=Y
    BodyScale rib12_L: axes=Y
  Measurement torso_z: apply=true
    MarkerPair: markers=(racr lacr)
    MarkerPair: markers=(rasi lasi)
    BodyScale head_neck: axes=Z
    BodyScale sternum: axes=Z
    BodyScale Abdomen: axes=Z
    BodyScale thoracic1: axes=Z
    BodyScale thoracic2: axes=Z
    BodyScale thoracic3: axes=Z
    BodyScale thoracic4: axes=Z
    BodyScale thoracic5: axes=Z
    BodyScale thoracic6: axes=Z
    BodyScale thoracic7: axes=Z
    BodyScale thoracic8: axes=Z
    BodyScale thoracic9: axes=Z
    BodyScale thoracic10: axes=Z
    BodyScale thoracic11: axes=Z
    BodyScale thoracic12: axes=Z
    BodyScale lumbar1: axes=Z
    BodyScale lumbar2: axes=Z
    BodyScale lumbar3: axes=Z
    BodyScale lumbar4: axes=Z
    BodyScale lumbar5: axes=Z
    BodyScale scapula_R: axes=Z
    BodyScale clavicle_R: axes=Z
    BodyScale Abd_R_L1: axes=Z
    BodyScale Abd_R_L2: axes=Z
    BodyScale Abd_R_L3: axes=Z
    BodyScale Abd_R_L4: axes=Z
    BodyScale Abd_R_L5: axes=Z
    BodyScale rib1_R: axes=Z
    BodyScale rib2_R: axes=Z
    BodyScale rib3_R: axes=Z
    BodyScale rib4_R: axes=Z
    BodyScale rib5_R: axes=Z
    BodyScale rib6_R: axes=Z
    BodyScale rib7_R: axes=Z
    BodyScale rib8_R: axes=Z
    BodyScale rib9_R: axes=Z
    BodyScale rib10_R: axes=Z
    BodyScale rib11_R: axes=Z
    BodyScale rib12_R: axes=Z
    BodyScale scapula_L: axes=Z
    BodyScale clavicle_L: axes=Z
    BodyScale Abd_L_L1: axes=Z
    BodyScale Abd_L_L2: axes=Z
    BodyScale Abd_L_L3: axes=Z
    BodyScale Abd_L_L4: axes=Z
    BodyScale Abd_L_L5: axes=Z
    BodyScale rib1_L: axes=Z
    BodyScale rib2_L: axes=Z
    BodyScale rib3_L: axes=Z
    BodyScale rib4_L: axes=Z
    BodyScale rib5_L: axes=Z
    BodyScale rib6_L: axes=Z
    BodyScale rib7_L: axes=Z
    BodyScale rib8_L: axes=Z
    BodyScale rib9_L: axes=Z
    BodyScale rib10_L: axes=Z
    BodyScale rib11_L: axes=Z
    BodyScale rib12_L: axes=Z
  Measurement pelvis_x: apply=true
    MarkerPair: markers=(rpsi rasi)
    MarkerPair: markers=(lpsi lasi)
    BodyScale pelvis: axes=X
    BodyScale sacrum: axes=X
  Measurement pelvis_y: apply=true
    MarkerPair: markers=(rasi rgt)
    MarkerPair: markers=(lasi lgt)
    MarkerPair: markers=(ric rgt)
    MarkerPair: markers=(lic lgt)
    MarkerPair: markers=(rpsi rgt)
    MarkerPair: markers=(lpsi lgt)
    BodyScale pelvis: axes=Y
    BodyScale sacrum: axes=Y
  Measurement pelvis_z: apply=true
    MarkerPair: markers=(rasi lasi)
    MarkerPair: markers=(rpsi lpsi)
    MarkerPair: markers=(ric lic)
    MarkerPair: markers=(rgt lgt)
    BodyScale pelvis: axes=Z
    BodyScale sacrum: axes=Z
  Measurement thigh_r_y: apply=true
    MarkerPair: markers=(rgt rlfc)
    BodyScale femur_r: axes=Y
    BodyScale patella_r: axes=Y
  Measurement thigh_r_xz: apply=true
    MarkerPair: markers=(rlfc rmfc)
    BodyScale femur_r: axes=(X Z)
    BodyScale patella_r: axes=(X Z)
  Measurement shank_r_y: apply=true
    MarkerPair: markers=(rlfc rlmal)
    BodyScale tibia_r: axes=Y
    BodyScale talus_r: axes=Y
  Measurement shank_r_xz: apply=true
    MarkerPair: markers=(rlmal rmmal)
    BodyScale tibia_r: axes=(X Z)
    BodyScale talus_r: axes=(X Z)
  Measurement foot_r_xy: apply=true
    MarkerPair: markers=(rcal rtoe)
    BodyScale calcn_r: axes=(X Y)
    BodyScale toes_r: axes=(X Y)
  Measurement foot_r_z: apply=true
    MarkerPair: markers=(rmt1 rmt5)
    BodyScale calcn_r: axes=Z
    BodyScale toes_r: axes=Z
  Measurement upper arm_r: apply=true
    MarkerPair: markers=(racr rlel)
    BodyScale humerus_r: axes=(X Y Z)
  Measurement forearm_hand_r: apply=true
    MarkerPair: markers=(rlel rdr)
    BodyScale ulna_r: axes=(X Y Z)
    BodyScale radius_r: axes=(X Y Z)
    BodyScale hand_r: axes=(X Y Z)
  Measurement thigh_l_y: apply=true
    MarkerPair: markers=(lasi llfc)
    BodyScale femur_l: axes=Y
    BodyScale patella_l: axes=Y
  Measurement thigh_l_xz: apply=true
    MarkerPair: markers=(llfc lmfc)
    BodyScale femur_l: axes=(X Z)
    BodyScale patella_l: axes=(X Z)
  Measurement shank_l_y: apply=true
    MarkerPair: markers=(llfc llmal)
    BodyScale tibia_l: axes=Y
    BodyScale talus_l: axes=Y
  Measurement shank_l_xz: apply=true
    MarkerPair: markers=(llmal lmmal)
    BodyScale tibia_l: axes=(X Z)
    BodyScale talus_l: axes=(X Z)
  Measurement foot_l_xy: apply=true
    MarkerPair: markers=(lcal ltoe)
    BodyScale calcn_l: axes=(X Y)
    BodyScale toes_l: axes=(X Y)
  Measurement foot_l_z: apply=true
    MarkerPair: markers=(lmt1 lmt5)
    BodyScale calcn_l: axes=Z
    BodyScale toes_l: axes=Z
  Measurement upper arm_l: apply=true
    MarkerPair: markers=(lacr llel)
    BodyScale humerus_l: axes=(X Y Z)
  Measurement forearm_hand_l: apply=true
    MarkerPair: markers=(llel ldr)
    BodyScale ulna_l: axes=(X Y Z)
    BodyScale radius_l: axes=(X Y Z)
    BodyScale hand_l: axes=(X Y Z)
