# OpenSim document version 40000
ScaleTool generic:
  GenericModelMaker generic:
    model_file: /Users/rosswilkinson/Google Drive/projects/opensim-model-fullBodyMuscleActuated/cyclistFullBodyMuscle.osim
    marker_set_file: /Users/rosswilkinson/Google Drive/projects/opensim-model-fullBodyMuscleActuated/markerSet.xml
  ModelScaler generic:
    scaling_order: measurements
    time_range: [0 2]
    preserve_mass_distribution: true
    MeasurementSet: file=(/Users/rosswilkinson/Google Drive/projects/opensim-model-fullBodyMuscleActuated/measurementSet.xml)
  MarkerPlacer generic:
    time_range: [0 2]
    max_marker_movement: -1
    IKTaskSet: file=(/Users/rosswilkinson/Google Drive/projects/opensim-model-fullBodyMuscleActuated/tasksScale.xml)
