# OpenSim document version 40000
ScaleTool s01:
  mass: 74
  height: 1.75
  age: 22
  GenericModelMaker s01:
    model_file: ./cyclistFullBodyMuscle.osim
    marker_set_file: ./markerSet.xml
  ModelScaler s01:
    scaling_order: measurements
    marker_file: ./s01_static.trc
    time_range: [0.005 2]
    preserve_mass_distribution: true
    MeasurementSet: file=./measurementSet.xml
  MarkerPlacer s01:
    marker_file: ./s01_static.trc
    time_range: [0.01 2]
    output_model_file: ./s01modelScaled.osim
    output_motion_file: ./s01static.mot
    output_marker_file: ./s01markersScaled.xml
    max_marker_movement: -1
    IKTaskSet: file=./tasksScale.xml
