# OpenSim document version 40000
IKTaskSet cyclistFullBodyMuscleActuated:
  IKMarkerTask racr: apply=true weight=100
  IKMarkerTask lacr: apply=true weight=100
  IKMarkerTask c7: apply=true weight=100
  IKMarkerTask jug: apply=true weight=100
  IKMarkerTask rlel: apply=true weight=100
  IKMarkerTask rmel: apply=false weight=10
  IKMarkerTask rdr: apply=true weight=100
  IKMarkerTask rdu: apply=false weight=10
  IKMarkerTask llel: apply=true weight=100
  IKMarkerTask lmel: apply=false weight=10
  IKMarkerTask ldr: apply=true weight=100
  IKMarkerTask ldu: apply=false weight=10
  IKMarkerTask s2: apply=true weight=100
  IKMarkerTask ric: apply=false weight=1
  IKMarkerTask lic: apply=false weight=1
  IKMarkerTask rgt: apply=true weight=100
  IKMarkerTask lgt: apply=true weight=100
  IKMarkerTask rasi: apply=true weight=100
  IKMarkerTask lasi: apply=true weight=100
  IKMarkerTask rpsi: apply=true weight=100
  IKMarkerTask lpsi: apply=true weight=100
  IKMarkerTask rth1: apply=false weight=1
  IKMarkerTask rth2: apply=false weight=1
  IKMarkerTask rth3: apply=false weight=1
  IKMarkerTask rth4: apply=false weight=1
  IKMarkerTask rlfc: apply=true weight=100
  IKMarkerTask rmfc: apply=true weight=100
  IKMarkerTask rsh1: apply=false weight=1
  IKMarkerTask rsh2: apply=false weight=1
  IKMarkerTask rsh3: apply=false weight=1
  IKMarkerTask rsh4: apply=false weight=1
  IKMarkerTask rlmal: apply=true weight=100
  IKMarkerTask rmmal: apply=true weight=10
  IKMarkerTask rcal: apply=true weight=10
  IKMarkerTask rtoe: apply=true weight=10
  IKMarkerTask rmt5: apply=true weight=100
  IKMarkerTask rmt1: apply=true weight=100
  IKMarkerTask lth1: apply=false weight=1
  IKMarkerTask lth2: apply=false weight=1
  IKMarkerTask lth3: apply=false weight=1
  IKMarkerTask lth4: apply=false weight=1
  IKMarkerTask llfc: apply=true weight=100
  IKMarkerTask lmfc: apply=true weight=10
  IKMarkerTask lsh1: apply=false weight=1
  IKMarkerTask lsh2: apply=false weight=1
  IKMarkerTask lsh3: apply=false weight=1
  IKMarkerTask lsh4: apply=false weight=1
  IKMarkerTask llmal: apply=true weight=100
  IKMarkerTask lmmal: apply=true weight=10
  IKMarkerTask lcal: apply=true weight=10
  IKMarkerTask ltoe: apply=true weight=10
  IKMarkerTask lmt5: apply=true weight=100
  IKMarkerTask lmt1: apply=true weight=100
